<Lems>

    <!--

Parameters and setting used to generate this network:

    Data reader:                    UpdatedSpreadsheetDataReader
    Cells:                          ['AVBL', 'AVBR', 'AVAL', 'AVAR', 'AS1', 'AS2', 'AS3', 'AS4', 'AS5', 'AS6', 'AS7', 'AS8', 'AS9', 'AS10', 'AS11', 'DA1', 'DA2', 'DA3', 'DA4', 'DA5', 'DA6', 'DA7', 'DA8', 'DA9', 'DB1', 'DB2', 'DB3', 'DB4', 'DB5', 'DB6', 'DB7']
    Cell stimulated:                []
    Connection:                     ['AS\\d+-DA.+', 'DA\\d+-DB.+', 'DB\\d+-AS.+', 'AVA.-DA.+', 'AVB.-DB.+', 'DA\\d+-M(D|V)(L|R).+', 'DB\\d+-M(D|V)(L|R).+', 'M(D|V)(L|R)\\d+-M(D|V)(L|R).+']
    Connection numbers overridden:  {}
    Connection numbers scaled:      None
    Connection polarities override: {'DB6-AS9': 'inh', 'DB6-AS8': 'inh', 'DB3-AS5': 'inh', 'DB4-AS6': 'inh', 'DB3-AS4': 'inh', 'DB5-AS7': 'inh', 'DB1-AS2': 'inh', 'DB1-AS1': 'inh', 'DB1-AS4': 'inh', 'DB7-AS11': 'inh', 'DB7-AS10': 'inh', 'DB2-AS3': 'inh', 'DB5-AS8': 'inh'}
    Muscles:                        True

    Known BioParameters:
        BioParameter: cell_diameter = 5 (SRC: BlindGuess, certainty 0.1)
        BioParameter: muscle_length = 20 (SRC: BlindGuess, certainty 0.1)
        BioParameter: initial_memb_pot = -60 mV (SRC: BlindGuess, certainty 0.1)
        BioParameter: muscle_initial_memb_pot = -28 mV (SRC: BlindGuess, certainty 0.1)
        BioParameter: specific_capacitance = 5 uF_per_cm2 (SRC: BlindGuess, certainty 0.1)
        BioParameter: muscle_specific_capacitance = 1 uF_per_cm2 (SRC: BlindGuess, certainty 0.1)
        BioParameter: neuron_spike_thresh = -55 mV (SRC: BlindGuess, certainty 0.1)
        BioParameter: muscle_spike_thresh = -10 mV (SRC: BlindGuess, certainty 0.1)
        BioParameter: muscle_leak_cond_density = 0.0172 mS_per_cm2 (SRC: BlindGuess, certainty 0.1)
        BioParameter: neuron_leak_cond_density = 0.002 mS_per_cm2 (SRC: BlindGuess, certainty 0.1)
        BioParameter: leak_erev = -60 mV (SRC: BlindGuess, certainty 0.1)
        BioParameter: muscle_leak_erev = -13 mV (SRC: BlindGuess, certainty 0.1)
        BioParameter: muscle_k_slow_cond_density = 0.564 mS_per_cm2 (SRC: BlindGuess, certainty 0.1)
        BioParameter: neuron_k_slow_cond_density = 0.45833751019872582 mS_per_cm2 (SRC: BlindGuess, certainty 0.1)
        BioParameter: k_slow_erev = -60 mV (SRC: BlindGuess, certainty 0.1)
        BioParameter: muscle_k_slow_erev = -70 mV (SRC: BlindGuess, certainty 0.1)
        BioParameter: neuron_k_fast_cond_density = 0.042711643917483308 mS_per_cm2 (SRC: BlindGuess, certainty 0.1)
        BioParameter: k_fast_erev = -70 mV (SRC: BlindGuess, certainty 0.1)
        BioParameter: muscle_ca_boyle_cond_density = 0.284 mS_per_cm2 (SRC: BlindGuess, certainty 0.1)
        BioParameter: neuron_ca_boyle_cond_density = 1.812775772264702 mS_per_cm2 (SRC: BlindGuess, certainty 0.1)
        BioParameter: ca_boyle_erev = 10 mV (SRC: BlindGuess, certainty 0.1)
        BioParameter: muscle_ca_boyle_erev = 46 mV (SRC: BlindGuess, certainty 0.1)
        BioParameter: ca_conc_decay_time = 13.811870945509265 ms (SRC: BlindGuess, certainty 0.1)
        BioParameter: ca_conc_rho = 0.000238919 mol_per_m_per_A_per_s (SRC: BlindGuess, certainty 0.1)
        BioParameter: neuron_to_neuron_exc_syn_conductance = 0.49 nS (SRC: BlindGuess, certainty 0.1)
        BioParameter: neuron_to_muscle_exc_syn_conductance = 0.10 nS (SRC: BlindGuess, certainty 0.1)
        BioParameter: neuron_to_neuron_exc_syn_delta = 5 mV (SRC: BlindGuess, certainty 0.1)
        BioParameter: neuron_to_neuron_exc_syn_vth = 00 mV (SRC: BlindGuess, certainty 0.1)
        BioParameter: neuron_to_neuron_exc_syn_erev = -10 mV (SRC: BlindGuess, certainty 0.1)
        BioParameter: neuron_to_neuron_exc_syn_k = 0.5per_ms (SRC: BlindGuess, certainty 0.1)
        BioParameter: neuron_to_muscle_exc_syn_weight = 1 (SRC: BlindGuess, certainty 0.1)
        BioParameter: neuron_to_muscle_exc_syn_delta = 19 mV (SRC: BlindGuess, certainty 0.1)
        BioParameter: neuron_to_muscle_exc_syn_vth = 27 mV (SRC: BlindGuess, certainty 0.1)
        BioParameter: neuron_to_muscle_exc_syn_erev = 37 mV (SRC: BlindGuess, certainty 0.1)
        BioParameter: neuron_to_muscle_exc_syn_k = 1.205per_ms (SRC: BlindGuess, certainty 0.1)
        BioParameter: neuron_to_muscle_exc_syn_sigma = 0.5 per_mV (SRC: BlindGuess, certainty 0.1)
        BioParameter: neuron_to_muscle_exc_syn_mu = 5 mV (SRC: BlindGuess, certainty 0.1)
        BioParameter: neuron_to_neuron_inh_syn_conductance = 0.9 nS (SRC: Set with param_overrides, certainty 0)
        BioParameter: neuron_to_muscle_inh_syn_conductance = 0.007 nS (SRC: BlindGuess, certainty 0.1)
        BioParameter: neuron_to_neuron_inh_syn_delta = 5 mV (SRC: BlindGuess, certainty 0.1)
        BioParameter: neuron_to_neuron_inh_syn_vth = 0 mV (SRC: BlindGuess, certainty 0.1)
        BioParameter: neuron_to_neuron_inh_syn_erev = -70 mV (SRC: BlindGuess, certainty 0.1)
        BioParameter: neuron_to_neuron_inh_syn_k = 0.015per_ms (SRC: BlindGuess, certainty 0.1)
        BioParameter: neuron_to_muscle_inh_syn_delta = 5 mV (SRC: BlindGuess, certainty 0.1)
        BioParameter: neuron_to_muscle_inh_syn_vth = 0 mV (SRC: BlindGuess, certainty 0.1)
        BioParameter: neuron_to_muscle_inh_syn_erev = -50 mV (SRC: BlindGuess, certainty 0.1)
        BioParameter: neuron_to_muscle_inh_syn_k = 0.025per_ms (SRC: BlindGuess, certainty 0.1)
        BioParameter: neuron_to_neuron_elec_syn_weight = 1 (SRC: BlindGuess, certainty 0.1)
        BioParameter: neuron_to_neuron_elec_syn_gbase = 0.01252 nS (SRC: BlindGuess, certainty 0.1)
        BioParameter: neuron_to_muscle_elec_syn_gbase = 0.00152 nS (SRC: BlindGuess, certainty 0.1)
        BioParameter: muscle_to_muscle_elec_syn_gbase = 0 nS (SRC: BlindGuess, certainty 0.1)
        BioParameter: neuron_to_motor_delayed_elec_syn_weight = 1 (SRC: BlindGuess, certainty 0.1)
        BioParameter: neuron_to_motor_delayed_elec_syn_gbase = 0.01252 nS (SRC: BlindGuess, certainty 0.1)
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    -->

    <Target component="sim_c302_C2_AS_DA_DB" />

    <!-- Include core NeuroML2 ComponentType definitions -->

    <Include file="Cells.xml" />
    <Include file="Networks.xml" />
    <Include file="Simulation.xml" />

    <Include file="cell_C.xml" />

    <Include file="custom_muscle_components.xml" />

    <Include file="custom_synapses.xml" />

    <Include file="c302_C2_AS_DA_DB.nml" />

    <!-- End of NeuroML2 content -->

    <Simulation id="sim_c302_C2_AS_DA_DB" length="2000ms" step="0.05ms" target="c302_C2_AS_DA_DB">

        <Display id="neurons" title="c302_C2_AS_DA_DB: Membrane potential of a number of neurons" timeScale="1ms" xmin="-200.0" xmax="2200.0" ymin="-60" ymax="25">

            <Line id="AS1" quantity="AS1/0/GenericNeuronCell/v" scale="1mV" color="#f87100" timeScale="1ms" />
            <Line id="AS10" quantity="AS10/0/GenericNeuronCell/v" scale="1mV" color="#ac15c4" timeScale="1ms" />
            <Line id="AS11" quantity="AS11/0/GenericNeuronCell/v" scale="1mV" color="#58a09e" timeScale="1ms" />
            <Line id="AS2" quantity="AS2/0/GenericNeuronCell/v" scale="1mV" color="#007df7" timeScale="1ms" />
            <Line id="AS3" quantity="AS3/0/GenericNeuronCell/v" scale="1mV" color="#9a1694" timeScale="1ms" />
            <Line id="AS4" quantity="AS4/0/GenericNeuronCell/v" scale="1mV" color="#7b5b40" timeScale="1ms" />
            <Line id="AS5" quantity="AS5/0/GenericNeuronCell/v" scale="1mV" color="#008200" timeScale="1ms" />
            <Line id="AS6" quantity="AS6/0/GenericNeuronCell/v" scale="1mV" color="#00962a" timeScale="1ms" />
            <Line id="AS7" quantity="AS7/0/GenericNeuronCell/v" scale="1mV" color="#c6f524" timeScale="1ms" />
            <Line id="AS8" quantity="AS8/0/GenericNeuronCell/v" scale="1mV" color="#cf2d27" timeScale="1ms" />
            <Line id="AS9" quantity="AS9/0/GenericNeuronCell/v" scale="1mV" color="#006359" timeScale="1ms" />
            <Line id="AVAL" quantity="AVAL/0/GenericNeuronCell/v" scale="1mV" color="#c979d2" timeScale="1ms" />
            <Line id="AVAR" quantity="AVAR/0/GenericNeuronCell/v" scale="1mV" color="#d14b1f" timeScale="1ms" />
            <Line id="AVBL" quantity="AVBL/0/GenericNeuronCell/v" scale="1mV" color="#88d57c" timeScale="1ms" />
            <Line id="AVBR" quantity="AVBR/0/GenericNeuronCell/v" scale="1mV" color="#58b4d0" timeScale="1ms" />
            <Line id="DA1" quantity="DA1/0/GenericNeuronCell/v" scale="1mV" color="#27d8b9" timeScale="1ms" />
            <Line id="DA2" quantity="DA2/0/GenericNeuronCell/v" scale="1mV" color="#650049" timeScale="1ms" />
            <Line id="DA3" quantity="DA3/0/GenericNeuronCell/v" scale="1mV" color="#efb351" timeScale="1ms" />
            <Line id="DA4" quantity="DA4/0/GenericNeuronCell/v" scale="1mV" color="#126d33" timeScale="1ms" />
            <Line id="DA5" quantity="DA5/0/GenericNeuronCell/v" scale="1mV" color="#80d25c" timeScale="1ms" />
            <Line id="DA6" quantity="DA6/0/GenericNeuronCell/v" scale="1mV" color="#2c964d" timeScale="1ms" />
            <Line id="DA7" quantity="DA7/0/GenericNeuronCell/v" scale="1mV" color="#c68d55" timeScale="1ms" />
            <Line id="DA8" quantity="DA8/0/GenericNeuronCell/v" scale="1mV" color="#d81153" timeScale="1ms" />
            <Line id="DA9" quantity="DA9/0/GenericNeuronCell/v" scale="1mV" color="#c22637" timeScale="1ms" />
            <Line id="DB1" quantity="DB1/0/GenericNeuronCell/v" scale="1mV" color="#d361e0" timeScale="1ms" />
            <Line id="DB2" quantity="DB2/0/GenericNeuronCell/v" scale="1mV" color="#6cb0d9" timeScale="1ms" />
            <Line id="DB3" quantity="DB3/0/GenericNeuronCell/v" scale="1mV" color="#69dc47" timeScale="1ms" />
            <Line id="DB4" quantity="DB4/0/GenericNeuronCell/v" scale="1mV" color="#b89600" timeScale="1ms" />
            <Line id="DB5" quantity="DB5/0/GenericNeuronCell/v" scale="1mV" color="#2a4f12" timeScale="1ms" />
            <Line id="DB6" quantity="DB6/0/GenericNeuronCell/v" scale="1mV" color="#7b667a" timeScale="1ms" />
            <Line id="DB7" quantity="DB7/0/GenericNeuronCell/v" scale="1mV" color="#3485ee" timeScale="1ms" />

        </Display>

        <Display id="muscles" title="c302_C2_AS_DA_DB: Membrane potential of a number of muscles" timeScale="1ms" xmin="-200.0" xmax="2200.0" ymin="-60" ymax="25">

            <Line id="MDR01" quantity="MDR01/0/GenericMuscleCell/v" scale="1mV" color="#cdbaa9" timeScale="1ms" />
            <Line id="MDR02" quantity="MDR02/0/GenericMuscleCell/v" scale="1mV" color="#1023e8" timeScale="1ms" />
            <Line id="MDR03" quantity="MDR03/0/GenericMuscleCell/v" scale="1mV" color="#ff4cb0" timeScale="1ms" />
            <Line id="MDR04" quantity="MDR04/0/GenericMuscleCell/v" scale="1mV" color="#32d147" timeScale="1ms" />
            <Line id="MDR05" quantity="MDR05/0/GenericMuscleCell/v" scale="1mV" color="#555244" timeScale="1ms" />
            <Line id="MDR06" quantity="MDR06/0/GenericMuscleCell/v" scale="1mV" color="#d34223" timeScale="1ms" />
            <Line id="MDR07" quantity="MDR07/0/GenericMuscleCell/v" scale="1mV" color="#faabfe" timeScale="1ms" />
            <Line id="MDR08" quantity="MDR08/0/GenericMuscleCell/v" scale="1mV" color="#11c34e" timeScale="1ms" />
            <Line id="MDR09" quantity="MDR09/0/GenericMuscleCell/v" scale="1mV" color="#81a7d0" timeScale="1ms" />
            <Line id="MDR10" quantity="MDR10/0/GenericMuscleCell/v" scale="1mV" color="#2980f1" timeScale="1ms" />
            <Line id="MDR11" quantity="MDR11/0/GenericMuscleCell/v" scale="1mV" color="#9f25f3" timeScale="1ms" />
            <Line id="MDR12" quantity="MDR12/0/GenericMuscleCell/v" scale="1mV" color="#81c6db" timeScale="1ms" />
            <Line id="MDR13" quantity="MDR13/0/GenericMuscleCell/v" scale="1mV" color="#899972" timeScale="1ms" />
            <Line id="MDR14" quantity="MDR14/0/GenericMuscleCell/v" scale="1mV" color="#ade39b" timeScale="1ms" />
            <Line id="MDR15" quantity="MDR15/0/GenericMuscleCell/v" scale="1mV" color="#58f1b1" timeScale="1ms" />
            <Line id="MDR16" quantity="MDR16/0/GenericMuscleCell/v" scale="1mV" color="#73144b" timeScale="1ms" />
            <Line id="MDR17" quantity="MDR17/0/GenericMuscleCell/v" scale="1mV" color="#a7b2cc" timeScale="1ms" />
            <Line id="MDR18" quantity="MDR18/0/GenericMuscleCell/v" scale="1mV" color="#2ca436" timeScale="1ms" />
            <Line id="MDR19" quantity="MDR19/0/GenericMuscleCell/v" scale="1mV" color="#bb8022" timeScale="1ms" />
            <Line id="MDR20" quantity="MDR20/0/GenericMuscleCell/v" scale="1mV" color="#ea7899" timeScale="1ms" />
            <Line id="MDR21" quantity="MDR21/0/GenericMuscleCell/v" scale="1mV" color="#3c0050" timeScale="1ms" />
            <Line id="MDR22" quantity="MDR22/0/GenericMuscleCell/v" scale="1mV" color="#de8998" timeScale="1ms" />
            <Line id="MDR23" quantity="MDR23/0/GenericMuscleCell/v" scale="1mV" color="#eeb7a5" timeScale="1ms" />
            <Line id="MDR24" quantity="MDR24/0/GenericMuscleCell/v" scale="1mV" color="#f88b69" timeScale="1ms" />
            <Line id="MVR01" quantity="MVR01/0/GenericMuscleCell/v" scale="1mV" color="#2cf396" timeScale="1ms" />
            <Line id="MVR02" quantity="MVR02/0/GenericMuscleCell/v" scale="1mV" color="#96d484" timeScale="1ms" />
            <Line id="MVR03" quantity="MVR03/0/GenericMuscleCell/v" scale="1mV" color="#1aadda" timeScale="1ms" />
            <Line id="MVR04" quantity="MVR04/0/GenericMuscleCell/v" scale="1mV" color="#7d8c21" timeScale="1ms" />
            <Line id="MVR05" quantity="MVR05/0/GenericMuscleCell/v" scale="1mV" color="#56f5b6" timeScale="1ms" />
            <Line id="MVR06" quantity="MVR06/0/GenericMuscleCell/v" scale="1mV" color="#79efee" timeScale="1ms" />
            <Line id="MVR07" quantity="MVR07/0/GenericMuscleCell/v" scale="1mV" color="#8afe16" timeScale="1ms" />
            <Line id="MVR08" quantity="MVR08/0/GenericMuscleCell/v" scale="1mV" color="#61b233" timeScale="1ms" />
            <Line id="MVR09" quantity="MVR09/0/GenericMuscleCell/v" scale="1mV" color="#1900ae" timeScale="1ms" />
            <Line id="MVR10" quantity="MVR10/0/GenericMuscleCell/v" scale="1mV" color="#eeb7e7" timeScale="1ms" />
            <Line id="MVR11" quantity="MVR11/0/GenericMuscleCell/v" scale="1mV" color="#99ece9" timeScale="1ms" />
            <Line id="MVR12" quantity="MVR12/0/GenericMuscleCell/v" scale="1mV" color="#28ec31" timeScale="1ms" />
            <Line id="MVR13" quantity="MVR13/0/GenericMuscleCell/v" scale="1mV" color="#5645e4" timeScale="1ms" />
            <Line id="MVR14" quantity="MVR14/0/GenericMuscleCell/v" scale="1mV" color="#3f49f9" timeScale="1ms" />
            <Line id="MVR15" quantity="MVR15/0/GenericMuscleCell/v" scale="1mV" color="#f6ec5a" timeScale="1ms" />
            <Line id="MVR16" quantity="MVR16/0/GenericMuscleCell/v" scale="1mV" color="#8dc8b8" timeScale="1ms" />
            <Line id="MVR17" quantity="MVR17/0/GenericMuscleCell/v" scale="1mV" color="#a6b77c" timeScale="1ms" />
            <Line id="MVR18" quantity="MVR18/0/GenericMuscleCell/v" scale="1mV" color="#d554d2" timeScale="1ms" />
            <Line id="MVR19" quantity="MVR19/0/GenericMuscleCell/v" scale="1mV" color="#4dc5cd" timeScale="1ms" />
            <Line id="MVR20" quantity="MVR20/0/GenericMuscleCell/v" scale="1mV" color="#2d234d" timeScale="1ms" />
            <Line id="MVR21" quantity="MVR21/0/GenericMuscleCell/v" scale="1mV" color="#44ebf3" timeScale="1ms" />
            <Line id="MVR22" quantity="MVR22/0/GenericMuscleCell/v" scale="1mV" color="#2bcb3b" timeScale="1ms" />
            <Line id="MVR23" quantity="MVR23/0/GenericMuscleCell/v" scale="1mV" color="#d1d590" timeScale="1ms" />
            <Line id="MVL01" quantity="MVL01/0/GenericMuscleCell/v" scale="1mV" color="#902536" timeScale="1ms" />
            <Line id="MVL02" quantity="MVL02/0/GenericMuscleCell/v" scale="1mV" color="#855831" timeScale="1ms" />
            <Line id="MVL03" quantity="MVL03/0/GenericMuscleCell/v" scale="1mV" color="#5d71af" timeScale="1ms" />
            <Line id="MVL04" quantity="MVL04/0/GenericMuscleCell/v" scale="1mV" color="#f2a685" timeScale="1ms" />
            <Line id="MVL05" quantity="MVL05/0/GenericMuscleCell/v" scale="1mV" color="#904e97" timeScale="1ms" />
            <Line id="MVL06" quantity="MVL06/0/GenericMuscleCell/v" scale="1mV" color="#f992c3" timeScale="1ms" />
            <Line id="MVL07" quantity="MVL07/0/GenericMuscleCell/v" scale="1mV" color="#1c6adc" timeScale="1ms" />
            <Line id="MVL08" quantity="MVL08/0/GenericMuscleCell/v" scale="1mV" color="#cac03a" timeScale="1ms" />
            <Line id="MVL09" quantity="MVL09/0/GenericMuscleCell/v" scale="1mV" color="#ad0082" timeScale="1ms" />
            <Line id="MVL10" quantity="MVL10/0/GenericMuscleCell/v" scale="1mV" color="#00f300" timeScale="1ms" />
            <Line id="MVL11" quantity="MVL11/0/GenericMuscleCell/v" scale="1mV" color="#a094e5" timeScale="1ms" />
            <Line id="MVL12" quantity="MVL12/0/GenericMuscleCell/v" scale="1mV" color="#6bbe86" timeScale="1ms" />
            <Line id="MVL13" quantity="MVL13/0/GenericMuscleCell/v" scale="1mV" color="#f598ea" timeScale="1ms" />
            <Line id="MVL14" quantity="MVL14/0/GenericMuscleCell/v" scale="1mV" color="#9bec6d" timeScale="1ms" />
            <Line id="MVL15" quantity="MVL15/0/GenericMuscleCell/v" scale="1mV" color="#18e4d6" timeScale="1ms" />
            <Line id="MVL16" quantity="MVL16/0/GenericMuscleCell/v" scale="1mV" color="#879aa9" timeScale="1ms" />
            <Line id="MVL17" quantity="MVL17/0/GenericMuscleCell/v" scale="1mV" color="#1be755" timeScale="1ms" />
            <Line id="MVL18" quantity="MVL18/0/GenericMuscleCell/v" scale="1mV" color="#856551" timeScale="1ms" />
            <Line id="MVL19" quantity="MVL19/0/GenericMuscleCell/v" scale="1mV" color="#a454ba" timeScale="1ms" />
            <Line id="MVL20" quantity="MVL20/0/GenericMuscleCell/v" scale="1mV" color="#13ea73" timeScale="1ms" />
            <Line id="MVL21" quantity="MVL21/0/GenericMuscleCell/v" scale="1mV" color="#9c1baa" timeScale="1ms" />
            <Line id="MVL22" quantity="MVL22/0/GenericMuscleCell/v" scale="1mV" color="#44d5c1" timeScale="1ms" />
            <Line id="MVL23" quantity="MVL23/0/GenericMuscleCell/v" scale="1mV" color="#009356" timeScale="1ms" />
            <Line id="MVL24" quantity="MVL24/0/GenericMuscleCell/v" scale="1mV" color="#c6f0c7" timeScale="1ms" />
            <Line id="MDL01" quantity="MDL01/0/GenericMuscleCell/v" scale="1mV" color="#8f58ae" timeScale="1ms" />
            <Line id="MDL02" quantity="MDL02/0/GenericMuscleCell/v" scale="1mV" color="#753859" timeScale="1ms" />
            <Line id="MDL03" quantity="MDL03/0/GenericMuscleCell/v" scale="1mV" color="#00225c" timeScale="1ms" />
            <Line id="MDL04" quantity="MDL04/0/GenericMuscleCell/v" scale="1mV" color="#289e8f" timeScale="1ms" />
            <Line id="MDL05" quantity="MDL05/0/GenericMuscleCell/v" scale="1mV" color="#c0add7" timeScale="1ms" />
            <Line id="MDL06" quantity="MDL06/0/GenericMuscleCell/v" scale="1mV" color="#a093b6" timeScale="1ms" />
            <Line id="MDL07" quantity="MDL07/0/GenericMuscleCell/v" scale="1mV" color="#23807a" timeScale="1ms" />
            <Line id="MDL08" quantity="MDL08/0/GenericMuscleCell/v" scale="1mV" color="#2421ff" timeScale="1ms" />
            <Line id="MDL09" quantity="MDL09/0/GenericMuscleCell/v" scale="1mV" color="#504b27" timeScale="1ms" />
            <Line id="MDL10" quantity="MDL10/0/GenericMuscleCell/v" scale="1mV" color="#435e00" timeScale="1ms" />
            <Line id="MDL11" quantity="MDL11/0/GenericMuscleCell/v" scale="1mV" color="#00009d" timeScale="1ms" />
            <Line id="MDL12" quantity="MDL12/0/GenericMuscleCell/v" scale="1mV" color="#a7adce" timeScale="1ms" />
            <Line id="MDL13" quantity="MDL13/0/GenericMuscleCell/v" scale="1mV" color="#6af072" timeScale="1ms" />
            <Line id="MDL14" quantity="MDL14/0/GenericMuscleCell/v" scale="1mV" color="#5532f3" timeScale="1ms" />
            <Line id="MDL15" quantity="MDL15/0/GenericMuscleCell/v" scale="1mV" color="#6d63f1" timeScale="1ms" />
            <Line id="MDL16" quantity="MDL16/0/GenericMuscleCell/v" scale="1mV" color="#9c745c" timeScale="1ms" />
            <Line id="MDL17" quantity="MDL17/0/GenericMuscleCell/v" scale="1mV" color="#6074ec" timeScale="1ms" />
            <Line id="MDL18" quantity="MDL18/0/GenericMuscleCell/v" scale="1mV" color="#60ed69" timeScale="1ms" />
            <Line id="MDL19" quantity="MDL19/0/GenericMuscleCell/v" scale="1mV" color="#7150aa" timeScale="1ms" />
            <Line id="MDL20" quantity="MDL20/0/GenericMuscleCell/v" scale="1mV" color="#8f2d73" timeScale="1ms" />
            <Line id="MDL21" quantity="MDL21/0/GenericMuscleCell/v" scale="1mV" color="#757daa" timeScale="1ms" />
            <Line id="MDL22" quantity="MDL22/0/GenericMuscleCell/v" scale="1mV" color="#3622f1" timeScale="1ms" />
            <Line id="MDL23" quantity="MDL23/0/GenericMuscleCell/v" scale="1mV" color="#df5f4a" timeScale="1ms" />
            <Line id="MDL24" quantity="MDL24/0/GenericMuscleCell/v" scale="1mV" color="#f293c4" timeScale="1ms" />

        </Display>

        <Display id="activity_neurons" title="c302_C2_AS_DA_DB: Activity of a number of neurons" timeScale="1ms" xmin="-200.0" xmax="2200.0" ymin="-0.1" ymax="1.1">

            <Line id="AS1" quantity="AS1/0/GenericNeuronCell/caConc" scale="1" color="#eaf195" timeScale="1ms" />
            <Line id="AS10" quantity="AS10/0/GenericNeuronCell/caConc" scale="1" color="#3c00ca" timeScale="1ms" />
            <Line id="AS11" quantity="AS11/0/GenericNeuronCell/caConc" scale="1" color="#262f1d" timeScale="1ms" />
            <Line id="AS2" quantity="AS2/0/GenericNeuronCell/caConc" scale="1" color="#108b77" timeScale="1ms" />
            <Line id="AS3" quantity="AS3/0/GenericNeuronCell/caConc" scale="1" color="#458fa5" timeScale="1ms" />
            <Line id="AS4" quantity="AS4/0/GenericNeuronCell/caConc" scale="1" color="#ef7488" timeScale="1ms" />
            <Line id="AS5" quantity="AS5/0/GenericNeuronCell/caConc" scale="1" color="#247960" timeScale="1ms" />
            <Line id="AS6" quantity="AS6/0/GenericNeuronCell/caConc" scale="1" color="#8f25f0" timeScale="1ms" />
            <Line id="AS7" quantity="AS7/0/GenericNeuronCell/caConc" scale="1" color="#4e0047" timeScale="1ms" />
            <Line id="AS8" quantity="AS8/0/GenericNeuronCell/caConc" scale="1" color="#f527d6" timeScale="1ms" />
            <Line id="AS9" quantity="AS9/0/GenericNeuronCell/caConc" scale="1" color="#57d17a" timeScale="1ms" />
            <Line id="AVAL" quantity="AVAL/0/GenericNeuronCell/caConc" scale="1" color="#e270c8" timeScale="1ms" />
            <Line id="AVAR" quantity="AVAR/0/GenericNeuronCell/caConc" scale="1" color="#2f701e" timeScale="1ms" />
            <Line id="AVBL" quantity="AVBL/0/GenericNeuronCell/caConc" scale="1" color="#d2a8a4" timeScale="1ms" />
            <Line id="AVBR" quantity="AVBR/0/GenericNeuronCell/caConc" scale="1" color="#28e945" timeScale="1ms" />
            <Line id="DA1" quantity="DA1/0/GenericNeuronCell/caConc" scale="1" color="#cb7212" timeScale="1ms" />
            <Line id="DA2" quantity="DA2/0/GenericNeuronCell/caConc" scale="1" color="#008216" timeScale="1ms" />
            <Line id="DA3" quantity="DA3/0/GenericNeuronCell/caConc" scale="1" color="#f21142" timeScale="1ms" />
            <Line id="DA4" quantity="DA4/0/GenericNeuronCell/caConc" scale="1" color="#65b5e4" timeScale="1ms" />
            <Line id="DA5" quantity="DA5/0/GenericNeuronCell/caConc" scale="1" color="#dc84b4" timeScale="1ms" />
            <Line id="DA6" quantity="DA6/0/GenericNeuronCell/caConc" scale="1" color="#d08980" timeScale="1ms" />
            <Line id="DA7" quantity="DA7/0/GenericNeuronCell/caConc" scale="1" color="#21a0ed" timeScale="1ms" />
            <Line id="DA8" quantity="DA8/0/GenericNeuronCell/caConc" scale="1" color="#00ada4" timeScale="1ms" />
            <Line id="DA9" quantity="DA9/0/GenericNeuronCell/caConc" scale="1" color="#6fbd35" timeScale="1ms" />
            <Line id="DB1" quantity="DB1/0/GenericNeuronCell/caConc" scale="1" color="#f68aec" timeScale="1ms" />
            <Line id="DB2" quantity="DB2/0/GenericNeuronCell/caConc" scale="1" color="#d71742" timeScale="1ms" />
            <Line id="DB3" quantity="DB3/0/GenericNeuronCell/caConc" scale="1" color="#1d6036" timeScale="1ms" />
            <Line id="DB4" quantity="DB4/0/GenericNeuronCell/caConc" scale="1" color="#e171c7" timeScale="1ms" />
            <Line id="DB5" quantity="DB5/0/GenericNeuronCell/caConc" scale="1" color="#656eaf" timeScale="1ms" />
            <Line id="DB6" quantity="DB6/0/GenericNeuronCell/caConc" scale="1" color="#485e9a" timeScale="1ms" />
            <Line id="DB7" quantity="DB7/0/GenericNeuronCell/caConc" scale="1" color="#75aba9" timeScale="1ms" />

        </Display>

        <Display id="activity_muscles" title="c302_C2_AS_DA_DB: Activity of a number of muscles" timeScale="1ms" xmin="-200.0" xmax="2200.0" ymin="-0.1" ymax="1.1">

            <Line id="MDR01" quantity="MDR01/0/GenericMuscleCell/caConc" scale="1" color="#1a5ecc" timeScale="1ms" />
            <Line id="MDR02" quantity="MDR02/0/GenericMuscleCell/caConc" scale="1" color="#97fbc1" timeScale="1ms" />
            <Line id="MDR03" quantity="MDR03/0/GenericMuscleCell/caConc" scale="1" color="#54f34b" timeScale="1ms" />
            <Line id="MDR04" quantity="MDR04/0/GenericMuscleCell/caConc" scale="1" color="#899a57" timeScale="1ms" />
            <Line id="MDR05" quantity="MDR05/0/GenericMuscleCell/caConc" scale="1" color="#c3978c" timeScale="1ms" />
            <Line id="MDR06" quantity="MDR06/0/GenericMuscleCell/caConc" scale="1" color="#0000fe" timeScale="1ms" />
            <Line id="MDR07" quantity="MDR07/0/GenericMuscleCell/caConc" scale="1" color="#846f84" timeScale="1ms" />
            <Line id="MDR08" quantity="MDR08/0/GenericMuscleCell/caConc" scale="1" color="#b3e938" timeScale="1ms" />
            <Line id="MDR09" quantity="MDR09/0/GenericMuscleCell/caConc" scale="1" color="#af5590" timeScale="1ms" />
            <Line id="MDR10" quantity="MDR10/0/GenericMuscleCell/caConc" scale="1" color="#f42388" timeScale="1ms" />
            <Line id="MDR11" quantity="MDR11/0/GenericMuscleCell/caConc" scale="1" color="#3e2a82" timeScale="1ms" />
            <Line id="MDR12" quantity="MDR12/0/GenericMuscleCell/caConc" scale="1" color="#53b690" timeScale="1ms" />
            <Line id="MDR13" quantity="MDR13/0/GenericMuscleCell/caConc" scale="1" color="#5feec4" timeScale="1ms" />
            <Line id="MDR14" quantity="MDR14/0/GenericMuscleCell/caConc" scale="1" color="#123ace" timeScale="1ms" />
            <Line id="MDR15" quantity="MDR15/0/GenericMuscleCell/caConc" scale="1" color="#617e00" timeScale="1ms" />
            <Line id="MDR16" quantity="MDR16/0/GenericMuscleCell/caConc" scale="1" color="#ee26ad" timeScale="1ms" />
            <Line id="MDR17" quantity="MDR17/0/GenericMuscleCell/caConc" scale="1" color="#de5b5f" timeScale="1ms" />
            <Line id="MDR18" quantity="MDR18/0/GenericMuscleCell/caConc" scale="1" color="#32fe9f" timeScale="1ms" />
            <Line id="MDR19" quantity="MDR19/0/GenericMuscleCell/caConc" scale="1" color="#e9a700" timeScale="1ms" />
            <Line id="MDR20" quantity="MDR20/0/GenericMuscleCell/caConc" scale="1" color="#5f65c8" timeScale="1ms" />
            <Line id="MDR21" quantity="MDR21/0/GenericMuscleCell/caConc" scale="1" color="#fd1e9a" timeScale="1ms" />
            <Line id="MDR22" quantity="MDR22/0/GenericMuscleCell/caConc" scale="1" color="#8a525d" timeScale="1ms" />
            <Line id="MDR23" quantity="MDR23/0/GenericMuscleCell/caConc" scale="1" color="#75eae1" timeScale="1ms" />
            <Line id="MDR24" quantity="MDR24/0/GenericMuscleCell/caConc" scale="1" color="#3146de" timeScale="1ms" />
            <Line id="MVR01" quantity="MVR01/0/GenericMuscleCell/caConc" scale="1" color="#d988c1" timeScale="1ms" />
            <Line id="MVR02" quantity="MVR02/0/GenericMuscleCell/caConc" scale="1" color="#bace5f" timeScale="1ms" />
            <Line id="MVR03" quantity="MVR03/0/GenericMuscleCell/caConc" scale="1" color="#d620c9" timeScale="1ms" />
            <Line id="MVR04" quantity="MVR04/0/GenericMuscleCell/caConc" scale="1" color="#c53db3" timeScale="1ms" />
            <Line id="MVR05" quantity="MVR05/0/GenericMuscleCell/caConc" scale="1" color="#5b8c30" timeScale="1ms" />
            <Line id="MVR06" quantity="MVR06/0/GenericMuscleCell/caConc" scale="1" color="#527186" timeScale="1ms" />
            <Line id="MVR07" quantity="MVR07/0/GenericMuscleCell/caConc" scale="1" color="#329c56" timeScale="1ms" />
            <Line id="MVR08" quantity="MVR08/0/GenericMuscleCell/caConc" scale="1" color="#00f951" timeScale="1ms" />
            <Line id="MVR09" quantity="MVR09/0/GenericMuscleCell/caConc" scale="1" color="#6c57fb" timeScale="1ms" />
            <Line id="MVR10" quantity="MVR10/0/GenericMuscleCell/caConc" scale="1" color="#2af900" timeScale="1ms" />
            <Line id="MVR11" quantity="MVR11/0/GenericMuscleCell/caConc" scale="1" color="#b4ed9c" timeScale="1ms" />
            <Line id="MVR12" quantity="MVR12/0/GenericMuscleCell/caConc" scale="1" color="#747280" timeScale="1ms" />
            <Line id="MVR13" quantity="MVR13/0/GenericMuscleCell/caConc" scale="1" color="#64b07e" timeScale="1ms" />
            <Line id="MVR14" quantity="MVR14/0/GenericMuscleCell/caConc" scale="1" color="#e8283b" timeScale="1ms" />
            <Line id="MVR15" quantity="MVR15/0/GenericMuscleCell/caConc" scale="1" color="#8b6e72" timeScale="1ms" />
            <Line id="MVR16" quantity="MVR16/0/GenericMuscleCell/caConc" scale="1" color="#b8123e" timeScale="1ms" />
            <Line id="MVR17" quantity="MVR17/0/GenericMuscleCell/caConc" scale="1" color="#c8f5b1" timeScale="1ms" />
            <Line id="MVR18" quantity="MVR18/0/GenericMuscleCell/caConc" scale="1" color="#85cfaf" timeScale="1ms" />
            <Line id="MVR19" quantity="MVR19/0/GenericMuscleCell/caConc" scale="1" color="#802460" timeScale="1ms" />
            <Line id="MVR20" quantity="MVR20/0/GenericMuscleCell/caConc" scale="1" color="#7dcd9a" timeScale="1ms" />
            <Line id="MVR21" quantity="MVR21/0/GenericMuscleCell/caConc" scale="1" color="#dc79e0" timeScale="1ms" />
            <Line id="MVR22" quantity="MVR22/0/GenericMuscleCell/caConc" scale="1" color="#4011d4" timeScale="1ms" />
            <Line id="MVR23" quantity="MVR23/0/GenericMuscleCell/caConc" scale="1" color="#256537" timeScale="1ms" />
            <Line id="MVL01" quantity="MVL01/0/GenericMuscleCell/caConc" scale="1" color="#ba9eae" timeScale="1ms" />
            <Line id="MVL02" quantity="MVL02/0/GenericMuscleCell/caConc" scale="1" color="#398e00" timeScale="1ms" />
            <Line id="MVL03" quantity="MVL03/0/GenericMuscleCell/caConc" scale="1" color="#006c6c" timeScale="1ms" />
            <Line id="MVL04" quantity="MVL04/0/GenericMuscleCell/caConc" scale="1" color="#c2c6c8" timeScale="1ms" />
            <Line id="MVL05" quantity="MVL05/0/GenericMuscleCell/caConc" scale="1" color="#00b31f" timeScale="1ms" />
            <Line id="MVL06" quantity="MVL06/0/GenericMuscleCell/caConc" scale="1" color="#65356e" timeScale="1ms" />
            <Line id="MVL07" quantity="MVL07/0/GenericMuscleCell/caConc" scale="1" color="#9ceab9" timeScale="1ms" />
            <Line id="MVL08" quantity="MVL08/0/GenericMuscleCell/caConc" scale="1" color="#106120" timeScale="1ms" />
            <Line id="MVL09" quantity="MVL09/0/GenericMuscleCell/caConc" scale="1" color="#cdbb00" timeScale="1ms" />
            <Line id="MVL10" quantity="MVL10/0/GenericMuscleCell/caConc" scale="1" color="#c1e23b" timeScale="1ms" />
            <Line id="MVL11" quantity="MVL11/0/GenericMuscleCell/caConc" scale="1" color="#3e7543" timeScale="1ms" />
            <Line id="MVL12" quantity="MVL12/0/GenericMuscleCell/caConc" scale="1" color="#004ba8" timeScale="1ms" />
            <Line id="MVL13" quantity="MVL13/0/GenericMuscleCell/caConc" scale="1" color="#b4a7a1" timeScale="1ms" />
            <Line id="MVL14" quantity="MVL14/0/GenericMuscleCell/caConc" scale="1" color="#6f5749" timeScale="1ms" />
            <Line id="MVL15" quantity="MVL15/0/GenericMuscleCell/caConc" scale="1" color="#bc9256" timeScale="1ms" />
            <Line id="MVL16" quantity="MVL16/0/GenericMuscleCell/caConc" scale="1" color="#68712e" timeScale="1ms" />
            <Line id="MVL17" quantity="MVL17/0/GenericMuscleCell/caConc" scale="1" color="#97fa30" timeScale="1ms" />
            <Line id="MVL18" quantity="MVL18/0/GenericMuscleCell/caConc" scale="1" color="#83a3f3" timeScale="1ms" />
            <Line id="MVL19" quantity="MVL19/0/GenericMuscleCell/caConc" scale="1" color="#9d43df" timeScale="1ms" />
            <Line id="MVL20" quantity="MVL20/0/GenericMuscleCell/caConc" scale="1" color="#9d0000" timeScale="1ms" />
            <Line id="MVL21" quantity="MVL21/0/GenericMuscleCell/caConc" scale="1" color="#b42e93" timeScale="1ms" />
            <Line id="MVL22" quantity="MVL22/0/GenericMuscleCell/caConc" scale="1" color="#d24ff0" timeScale="1ms" />
            <Line id="MVL23" quantity="MVL23/0/GenericMuscleCell/caConc" scale="1" color="#8bbd16" timeScale="1ms" />
            <Line id="MVL24" quantity="MVL24/0/GenericMuscleCell/caConc" scale="1" color="#0015d8" timeScale="1ms" />
            <Line id="MDL01" quantity="MDL01/0/GenericMuscleCell/caConc" scale="1" color="#d19c00" timeScale="1ms" />
            <Line id="MDL02" quantity="MDL02/0/GenericMuscleCell/caConc" scale="1" color="#5663b2" timeScale="1ms" />
            <Line id="MDL03" quantity="MDL03/0/GenericMuscleCell/caConc" scale="1" color="#bf1844" timeScale="1ms" />
            <Line id="MDL04" quantity="MDL04/0/GenericMuscleCell/caConc" scale="1" color="#7e15ca" timeScale="1ms" />
            <Line id="MDL05" quantity="MDL05/0/GenericMuscleCell/caConc" scale="1" color="#6c508b" timeScale="1ms" />
            <Line id="MDL06" quantity="MDL06/0/GenericMuscleCell/caConc" scale="1" color="#2c6f80" timeScale="1ms" />
            <Line id="MDL07" quantity="MDL07/0/GenericMuscleCell/caConc" scale="1" color="#934e47" timeScale="1ms" />
            <Line id="MDL08" quantity="MDL08/0/GenericMuscleCell/caConc" scale="1" color="#aaff43" timeScale="1ms" />
            <Line id="MDL09" quantity="MDL09/0/GenericMuscleCell/caConc" scale="1" color="#a2f775" timeScale="1ms" />
            <Line id="MDL10" quantity="MDL10/0/GenericMuscleCell/caConc" scale="1" color="#59cab4" timeScale="1ms" />
            <Line id="MDL11" quantity="MDL11/0/GenericMuscleCell/caConc" scale="1" color="#30d4fa" timeScale="1ms" />
            <Line id="MDL12" quantity="MDL12/0/GenericMuscleCell/caConc" scale="1" color="#51ede9" timeScale="1ms" />
            <Line id="MDL13" quantity="MDL13/0/GenericMuscleCell/caConc" scale="1" color="#85f6a2" timeScale="1ms" />
            <Line id="MDL14" quantity="MDL14/0/GenericMuscleCell/caConc" scale="1" color="#51675d" timeScale="1ms" />
            <Line id="MDL15" quantity="MDL15/0/GenericMuscleCell/caConc" scale="1" color="#ad42ef" timeScale="1ms" />
            <Line id="MDL16" quantity="MDL16/0/GenericMuscleCell/caConc" scale="1" color="#82f02f" timeScale="1ms" />
            <Line id="MDL17" quantity="MDL17/0/GenericMuscleCell/caConc" scale="1" color="#d6c822" timeScale="1ms" />
            <Line id="MDL18" quantity="MDL18/0/GenericMuscleCell/caConc" scale="1" color="#9c4153" timeScale="1ms" />
            <Line id="MDL19" quantity="MDL19/0/GenericMuscleCell/caConc" scale="1" color="#a0d0b9" timeScale="1ms" />
            <Line id="MDL20" quantity="MDL20/0/GenericMuscleCell/caConc" scale="1" color="#c3732a" timeScale="1ms" />
            <Line id="MDL21" quantity="MDL21/0/GenericMuscleCell/caConc" scale="1" color="#d9004d" timeScale="1ms" />
            <Line id="MDL22" quantity="MDL22/0/GenericMuscleCell/caConc" scale="1" color="#9430fb" timeScale="1ms" />
            <Line id="MDL23" quantity="MDL23/0/GenericMuscleCell/caConc" scale="1" color="#946f78" timeScale="1ms" />
            <Line id="MDL24" quantity="MDL24/0/GenericMuscleCell/caConc" scale="1" color="#f618ff" timeScale="1ms" />

        </Display>

        <OutputFile id="neurons_v" fileName="c302_C2_AS_DA_DB.dat">
            <OutputColumn id="AS1_v" quantity="AS1/0/GenericNeuronCell/v"/>
            <OutputColumn id="AS10_v" quantity="AS10/0/GenericNeuronCell/v"/>
            <OutputColumn id="AS11_v" quantity="AS11/0/GenericNeuronCell/v"/>
            <OutputColumn id="AS2_v" quantity="AS2/0/GenericNeuronCell/v"/>
            <OutputColumn id="AS3_v" quantity="AS3/0/GenericNeuronCell/v"/>
            <OutputColumn id="AS4_v" quantity="AS4/0/GenericNeuronCell/v"/>
            <OutputColumn id="AS5_v" quantity="AS5/0/GenericNeuronCell/v"/>
            <OutputColumn id="AS6_v" quantity="AS6/0/GenericNeuronCell/v"/>
            <OutputColumn id="AS7_v" quantity="AS7/0/GenericNeuronCell/v"/>
            <OutputColumn id="AS8_v" quantity="AS8/0/GenericNeuronCell/v"/>
            <OutputColumn id="AS9_v" quantity="AS9/0/GenericNeuronCell/v"/>
            <OutputColumn id="AVAL_v" quantity="AVAL/0/GenericNeuronCell/v"/>
            <OutputColumn id="AVAR_v" quantity="AVAR/0/GenericNeuronCell/v"/>
            <OutputColumn id="AVBL_v" quantity="AVBL/0/GenericNeuronCell/v"/>
            <OutputColumn id="AVBR_v" quantity="AVBR/0/GenericNeuronCell/v"/>
            <OutputColumn id="DA1_v" quantity="DA1/0/GenericNeuronCell/v"/>
            <OutputColumn id="DA2_v" quantity="DA2/0/GenericNeuronCell/v"/>
            <OutputColumn id="DA3_v" quantity="DA3/0/GenericNeuronCell/v"/>
            <OutputColumn id="DA4_v" quantity="DA4/0/GenericNeuronCell/v"/>
            <OutputColumn id="DA5_v" quantity="DA5/0/GenericNeuronCell/v"/>
            <OutputColumn id="DA6_v" quantity="DA6/0/GenericNeuronCell/v"/>
            <OutputColumn id="DA7_v" quantity="DA7/0/GenericNeuronCell/v"/>
            <OutputColumn id="DA8_v" quantity="DA8/0/GenericNeuronCell/v"/>
            <OutputColumn id="DA9_v" quantity="DA9/0/GenericNeuronCell/v"/>
            <OutputColumn id="DB1_v" quantity="DB1/0/GenericNeuronCell/v"/>
            <OutputColumn id="DB2_v" quantity="DB2/0/GenericNeuronCell/v"/>
            <OutputColumn id="DB3_v" quantity="DB3/0/GenericNeuronCell/v"/>
            <OutputColumn id="DB4_v" quantity="DB4/0/GenericNeuronCell/v"/>
            <OutputColumn id="DB5_v" quantity="DB5/0/GenericNeuronCell/v"/>
            <OutputColumn id="DB6_v" quantity="DB6/0/GenericNeuronCell/v"/>
            <OutputColumn id="DB7_v" quantity="DB7/0/GenericNeuronCell/v"/>
        </OutputFile>

        <OutputFile id="neurons_activity" fileName="c302_C2_AS_DA_DB.activity.dat">
            <OutputColumn id="AS1_v" quantity="AS1/0/GenericNeuronCell/caConc"/>
            <OutputColumn id="AS10_v" quantity="AS10/0/GenericNeuronCell/caConc"/>
            <OutputColumn id="AS11_v" quantity="AS11/0/GenericNeuronCell/caConc"/>
            <OutputColumn id="AS2_v" quantity="AS2/0/GenericNeuronCell/caConc"/>
            <OutputColumn id="AS3_v" quantity="AS3/0/GenericNeuronCell/caConc"/>
            <OutputColumn id="AS4_v" quantity="AS4/0/GenericNeuronCell/caConc"/>
            <OutputColumn id="AS5_v" quantity="AS5/0/GenericNeuronCell/caConc"/>
            <OutputColumn id="AS6_v" quantity="AS6/0/GenericNeuronCell/caConc"/>
            <OutputColumn id="AS7_v" quantity="AS7/0/GenericNeuronCell/caConc"/>
            <OutputColumn id="AS8_v" quantity="AS8/0/GenericNeuronCell/caConc"/>
            <OutputColumn id="AS9_v" quantity="AS9/0/GenericNeuronCell/caConc"/>
            <OutputColumn id="AVAL_v" quantity="AVAL/0/GenericNeuronCell/caConc"/>
            <OutputColumn id="AVAR_v" quantity="AVAR/0/GenericNeuronCell/caConc"/>
            <OutputColumn id="AVBL_v" quantity="AVBL/0/GenericNeuronCell/caConc"/>
            <OutputColumn id="AVBR_v" quantity="AVBR/0/GenericNeuronCell/caConc"/>
            <OutputColumn id="DA1_v" quantity="DA1/0/GenericNeuronCell/caConc"/>
            <OutputColumn id="DA2_v" quantity="DA2/0/GenericNeuronCell/caConc"/>
            <OutputColumn id="DA3_v" quantity="DA3/0/GenericNeuronCell/caConc"/>
            <OutputColumn id="DA4_v" quantity="DA4/0/GenericNeuronCell/caConc"/>
            <OutputColumn id="DA5_v" quantity="DA5/0/GenericNeuronCell/caConc"/>
            <OutputColumn id="DA6_v" quantity="DA6/0/GenericNeuronCell/caConc"/>
            <OutputColumn id="DA7_v" quantity="DA7/0/GenericNeuronCell/caConc"/>
            <OutputColumn id="DA8_v" quantity="DA8/0/GenericNeuronCell/caConc"/>
            <OutputColumn id="DA9_v" quantity="DA9/0/GenericNeuronCell/caConc"/>
            <OutputColumn id="DB1_v" quantity="DB1/0/GenericNeuronCell/caConc"/>
            <OutputColumn id="DB2_v" quantity="DB2/0/GenericNeuronCell/caConc"/>
            <OutputColumn id="DB3_v" quantity="DB3/0/GenericNeuronCell/caConc"/>
            <OutputColumn id="DB4_v" quantity="DB4/0/GenericNeuronCell/caConc"/>
            <OutputColumn id="DB5_v" quantity="DB5/0/GenericNeuronCell/caConc"/>
            <OutputColumn id="DB6_v" quantity="DB6/0/GenericNeuronCell/caConc"/>
            <OutputColumn id="DB7_v" quantity="DB7/0/GenericNeuronCell/caConc"/>
        </OutputFile>
        <OutputFile id="muscles_v" fileName="c302_C2_AS_DA_DB.muscles.dat">
            <OutputColumn id="MDR01_v" quantity="MDR01/0/GenericMuscleCell/v"/>
            <OutputColumn id="MDR02_v" quantity="MDR02/0/GenericMuscleCell/v"/>
            <OutputColumn id="MDR03_v" quantity="MDR03/0/GenericMuscleCell/v"/>
            <OutputColumn id="MDR04_v" quantity="MDR04/0/GenericMuscleCell/v"/>
            <OutputColumn id="MDR05_v" quantity="MDR05/0/GenericMuscleCell/v"/>
            <OutputColumn id="MDR06_v" quantity="MDR06/0/GenericMuscleCell/v"/>
            <OutputColumn id="MDR07_v" quantity="MDR07/0/GenericMuscleCell/v"/>
            <OutputColumn id="MDR08_v" quantity="MDR08/0/GenericMuscleCell/v"/>
            <OutputColumn id="MDR09_v" quantity="MDR09/0/GenericMuscleCell/v"/>
            <OutputColumn id="MDR10_v" quantity="MDR10/0/GenericMuscleCell/v"/>
            <OutputColumn id="MDR11_v" quantity="MDR11/0/GenericMuscleCell/v"/>
            <OutputColumn id="MDR12_v" quantity="MDR12/0/GenericMuscleCell/v"/>
            <OutputColumn id="MDR13_v" quantity="MDR13/0/GenericMuscleCell/v"/>
            <OutputColumn id="MDR14_v" quantity="MDR14/0/GenericMuscleCell/v"/>
            <OutputColumn id="MDR15_v" quantity="MDR15/0/GenericMuscleCell/v"/>
            <OutputColumn id="MDR16_v" quantity="MDR16/0/GenericMuscleCell/v"/>
            <OutputColumn id="MDR17_v" quantity="MDR17/0/GenericMuscleCell/v"/>
            <OutputColumn id="MDR18_v" quantity="MDR18/0/GenericMuscleCell/v"/>
            <OutputColumn id="MDR19_v" quantity="MDR19/0/GenericMuscleCell/v"/>
            <OutputColumn id="MDR20_v" quantity="MDR20/0/GenericMuscleCell/v"/>
            <OutputColumn id="MDR21_v" quantity="MDR21/0/GenericMuscleCell/v"/>
            <OutputColumn id="MDR22_v" quantity="MDR22/0/GenericMuscleCell/v"/>
            <OutputColumn id="MDR23_v" quantity="MDR23/0/GenericMuscleCell/v"/>
            <OutputColumn id="MDR24_v" quantity="MDR24/0/GenericMuscleCell/v"/>
            <OutputColumn id="MVR01_v" quantity="MVR01/0/GenericMuscleCell/v"/>
            <OutputColumn id="MVR02_v" quantity="MVR02/0/GenericMuscleCell/v"/>
            <OutputColumn id="MVR03_v" quantity="MVR03/0/GenericMuscleCell/v"/>
            <OutputColumn id="MVR04_v" quantity="MVR04/0/GenericMuscleCell/v"/>
            <OutputColumn id="MVR05_v" quantity="MVR05/0/GenericMuscleCell/v"/>
            <OutputColumn id="MVR06_v" quantity="MVR06/0/GenericMuscleCell/v"/>
            <OutputColumn id="MVR07_v" quantity="MVR07/0/GenericMuscleCell/v"/>
            <OutputColumn id="MVR08_v" quantity="MVR08/0/GenericMuscleCell/v"/>
            <OutputColumn id="MVR09_v" quantity="MVR09/0/GenericMuscleCell/v"/>
            <OutputColumn id="MVR10_v" quantity="MVR10/0/GenericMuscleCell/v"/>
            <OutputColumn id="MVR11_v" quantity="MVR11/0/GenericMuscleCell/v"/>
            <OutputColumn id="MVR12_v" quantity="MVR12/0/GenericMuscleCell/v"/>
            <OutputColumn id="MVR13_v" quantity="MVR13/0/GenericMuscleCell/v"/>
            <OutputColumn id="MVR14_v" quantity="MVR14/0/GenericMuscleCell/v"/>
            <OutputColumn id="MVR15_v" quantity="MVR15/0/GenericMuscleCell/v"/>
            <OutputColumn id="MVR16_v" quantity="MVR16/0/GenericMuscleCell/v"/>
            <OutputColumn id="MVR17_v" quantity="MVR17/0/GenericMuscleCell/v"/>
            <OutputColumn id="MVR18_v" quantity="MVR18/0/GenericMuscleCell/v"/>
            <OutputColumn id="MVR19_v" quantity="MVR19/0/GenericMuscleCell/v"/>
            <OutputColumn id="MVR20_v" quantity="MVR20/0/GenericMuscleCell/v"/>
            <OutputColumn id="MVR21_v" quantity="MVR21/0/GenericMuscleCell/v"/>
            <OutputColumn id="MVR22_v" quantity="MVR22/0/GenericMuscleCell/v"/>
            <OutputColumn id="MVR23_v" quantity="MVR23/0/GenericMuscleCell/v"/>
            <OutputColumn id="MVL01_v" quantity="MVL01/0/GenericMuscleCell/v"/>
            <OutputColumn id="MVL02_v" quantity="MVL02/0/GenericMuscleCell/v"/>
            <OutputColumn id="MVL03_v" quantity="MVL03/0/GenericMuscleCell/v"/>
            <OutputColumn id="MVL04_v" quantity="MVL04/0/GenericMuscleCell/v"/>
            <OutputColumn id="MVL05_v" quantity="MVL05/0/GenericMuscleCell/v"/>
            <OutputColumn id="MVL06_v" quantity="MVL06/0/GenericMuscleCell/v"/>
            <OutputColumn id="MVL07_v" quantity="MVL07/0/GenericMuscleCell/v"/>
            <OutputColumn id="MVL08_v" quantity="MVL08/0/GenericMuscleCell/v"/>
            <OutputColumn id="MVL09_v" quantity="MVL09/0/GenericMuscleCell/v"/>
            <OutputColumn id="MVL10_v" quantity="MVL10/0/GenericMuscleCell/v"/>
            <OutputColumn id="MVL11_v" quantity="MVL11/0/GenericMuscleCell/v"/>
            <OutputColumn id="MVL12_v" quantity="MVL12/0/GenericMuscleCell/v"/>
            <OutputColumn id="MVL13_v" quantity="MVL13/0/GenericMuscleCell/v"/>
            <OutputColumn id="MVL14_v" quantity="MVL14/0/GenericMuscleCell/v"/>
            <OutputColumn id="MVL15_v" quantity="MVL15/0/GenericMuscleCell/v"/>
            <OutputColumn id="MVL16_v" quantity="MVL16/0/GenericMuscleCell/v"/>
            <OutputColumn id="MVL17_v" quantity="MVL17/0/GenericMuscleCell/v"/>
            <OutputColumn id="MVL18_v" quantity="MVL18/0/GenericMuscleCell/v"/>
            <OutputColumn id="MVL19_v" quantity="MVL19/0/GenericMuscleCell/v"/>
            <OutputColumn id="MVL20_v" quantity="MVL20/0/GenericMuscleCell/v"/>
            <OutputColumn id="MVL21_v" quantity="MVL21/0/GenericMuscleCell/v"/>
            <OutputColumn id="MVL22_v" quantity="MVL22/0/GenericMuscleCell/v"/>
            <OutputColumn id="MVL23_v" quantity="MVL23/0/GenericMuscleCell/v"/>
            <OutputColumn id="MVL24_v" quantity="MVL24/0/GenericMuscleCell/v"/>
            <OutputColumn id="MDL01_v" quantity="MDL01/0/GenericMuscleCell/v"/>
            <OutputColumn id="MDL02_v" quantity="MDL02/0/GenericMuscleCell/v"/>
            <OutputColumn id="MDL03_v" quantity="MDL03/0/GenericMuscleCell/v"/>
            <OutputColumn id="MDL04_v" quantity="MDL04/0/GenericMuscleCell/v"/>
            <OutputColumn id="MDL05_v" quantity="MDL05/0/GenericMuscleCell/v"/>
            <OutputColumn id="MDL06_v" quantity="MDL06/0/GenericMuscleCell/v"/>
            <OutputColumn id="MDL07_v" quantity="MDL07/0/GenericMuscleCell/v"/>
            <OutputColumn id="MDL08_v" quantity="MDL08/0/GenericMuscleCell/v"/>
            <OutputColumn id="MDL09_v" quantity="MDL09/0/GenericMuscleCell/v"/>
            <OutputColumn id="MDL10_v" quantity="MDL10/0/GenericMuscleCell/v"/>
            <OutputColumn id="MDL11_v" quantity="MDL11/0/GenericMuscleCell/v"/>
            <OutputColumn id="MDL12_v" quantity="MDL12/0/GenericMuscleCell/v"/>
            <OutputColumn id="MDL13_v" quantity="MDL13/0/GenericMuscleCell/v"/>
            <OutputColumn id="MDL14_v" quantity="MDL14/0/GenericMuscleCell/v"/>
            <OutputColumn id="MDL15_v" quantity="MDL15/0/GenericMuscleCell/v"/>
            <OutputColumn id="MDL16_v" quantity="MDL16/0/GenericMuscleCell/v"/>
            <OutputColumn id="MDL17_v" quantity="MDL17/0/GenericMuscleCell/v"/>
            <OutputColumn id="MDL18_v" quantity="MDL18/0/GenericMuscleCell/v"/>
            <OutputColumn id="MDL19_v" quantity="MDL19/0/GenericMuscleCell/v"/>
            <OutputColumn id="MDL20_v" quantity="MDL20/0/GenericMuscleCell/v"/>
            <OutputColumn id="MDL21_v" quantity="MDL21/0/GenericMuscleCell/v"/>
            <OutputColumn id="MDL22_v" quantity="MDL22/0/GenericMuscleCell/v"/>
            <OutputColumn id="MDL23_v" quantity="MDL23/0/GenericMuscleCell/v"/>
            <OutputColumn id="MDL24_v" quantity="MDL24/0/GenericMuscleCell/v"/>
        </OutputFile>
        <OutputFile id="muscles_activity" fileName="c302_C2_AS_DA_DB.muscles.activity.dat">
            <OutputColumn id="MDR01_v" quantity="MDR01/0/GenericMuscleCell/caConc"/>
            <OutputColumn id="MDR02_v" quantity="MDR02/0/GenericMuscleCell/caConc"/>
            <OutputColumn id="MDR03_v" quantity="MDR03/0/GenericMuscleCell/caConc"/>
            <OutputColumn id="MDR04_v" quantity="MDR04/0/GenericMuscleCell/caConc"/>
            <OutputColumn id="MDR05_v" quantity="MDR05/0/GenericMuscleCell/caConc"/>
            <OutputColumn id="MDR06_v" quantity="MDR06/0/GenericMuscleCell/caConc"/>
            <OutputColumn id="MDR07_v" quantity="MDR07/0/GenericMuscleCell/caConc"/>
            <OutputColumn id="MDR08_v" quantity="MDR08/0/GenericMuscleCell/caConc"/>
            <OutputColumn id="MDR09_v" quantity="MDR09/0/GenericMuscleCell/caConc"/>
            <OutputColumn id="MDR10_v" quantity="MDR10/0/GenericMuscleCell/caConc"/>
            <OutputColumn id="MDR11_v" quantity="MDR11/0/GenericMuscleCell/caConc"/>
            <OutputColumn id="MDR12_v" quantity="MDR12/0/GenericMuscleCell/caConc"/>
            <OutputColumn id="MDR13_v" quantity="MDR13/0/GenericMuscleCell/caConc"/>
            <OutputColumn id="MDR14_v" quantity="MDR14/0/GenericMuscleCell/caConc"/>
            <OutputColumn id="MDR15_v" quantity="MDR15/0/GenericMuscleCell/caConc"/>
            <OutputColumn id="MDR16_v" quantity="MDR16/0/GenericMuscleCell/caConc"/>
            <OutputColumn id="MDR17_v" quantity="MDR17/0/GenericMuscleCell/caConc"/>
            <OutputColumn id="MDR18_v" quantity="MDR18/0/GenericMuscleCell/caConc"/>
            <OutputColumn id="MDR19_v" quantity="MDR19/0/GenericMuscleCell/caConc"/>
            <OutputColumn id="MDR20_v" quantity="MDR20/0/GenericMuscleCell/caConc"/>
            <OutputColumn id="MDR21_v" quantity="MDR21/0/GenericMuscleCell/caConc"/>
            <OutputColumn id="MDR22_v" quantity="MDR22/0/GenericMuscleCell/caConc"/>
            <OutputColumn id="MDR23_v" quantity="MDR23/0/GenericMuscleCell/caConc"/>
            <OutputColumn id="MDR24_v" quantity="MDR24/0/GenericMuscleCell/caConc"/>
            <OutputColumn id="MVR01_v" quantity="MVR01/0/GenericMuscleCell/caConc"/>
            <OutputColumn id="MVR02_v" quantity="MVR02/0/GenericMuscleCell/caConc"/>
            <OutputColumn id="MVR03_v" quantity="MVR03/0/GenericMuscleCell/caConc"/>
            <OutputColumn id="MVR04_v" quantity="MVR04/0/GenericMuscleCell/caConc"/>
            <OutputColumn id="MVR05_v" quantity="MVR05/0/GenericMuscleCell/caConc"/>
            <OutputColumn id="MVR06_v" quantity="MVR06/0/GenericMuscleCell/caConc"/>
            <OutputColumn id="MVR07_v" quantity="MVR07/0/GenericMuscleCell/caConc"/>
            <OutputColumn id="MVR08_v" quantity="MVR08/0/GenericMuscleCell/caConc"/>
            <OutputColumn id="MVR09_v" quantity="MVR09/0/GenericMuscleCell/caConc"/>
            <OutputColumn id="MVR10_v" quantity="MVR10/0/GenericMuscleCell/caConc"/>
            <OutputColumn id="MVR11_v" quantity="MVR11/0/GenericMuscleCell/caConc"/>
            <OutputColumn id="MVR12_v" quantity="MVR12/0/GenericMuscleCell/caConc"/>
            <OutputColumn id="MVR13_v" quantity="MVR13/0/GenericMuscleCell/caConc"/>
            <OutputColumn id="MVR14_v" quantity="MVR14/0/GenericMuscleCell/caConc"/>
            <OutputColumn id="MVR15_v" quantity="MVR15/0/GenericMuscleCell/caConc"/>
            <OutputColumn id="MVR16_v" quantity="MVR16/0/GenericMuscleCell/caConc"/>
            <OutputColumn id="MVR17_v" quantity="MVR17/0/GenericMuscleCell/caConc"/>
            <OutputColumn id="MVR18_v" quantity="MVR18/0/GenericMuscleCell/caConc"/>
            <OutputColumn id="MVR19_v" quantity="MVR19/0/GenericMuscleCell/caConc"/>
            <OutputColumn id="MVR20_v" quantity="MVR20/0/GenericMuscleCell/caConc"/>
            <OutputColumn id="MVR21_v" quantity="MVR21/0/GenericMuscleCell/caConc"/>
            <OutputColumn id="MVR22_v" quantity="MVR22/0/GenericMuscleCell/caConc"/>
            <OutputColumn id="MVR23_v" quantity="MVR23/0/GenericMuscleCell/caConc"/>
            <OutputColumn id="MVL01_v" quantity="MVL01/0/GenericMuscleCell/caConc"/>
            <OutputColumn id="MVL02_v" quantity="MVL02/0/GenericMuscleCell/caConc"/>
            <OutputColumn id="MVL03_v" quantity="MVL03/0/GenericMuscleCell/caConc"/>
            <OutputColumn id="MVL04_v" quantity="MVL04/0/GenericMuscleCell/caConc"/>
            <OutputColumn id="MVL05_v" quantity="MVL05/0/GenericMuscleCell/caConc"/>
            <OutputColumn id="MVL06_v" quantity="MVL06/0/GenericMuscleCell/caConc"/>
            <OutputColumn id="MVL07_v" quantity="MVL07/0/GenericMuscleCell/caConc"/>
            <OutputColumn id="MVL08_v" quantity="MVL08/0/GenericMuscleCell/caConc"/>
            <OutputColumn id="MVL09_v" quantity="MVL09/0/GenericMuscleCell/caConc"/>
            <OutputColumn id="MVL10_v" quantity="MVL10/0/GenericMuscleCell/caConc"/>
            <OutputColumn id="MVL11_v" quantity="MVL11/0/GenericMuscleCell/caConc"/>
            <OutputColumn id="MVL12_v" quantity="MVL12/0/GenericMuscleCell/caConc"/>
            <OutputColumn id="MVL13_v" quantity="MVL13/0/GenericMuscleCell/caConc"/>
            <OutputColumn id="MVL14_v" quantity="MVL14/0/GenericMuscleCell/caConc"/>
            <OutputColumn id="MVL15_v" quantity="MVL15/0/GenericMuscleCell/caConc"/>
            <OutputColumn id="MVL16_v" quantity="MVL16/0/GenericMuscleCell/caConc"/>
            <OutputColumn id="MVL17_v" quantity="MVL17/0/GenericMuscleCell/caConc"/>
            <OutputColumn id="MVL18_v" quantity="MVL18/0/GenericMuscleCell/caConc"/>
            <OutputColumn id="MVL19_v" quantity="MVL19/0/GenericMuscleCell/caConc"/>
            <OutputColumn id="MVL20_v" quantity="MVL20/0/GenericMuscleCell/caConc"/>
            <OutputColumn id="MVL21_v" quantity="MVL21/0/GenericMuscleCell/caConc"/>
            <OutputColumn id="MVL22_v" quantity="MVL22/0/GenericMuscleCell/caConc"/>
            <OutputColumn id="MVL23_v" quantity="MVL23/0/GenericMuscleCell/caConc"/>
            <OutputColumn id="MVL24_v" quantity="MVL24/0/GenericMuscleCell/caConc"/>
            <OutputColumn id="MDL01_v" quantity="MDL01/0/GenericMuscleCell/caConc"/>
            <OutputColumn id="MDL02_v" quantity="MDL02/0/GenericMuscleCell/caConc"/>
            <OutputColumn id="MDL03_v" quantity="MDL03/0/GenericMuscleCell/caConc"/>
            <OutputColumn id="MDL04_v" quantity="MDL04/0/GenericMuscleCell/caConc"/>
            <OutputColumn id="MDL05_v" quantity="MDL05/0/GenericMuscleCell/caConc"/>
            <OutputColumn id="MDL06_v" quantity="MDL06/0/GenericMuscleCell/caConc"/>
            <OutputColumn id="MDL07_v" quantity="MDL07/0/GenericMuscleCell/caConc"/>
            <OutputColumn id="MDL08_v" quantity="MDL08/0/GenericMuscleCell/caConc"/>
            <OutputColumn id="MDL09_v" quantity="MDL09/0/GenericMuscleCell/caConc"/>
            <OutputColumn id="MDL10_v" quantity="MDL10/0/GenericMuscleCell/caConc"/>
            <OutputColumn id="MDL11_v" quantity="MDL11/0/GenericMuscleCell/caConc"/>
            <OutputColumn id="MDL12_v" quantity="MDL12/0/GenericMuscleCell/caConc"/>
            <OutputColumn id="MDL13_v" quantity="MDL13/0/GenericMuscleCell/caConc"/>
            <OutputColumn id="MDL14_v" quantity="MDL14/0/GenericMuscleCell/caConc"/>
            <OutputColumn id="MDL15_v" quantity="MDL15/0/GenericMuscleCell/caConc"/>
            <OutputColumn id="MDL16_v" quantity="MDL16/0/GenericMuscleCell/caConc"/>
            <OutputColumn id="MDL17_v" quantity="MDL17/0/GenericMuscleCell/caConc"/>
            <OutputColumn id="MDL18_v" quantity="MDL18/0/GenericMuscleCell/caConc"/>
            <OutputColumn id="MDL19_v" quantity="MDL19/0/GenericMuscleCell/caConc"/>
            <OutputColumn id="MDL20_v" quantity="MDL20/0/GenericMuscleCell/caConc"/>
            <OutputColumn id="MDL21_v" quantity="MDL21/0/GenericMuscleCell/caConc"/>
            <OutputColumn id="MDL22_v" quantity="MDL22/0/GenericMuscleCell/caConc"/>
            <OutputColumn id="MDL23_v" quantity="MDL23/0/GenericMuscleCell/caConc"/>
            <OutputColumn id="MDL24_v" quantity="MDL24/0/GenericMuscleCell/caConc"/>
        </OutputFile>
    </Simulation>

</Lems>
