<neuroml xmlns="http://www.neuroml.org/schema/neuroml2"  xmlns:xs="http://www.w3.org/2001/XMLSchema" xmlns:xsi="http://www.w3.org/2001/XMLSchema-instance" xsi:schemaLocation="http://www.neuroml.org/schema/neuroml2 https://raw.github.com/NeuroML/NeuroML2/development/Schemas/NeuroML2/NeuroML_v2beta5.xsd" id="c302_C2_AS4_DA3_DB3">
    <notes>

Parameters and setting used to generate this network:

    Data reader:                    UpdatedSpreadsheetDataReader
    Cells:                          ['AVBL', 'AVBR', 'AVAL', 'AVAR', 'AS4', 'DA3', 'DB3']
    Cell stimulated:                []
    Connection:                     ['AVA.-AVB.*', 'AVB.-AVA.*', '^AS\\d+-DA.+$', '^DA\\d+-DB\\d+$', '^DB\\d+-AS\\d+$', 'AVA.-DA.*', 'AVB.-DB.*', 'DA\\d+-AVA.*', 'DB\\d+-AVB.*', 'DA\\d+-M(D|V)(L|R).*', 'DB\\d+-M(D|V)(L|R).*', 'M(D|V)(L|R)\\d+-M(D|V)(L|R).*', 'AVB.-AS.*', 'AVA.-AS.*']
    Connection numbers overridden:  {}
    Connection numbers scaled:      None
    Connection polarities override: {'^AVB.-AVA.+$': 'inh', '^AVA.-AVB.+$': 'inh', 'DB3-AS4': 'inh', '^AVB.-AS\\d+$': 'inh'}
    Muscles:                        True

    Known BioParameters:
        BioParameter: cell_diameter = 5 (SRC: BlindGuess, certainty 0.1)
        BioParameter: muscle_length = 20 (SRC: BlindGuess, certainty 0.1)
        BioParameter: initial_memb_pot = -60 mV (SRC: BlindGuess, certainty 0.1)
        BioParameter: muscle_initial_memb_pot = -28 mV (SRC: BlindGuess, certainty 0.1)
        BioParameter: specific_capacitance = 5 uF_per_cm2 (SRC: BlindGuess, certainty 0.1)
        BioParameter: muscle_specific_capacitance = 1 uF_per_cm2 (SRC: BlindGuess, certainty 0.1)
        BioParameter: neuron_spike_thresh = -55 mV (SRC: BlindGuess, certainty 0.1)
        BioParameter: muscle_spike_thresh = -10 mV (SRC: BlindGuess, certainty 0.1)
        BioParameter: muscle_leak_cond_density = 0.0172 mS_per_cm2 (SRC: BlindGuess, certainty 0.1)
        BioParameter: neuron_leak_cond_density = 0.002 mS_per_cm2 (SRC: BlindGuess, certainty 0.1)
        BioParameter: leak_erev = -60 mV (SRC: BlindGuess, certainty 0.1)
        BioParameter: muscle_leak_erev = -13 mV (SRC: BlindGuess, certainty 0.1)
        BioParameter: muscle_k_slow_cond_density = 0.564 mS_per_cm2 (SRC: BlindGuess, certainty 0.1)
        BioParameter: neuron_k_slow_cond_density = 0.45833751019872582 mS_per_cm2 (SRC: BlindGuess, certainty 0.1)
        BioParameter: k_slow_erev = -60 mV (SRC: BlindGuess, certainty 0.1)
        BioParameter: muscle_k_slow_erev = -70 mV (SRC: BlindGuess, certainty 0.1)
        BioParameter: neuron_k_fast_cond_density = 0.042711643917483308 mS_per_cm2 (SRC: BlindGuess, certainty 0.1)
        BioParameter: k_fast_erev = -70 mV (SRC: BlindGuess, certainty 0.1)
        BioParameter: muscle_ca_boyle_cond_density = 0.284 mS_per_cm2 (SRC: BlindGuess, certainty 0.1)
        BioParameter: neuron_ca_boyle_cond_density = 1.812775772264702 mS_per_cm2 (SRC: BlindGuess, certainty 0.1)
        BioParameter: ca_boyle_erev = 10 mV (SRC: BlindGuess, certainty 0.1)
        BioParameter: muscle_ca_boyle_erev = 46 mV (SRC: BlindGuess, certainty 0.1)
        BioParameter: ca_conc_decay_time = 13.811870945509265 ms (SRC: BlindGuess, certainty 0.1)
        BioParameter: ca_conc_rho = 0.000238919 mol_per_m_per_A_per_s (SRC: BlindGuess, certainty 0.1)
        BioParameter: neuron_to_neuron_exc_syn_conductance = 5.2 nS (SRC: Set with param_overrides, certainty 0)
        BioParameter: neuron_to_muscle_exc_syn_conductance = 0.10 nS (SRC: BlindGuess, certainty 0.1)
        BioParameter: neuron_to_neuron_exc_syn_delta = 5 mV (SRC: BlindGuess, certainty 0.1)
        BioParameter: neuron_to_neuron_exc_syn_vth = 00 mV (SRC: BlindGuess, certainty 0.1)
        BioParameter: neuron_to_neuron_exc_syn_erev = -10 mV (SRC: BlindGuess, certainty 0.1)
        BioParameter: neuron_to_neuron_exc_syn_k = 0.5per_ms (SRC: BlindGuess, certainty 0.1)
        BioParameter: neuron_to_muscle_exc_syn_weight = 1 (SRC: BlindGuess, certainty 0.1)
        BioParameter: neuron_to_muscle_exc_syn_delta = 19 mV (SRC: BlindGuess, certainty 0.1)
        BioParameter: neuron_to_muscle_exc_syn_vth = 27 mV (SRC: BlindGuess, certainty 0.1)
        BioParameter: neuron_to_muscle_exc_syn_erev = 37 mV (SRC: BlindGuess, certainty 0.1)
        BioParameter: neuron_to_muscle_exc_syn_k = 1.205per_ms (SRC: BlindGuess, certainty 0.1)
        BioParameter: neuron_to_muscle_exc_syn_sigma = 0.5 per_mV (SRC: BlindGuess, certainty 0.1)
        BioParameter: neuron_to_muscle_exc_syn_mu = 5 mV (SRC: BlindGuess, certainty 0.1)
        BioParameter: neuron_to_neuron_inh_syn_conductance = 7.2 nS (SRC: Set with param_overrides, certainty 0)
        BioParameter: neuron_to_muscle_inh_syn_conductance = 0.007 nS (SRC: BlindGuess, certainty 0.1)
        BioParameter: neuron_to_neuron_inh_syn_delta = 5 mV (SRC: BlindGuess, certainty 0.1)
        BioParameter: neuron_to_neuron_inh_syn_vth = 0 mV (SRC: BlindGuess, certainty 0.1)
        BioParameter: neuron_to_neuron_inh_syn_erev = -70 mV (SRC: BlindGuess, certainty 0.1)
        BioParameter: neuron_to_neuron_inh_syn_k = 0.015per_ms (SRC: BlindGuess, certainty 0.1)
        BioParameter: neuron_to_muscle_inh_syn_delta = 5 mV (SRC: BlindGuess, certainty 0.1)
        BioParameter: neuron_to_muscle_inh_syn_vth = 0 mV (SRC: BlindGuess, certainty 0.1)
        BioParameter: neuron_to_muscle_inh_syn_erev = -50 mV (SRC: BlindGuess, certainty 0.1)
        BioParameter: neuron_to_muscle_inh_syn_k = 0.025per_ms (SRC: BlindGuess, certainty 0.1)
        BioParameter: neuron_to_neuron_elec_syn_weight = 1 (SRC: BlindGuess, certainty 0.1)
        BioParameter: neuron_to_neuron_elec_syn_gbase = 0.01252 nS (SRC: BlindGuess, certainty 0.1)
        BioParameter: neuron_to_muscle_elec_syn_gbase = 0.00152 nS (SRC: BlindGuess, certainty 0.1)
        BioParameter: muscle_to_muscle_elec_syn_gbase = 0 nS (SRC: BlindGuess, certainty 0.1)
        BioParameter: neuron_to_motor_delayed_elec_syn_weight = 1 (SRC: BlindGuess, certainty 0.1)
        BioParameter: neuron_to_motor_delayed_elec_syn_gbase = 0.01252 nS (SRC: BlindGuess, certainty 0.1)
        BioParameter: neuron_to_motor_delayed_elec_syn_sigma = 0.4 (SRC: BlindGuess, certainty 0.1)
        BioParameter: neuron_to_motor_delayed_elec_syn_mu = -30 (SRC: BlindGuess, certainty 0.1)
        BioParameter: unphysiological_offset_current = 0pA (SRC: Testing TapWithdrawal, certainty 0)
        BioParameter: unphysiological_offset_current_del = 0 ms (SRC: Testing TapWithdrawal, certainty 0)
        BioParameter: unphysiological_offset_current_dur = 2000 ms (SRC: Testing TapWithdrawal, certainty 0)
        BioParameter: DA3_to_DB3_exc_syn_conductance = 2.6 nS (SRC: Add with param_overrides, certainty 0)
        BioParameter: AVAL_to_AVBL_inh_syn_conductance = 4.7 nS (SRC: Add with param_overrides, certainty 0)
        BioParameter: AVAR_to_AVBL_inh_syn_conductance = 4.7 nS (SRC: Add with param_overrides, certainty 0)
        BioParameter: AVAR_to_AVBR_inh_syn_conductance = 4.7 nS (SRC: Add with param_overrides, certainty 0)
        BioParameter: AVBL_to_AVAL_inh_syn_conductance = 3.2 nS (SRC: Add with param_overrides, certainty 0)
        BioParameter: AVBL_to_AVAR_inh_syn_conductance = 3.2 nS (SRC: Add with param_overrides, certainty 0)
        BioParameter: AVBR_to_AVAL_inh_syn_conductance = 3.2 nS (SRC: Add with param_overrides, certainty 0)
        BioParameter: AVBR_to_AVAR_inh_syn_conductance = 3.2 nS (SRC: Add with param_overrides, certainty 0)
        BioParameter: AS4_to_DA3_exc_syn_conductance = 3 nS (SRC: Add with param_overrides, certainty 0)
        BioParameter: AVAL_to_DA3_elec_syn_gbase = 0.00052 nS (SRC: Add with param_overrides, certainty 0)
        BioParameter: AVAR_to_AVBL_elec_syn_gbase = 0.00052 nS (SRC: Add with param_overrides, certainty 0)
        BioParameter: AVAR_to_DA3_elec_syn_gbase = 0.00052 nS (SRC: Add with param_overrides, certainty 0)
        BioParameter: AVBL_to_AVAR_elec_syn_gbase = 0.00052 nS (SRC: Add with param_overrides, certainty 0)
        BioParameter: AS4_to_DA3_elec_syn_gbase = 0.01052 nS (SRC: Add with param_overrides, certainty 0)

</notes>
    <include href="cell_C.xml"></include>
    <include href="custom_muscle_components.xml"></include>
    <include href="custom_synapses.xml"></include>
    <fixedFactorConcentrationModel id="CaPool" ion="ca" restingConc="0 mM" decayConstant="13.811870945509265 ms" rho="0.000238919 mol_per_m_per_A_per_s"/>
    <gapJunction id="AVAL_to_DA3_elec_syn" conductance="0.00052 nS"/>
    <gapJunction id="AVAR_to_AVBL_elec_syn" conductance="0.00052 nS"/>
    <gapJunction id="AVAR_to_DA3_elec_syn" conductance="0.00052 nS"/>
    <gapJunction id="AVBL_to_AVAR_elec_syn" conductance="0.00052 nS"/>
    <gapJunction id="neuron_to_neuron_elec_syn" conductance="0.01252 nS"/>
    <gapJunction id="AS4_to_DA3_elec_syn" conductance="0.01052 nS"/>
    <gapJunction id="muscle_to_muscle_elec_syn" conductance="0 nS"/>
    <silentSynapse id="silent"/>
    <gradedSynapse id="AVAL_to_AVBL_inh_syn" conductance="4.7 nS" delta="5 mV" Vth="0 mV" k="0.015per_ms" erev="-70 mV"/>
    <gradedSynapse id="neuron_to_neuron_exc_syn" conductance="5.2 nS" delta="5 mV" Vth="00 mV" k="0.5per_ms" erev="-10 mV"/>
    <gradedSynapse id="AVAR_to_AVBL_inh_syn" conductance="4.7 nS" delta="5 mV" Vth="0 mV" k="0.015per_ms" erev="-70 mV"/>
    <gradedSynapse id="AVAR_to_AVBR_inh_syn" conductance="4.7 nS" delta="5 mV" Vth="0 mV" k="0.015per_ms" erev="-70 mV"/>
    <gradedSynapse id="AVBL_to_AVAL_inh_syn" conductance="3.2 nS" delta="5 mV" Vth="0 mV" k="0.015per_ms" erev="-70 mV"/>
    <gradedSynapse id="AVBL_to_AVAR_inh_syn" conductance="3.2 nS" delta="5 mV" Vth="0 mV" k="0.015per_ms" erev="-70 mV"/>
    <gradedSynapse id="neuron_to_neuron_inh_syn" conductance="7.2 nS" delta="5 mV" Vth="0 mV" k="0.015per_ms" erev="-70 mV"/>
    <gradedSynapse id="AVBR_to_AVAL_inh_syn" conductance="3.2 nS" delta="5 mV" Vth="0 mV" k="0.015per_ms" erev="-70 mV"/>
    <gradedSynapse id="AVBR_to_AVAR_inh_syn" conductance="3.2 nS" delta="5 mV" Vth="0 mV" k="0.015per_ms" erev="-70 mV"/>
    <gradedSynapse id="DA3_to_DB3_exc_syn" conductance="2.6 nS" delta="5 mV" Vth="00 mV" k="0.5per_ms" erev="-10 mV"/>
    <gradedSynapse id="AS4_to_DA3_exc_syn" conductance="3 nS" delta="5 mV" Vth="00 mV" k="0.5per_ms" erev="-10 mV"/>
    <gradedSynapse id="neuron_to_muscle_exc_syn" conductance="0.10 nS" delta="19 mV" Vth="27 mV" k="1.205per_ms" erev="37 mV"/>
    <cell id="GenericMuscleCell">
        <morphology id="morphology_GenericMuscleCell">
            <segment id="0" name="soma">
                <proximal x="0.000000e+00" y="0.000000e+00" z="0.000000e+00" diameter="5"/>
                <distal x="0.000000e+00" y="2.000000e+01" z="0.000000e+00" diameter="5"/>
            </segment>
        </morphology>
        <biophysicalProperties id="biophys_GenericMuscleCell">
            <membraneProperties>
                <channelDensity id="Leak_all" ionChannel="Leak" condDensity="0.0172 mS_per_cm2" erev="-13 mV" ion="non_specific"/>
                <channelDensity id="k_slow_all" ionChannel="k_muscle" condDensity="0.564 mS_per_cm2" erev="-70 mV" ion="k"/>
                <channelDensity id="ca_boyle_all" ionChannel="ca_muscle" condDensity="0.284 mS_per_cm2" erev="46 mV" ion="ca"/>
                <spikeThresh value="-10 mV"/>
                <specificCapacitance value="1 uF_per_cm2"/>
                <initMembPotential value="-28 mV"/>
            </membraneProperties>
            <intracellularProperties>
                <species id="ca" concentrationModel="CaPool" ion="ca" initialConcentration="0 mM" initialExtConcentration="2E-6 mol_per_cm3"/>
                <resistivity value="0.1 kohm_cm"/>
            </intracellularProperties>
        </biophysicalProperties>
    </cell>
    <cell id="GenericNeuronCell">
        <morphology id="morphology_GenericNeuronCell">
            <segment id="0" name="soma">
                <proximal x="0.000000e+00" y="0.000000e+00" z="0.000000e+00" diameter="5"/>
                <distal x="0.000000e+00" y="0.000000e+00" z="0.000000e+00" diameter="5"/>
            </segment>
        </morphology>
        <biophysicalProperties id="biophys_GenericNeuronCell">
            <membraneProperties>
                <channelDensity id="Leak_all" ionChannel="Leak" condDensity="0.002 mS_per_cm2" erev="-60 mV" ion="non_specific"/>
                <channelDensity id="k_slow_all" ionChannel="k_slow" condDensity="0.45833751019872582 mS_per_cm2" erev="-60 mV" ion="k"/>
                <channelDensity id="k_fast_all" ionChannel="k_fast" condDensity="0.042711643917483308 mS_per_cm2" erev="-70 mV" ion="k"/>
                <channelDensity id="ca_boyle_all" ionChannel="ca_boyle" condDensity="1.812775772264702 mS_per_cm2" erev="10 mV" ion="ca"/>
                <spikeThresh value="-55 mV"/>
                <specificCapacitance value="5 uF_per_cm2"/>
                <initMembPotential value="-60 mV"/>
            </membraneProperties>
            <intracellularProperties>
                <species id="ca" concentrationModel="CaPool" ion="ca" initialConcentration="0 mM" initialExtConcentration="2E-6 mol_per_cm3"/>
                <resistivity value="0.1 kohm_cm"/>
            </intracellularProperties>
        </biophysicalProperties>
    </cell>
    <pulseGenerator id="offset_current" delay="0 ms" duration="2000 ms" amplitude="0pA"/>
    <pulseGenerator id="stim_AVBL_1" delay="0ms" duration="1000ms" amplitude="1pA"/>
    <pulseGenerator id="stim_AVBR_1" delay="0ms" duration="1000ms" amplitude="1pA"/>
    <pulseGenerator id="stim_AVAL_1" delay="1000ms" duration="1000ms" amplitude="1.5pA"/>
    <pulseGenerator id="stim_AVAR_1" delay="1000ms" duration="1000ms" amplitude="1.5pA"/>
    <pulseGenerator id="stim_AVBL_2" delay="2000ms" duration="900ms" amplitude="1pA"/>
    <pulseGenerator id="stim_AVBR_2" delay="2000ms" duration="900ms" amplitude="1pA"/>
    <pulseGenerator id="stim_AS4_1" delay="0ms" duration="2900ms" amplitude="5.0pA"/>
    <network id="c302_C2_AS4_DA3_DB3">
        <population id="AS4" component="GenericNeuronCell" type="populationList">
            <instance id="0">
                <location x="-1.8750001" y="-90.200005000000004" z="-65.375"/>
            </instance>
        </population>
        <population id="AVAL" component="GenericNeuronCell" type="populationList">
            <property tag="OpenWormBackerAssignedName" value="JUD"/>
            <instance id="0">
                <location x="-0.55" y="-271.5" z="37.982999999999997"/>
            </instance>
        </population>
        <population id="AVAR" component="GenericNeuronCell" type="populationList">
            <instance id="0">
                <location x="-3.5" y="-271.5" z="37.982999999999997"/>
            </instance>
        </population>
        <population id="AVBL" component="GenericNeuronCell" type="populationList">
            <instance id="0">
                <location x="0.225" y="-269.793999999999983" z="37.863002999999999"/>
            </instance>
        </population>
        <population id="AVBR" component="GenericNeuronCell" type="populationList">
            <property tag="OpenWormBackerAssignedName" value="mn"/>
            <instance id="0">
                <location x="-4.581" y="-269.793999999999983" z="37.863002999999999"/>
            </instance>
        </population>
        <population id="DA3" component="GenericNeuronCell" type="populationList">
            <property tag="OpenWormBackerAssignedName" value="Magoo"/>
            <instance id="0">
                <location x="-1.65" y="-123.650000000000006" z="-58.350002000000003"/>
            </instance>
        </population>
        <population id="DB3" component="GenericNeuronCell" type="populationList">
            <instance id="0">
                <location x="-1.85" y="-195.275000000000006" z="-18.524999999999999"/>
            </instance>
        </population>
        <population id="MDR01" component="GenericMuscleCell" type="populationList">
            <instance id="0">
                <location x="80." y="-270." z="80."/>
            </instance>
        </population>
        <population id="MDR02" component="GenericMuscleCell" type="populationList">
            <instance id="0">
                <location x="80." y="-240." z="80."/>
            </instance>
        </population>
        <population id="MDR03" component="GenericMuscleCell" type="populationList">
            <instance id="0">
                <location x="80." y="-210." z="80."/>
            </instance>
        </population>
        <population id="MDR04" component="GenericMuscleCell" type="populationList">
            <instance id="0">
                <location x="80." y="-180." z="80."/>
            </instance>
        </population>
        <population id="MDR05" component="GenericMuscleCell" type="populationList">
            <instance id="0">
                <location x="80." y="-150." z="80."/>
            </instance>
        </population>
        <population id="MDR06" component="GenericMuscleCell" type="populationList">
            <instance id="0">
                <location x="80." y="-120." z="80."/>
            </instance>
        </population>
        <population id="MDR07" component="GenericMuscleCell" type="populationList">
            <instance id="0">
                <location x="80." y="-90." z="80."/>
            </instance>
        </population>
        <population id="MDR08" component="GenericMuscleCell" type="populationList">
            <instance id="0">
                <location x="80." y="-60." z="80."/>
            </instance>
        </population>
        <population id="MDR09" component="GenericMuscleCell" type="populationList">
            <instance id="0">
                <location x="80." y="-30." z="80."/>
            </instance>
        </population>
        <population id="MDR10" component="GenericMuscleCell" type="populationList">
            <instance id="0">
                <location x="80." y="0." z="80."/>
            </instance>
        </population>
        <population id="MDR11" component="GenericMuscleCell" type="populationList">
            <instance id="0">
                <location x="80." y="30." z="80."/>
            </instance>
        </population>
        <population id="MDR12" component="GenericMuscleCell" type="populationList">
            <instance id="0">
                <location x="80." y="60." z="80."/>
            </instance>
        </population>
        <population id="MDR13" component="GenericMuscleCell" type="populationList">
            <instance id="0">
                <location x="80." y="90." z="80."/>
            </instance>
        </population>
        <population id="MDR14" component="GenericMuscleCell" type="populationList">
            <instance id="0">
                <location x="80." y="120." z="80."/>
            </instance>
        </population>
        <population id="MDR15" component="GenericMuscleCell" type="populationList">
            <instance id="0">
                <location x="80." y="150." z="80."/>
            </instance>
        </population>
        <population id="MDR16" component="GenericMuscleCell" type="populationList">
            <instance id="0">
                <location x="80." y="180." z="80."/>
            </instance>
        </population>
        <population id="MDR17" component="GenericMuscleCell" type="populationList">
            <instance id="0">
                <location x="80." y="210." z="80."/>
            </instance>
        </population>
        <population id="MDR18" component="GenericMuscleCell" type="populationList">
            <instance id="0">
                <location x="80." y="240." z="80."/>
            </instance>
        </population>
        <population id="MDR19" component="GenericMuscleCell" type="populationList">
            <instance id="0">
                <location x="80." y="270." z="80."/>
            </instance>
        </population>
        <population id="MDR20" component="GenericMuscleCell" type="populationList">
            <instance id="0">
                <location x="80." y="300." z="80."/>
            </instance>
        </population>
        <population id="MDR21" component="GenericMuscleCell" type="populationList">
            <instance id="0">
                <location x="80." y="330." z="80."/>
            </instance>
        </population>
        <population id="MDR22" component="GenericMuscleCell" type="populationList">
            <instance id="0">
                <location x="80." y="360." z="80."/>
            </instance>
        </population>
        <population id="MDR23" component="GenericMuscleCell" type="populationList">
            <instance id="0">
                <location x="80." y="390." z="80."/>
            </instance>
        </population>
        <population id="MDR24" component="GenericMuscleCell" type="populationList">
            <instance id="0">
                <location x="80." y="420." z="80."/>
            </instance>
        </population>
        <population id="MVR01" component="GenericMuscleCell" type="populationList">
            <instance id="0">
                <location x="-80." y="-270." z="80."/>
            </instance>
        </population>
        <population id="MVR02" component="GenericMuscleCell" type="populationList">
            <instance id="0">
                <location x="-80." y="-240." z="80."/>
            </instance>
        </population>
        <population id="MVR03" component="GenericMuscleCell" type="populationList">
            <instance id="0">
                <location x="-80." y="-210." z="80."/>
            </instance>
        </population>
        <population id="MVR04" component="GenericMuscleCell" type="populationList">
            <instance id="0">
                <location x="-80." y="-180." z="80."/>
            </instance>
        </population>
        <population id="MVR05" component="GenericMuscleCell" type="populationList">
            <instance id="0">
                <location x="-80." y="-150." z="80."/>
            </instance>
        </population>
        <population id="MVR06" component="GenericMuscleCell" type="populationList">
            <instance id="0">
                <location x="-80." y="-120." z="80."/>
            </instance>
        </population>
        <population id="MVR07" component="GenericMuscleCell" type="populationList">
            <instance id="0">
                <location x="-80." y="-90." z="80."/>
            </instance>
        </population>
        <population id="MVR08" component="GenericMuscleCell" type="populationList">
            <instance id="0">
                <location x="-80." y="-60." z="80."/>
            </instance>
        </population>
        <population id="MVR09" component="GenericMuscleCell" type="populationList">
            <instance id="0">
                <location x="-80." y="-30." z="80."/>
            </instance>
        </population>
        <population id="MVR10" component="GenericMuscleCell" type="populationList">
            <instance id="0">
                <location x="-80." y="0." z="80."/>
            </instance>
        </population>
        <population id="MVR11" component="GenericMuscleCell" type="populationList">
            <instance id="0">
                <location x="-80." y="30." z="80."/>
            </instance>
        </population>
        <population id="MVR12" component="GenericMuscleCell" type="populationList">
            <instance id="0">
                <location x="-80." y="60." z="80."/>
            </instance>
        </population>
        <population id="MVR13" component="GenericMuscleCell" type="populationList">
            <instance id="0">
                <location x="-80." y="90." z="80."/>
            </instance>
        </population>
        <population id="MVR14" component="GenericMuscleCell" type="populationList">
            <instance id="0">
                <location x="-80." y="120." z="80."/>
            </instance>
        </population>
        <population id="MVR15" component="GenericMuscleCell" type="populationList">
            <instance id="0">
                <location x="-80." y="150." z="80."/>
            </instance>
        </population>
        <population id="MVR16" component="GenericMuscleCell" type="populationList">
            <instance id="0">
                <location x="-80." y="180." z="80."/>
            </instance>
        </population>
        <population id="MVR17" component="GenericMuscleCell" type="populationList">
            <instance id="0">
                <location x="-80." y="210." z="80."/>
            </instance>
        </population>
        <population id="MVR18" component="GenericMuscleCell" type="populationList">
            <instance id="0">
                <location x="-80." y="240." z="80."/>
            </instance>
        </population>
        <population id="MVR19" component="GenericMuscleCell" type="populationList">
            <instance id="0">
                <location x="-80." y="270." z="80."/>
            </instance>
        </population>
        <population id="MVR20" component="GenericMuscleCell" type="populationList">
            <instance id="0">
                <location x="-80." y="300." z="80."/>
            </instance>
        </population>
        <population id="MVR21" component="GenericMuscleCell" type="populationList">
            <instance id="0">
                <location x="-80." y="330." z="80."/>
            </instance>
        </population>
        <population id="MVR22" component="GenericMuscleCell" type="populationList">
            <instance id="0">
                <location x="-80." y="360." z="80."/>
            </instance>
        </population>
        <population id="MVR23" component="GenericMuscleCell" type="populationList">
            <instance id="0">
                <location x="-80." y="390." z="80."/>
            </instance>
        </population>
        <population id="MVL01" component="GenericMuscleCell" type="populationList">
            <instance id="0">
                <location x="-80." y="-270." z="-80."/>
            </instance>
        </population>
        <population id="MVL02" component="GenericMuscleCell" type="populationList">
            <instance id="0">
                <location x="-80." y="-240." z="-80."/>
            </instance>
        </population>
        <population id="MVL03" component="GenericMuscleCell" type="populationList">
            <instance id="0">
                <location x="-80." y="-210." z="-80."/>
            </instance>
        </population>
        <population id="MVL04" component="GenericMuscleCell" type="populationList">
            <instance id="0">
                <location x="-80." y="-180." z="-80."/>
            </instance>
        </population>
        <population id="MVL05" component="GenericMuscleCell" type="populationList">
            <instance id="0">
                <location x="-80." y="-150." z="-80."/>
            </instance>
        </population>
        <population id="MVL06" component="GenericMuscleCell" type="populationList">
            <instance id="0">
                <location x="-80." y="-120." z="-80."/>
            </instance>
        </population>
        <population id="MVL07" component="GenericMuscleCell" type="populationList">
            <instance id="0">
                <location x="-80." y="-90." z="-80."/>
            </instance>
        </population>
        <population id="MVL08" component="GenericMuscleCell" type="populationList">
            <instance id="0">
                <location x="-80." y="-60." z="-80."/>
            </instance>
        </population>
        <population id="MVL09" component="GenericMuscleCell" type="populationList">
            <instance id="0">
                <location x="-80." y="-30." z="-80."/>
            </instance>
        </population>
        <population id="MVL10" component="GenericMuscleCell" type="populationList">
            <instance id="0">
                <location x="-80." y="0." z="-80."/>
            </instance>
        </population>
        <population id="MVL11" component="GenericMuscleCell" type="populationList">
            <instance id="0">
                <location x="-80." y="30." z="-80."/>
            </instance>
        </population>
        <population id="MVL12" component="GenericMuscleCell" type="populationList">
            <instance id="0">
                <location x="-80." y="60." z="-80."/>
            </instance>
        </population>
        <population id="MVL13" component="GenericMuscleCell" type="populationList">
            <instance id="0">
                <location x="-80." y="90." z="-80."/>
            </instance>
        </population>
        <population id="MVL14" component="GenericMuscleCell" type="populationList">
            <instance id="0">
                <location x="-80." y="120." z="-80."/>
            </instance>
        </population>
        <population id="MVL15" component="GenericMuscleCell" type="populationList">
            <instance id="0">
                <location x="-80." y="150." z="-80."/>
            </instance>
        </population>
        <population id="MVL16" component="GenericMuscleCell" type="populationList">
            <instance id="0">
                <location x="-80." y="180." z="-80."/>
            </instance>
        </population>
        <population id="MVL17" component="GenericMuscleCell" type="populationList">
            <instance id="0">
                <location x="-80." y="210." z="-80."/>
            </instance>
        </population>
        <population id="MVL18" component="GenericMuscleCell" type="populationList">
            <instance id="0">
                <location x="-80." y="240." z="-80."/>
            </instance>
        </population>
        <population id="MVL19" component="GenericMuscleCell" type="populationList">
            <instance id="0">
                <location x="-80." y="270." z="-80."/>
            </instance>
        </population>
        <population id="MVL20" component="GenericMuscleCell" type="populationList">
            <instance id="0">
                <location x="-80." y="300." z="-80."/>
            </instance>
        </population>
        <population id="MVL21" component="GenericMuscleCell" type="populationList">
            <instance id="0">
                <location x="-80." y="330." z="-80."/>
            </instance>
        </population>
        <population id="MVL22" component="GenericMuscleCell" type="populationList">
            <instance id="0">
                <location x="-80." y="360." z="-80."/>
            </instance>
        </population>
        <population id="MVL23" component="GenericMuscleCell" type="populationList">
            <instance id="0">
                <location x="-80." y="390." z="-80."/>
            </instance>
        </population>
        <population id="MVL24" component="GenericMuscleCell" type="populationList">
            <instance id="0">
                <location x="-80." y="420." z="-80."/>
            </instance>
        </population>
        <population id="MDL01" component="GenericMuscleCell" type="populationList">
            <instance id="0">
                <location x="80." y="-270." z="-80."/>
            </instance>
        </population>
        <population id="MDL02" component="GenericMuscleCell" type="populationList">
            <instance id="0">
                <location x="80." y="-240." z="-80."/>
            </instance>
        </population>
        <population id="MDL03" component="GenericMuscleCell" type="populationList">
            <instance id="0">
                <location x="80." y="-210." z="-80."/>
            </instance>
        </population>
        <population id="MDL04" component="GenericMuscleCell" type="populationList">
            <instance id="0">
                <location x="80." y="-180." z="-80."/>
            </instance>
        </population>
        <population id="MDL05" component="GenericMuscleCell" type="populationList">
            <instance id="0">
                <location x="80." y="-150." z="-80."/>
            </instance>
        </population>
        <population id="MDL06" component="GenericMuscleCell" type="populationList">
            <instance id="0">
                <location x="80." y="-120." z="-80."/>
            </instance>
        </population>
        <population id="MDL07" component="GenericMuscleCell" type="populationList">
            <instance id="0">
                <location x="80." y="-90." z="-80."/>
            </instance>
        </population>
        <population id="MDL08" component="GenericMuscleCell" type="populationList">
            <instance id="0">
                <location x="80." y="-60." z="-80."/>
            </instance>
        </population>
        <population id="MDL09" component="GenericMuscleCell" type="populationList">
            <instance id="0">
                <location x="80." y="-30." z="-80."/>
            </instance>
        </population>
        <population id="MDL10" component="GenericMuscleCell" type="populationList">
            <instance id="0">
                <location x="80." y="0." z="-80."/>
            </instance>
        </population>
        <population id="MDL11" component="GenericMuscleCell" type="populationList">
            <instance id="0">
                <location x="80." y="30." z="-80."/>
            </instance>
        </population>
        <population id="MDL12" component="GenericMuscleCell" type="populationList">
            <instance id="0">
                <location x="80." y="60." z="-80."/>
            </instance>
        </population>
        <population id="MDL13" component="GenericMuscleCell" type="populationList">
            <instance id="0">
                <location x="80." y="90." z="-80."/>
            </instance>
        </population>
        <population id="MDL14" component="GenericMuscleCell" type="populationList">
            <instance id="0">
                <location x="80." y="120." z="-80."/>
            </instance>
        </population>
        <population id="MDL15" component="GenericMuscleCell" type="populationList">
            <instance id="0">
                <location x="80." y="150." z="-80."/>
            </instance>
        </population>
        <population id="MDL16" component="GenericMuscleCell" type="populationList">
            <instance id="0">
                <location x="80." y="180." z="-80."/>
            </instance>
        </population>
        <population id="MDL17" component="GenericMuscleCell" type="populationList">
            <instance id="0">
                <location x="80." y="210." z="-80."/>
            </instance>
        </population>
        <population id="MDL18" component="GenericMuscleCell" type="populationList">
            <instance id="0">
                <location x="80." y="240." z="-80."/>
            </instance>
        </population>
        <population id="MDL19" component="GenericMuscleCell" type="populationList">
            <instance id="0">
                <location x="80." y="270." z="-80."/>
            </instance>
        </population>
        <population id="MDL20" component="GenericMuscleCell" type="populationList">
            <instance id="0">
                <location x="80." y="300." z="-80."/>
            </instance>
        </population>
        <population id="MDL21" component="GenericMuscleCell" type="populationList">
            <instance id="0">
                <location x="80." y="330." z="-80."/>
            </instance>
        </population>
        <population id="MDL22" component="GenericMuscleCell" type="populationList">
            <instance id="0">
                <location x="80." y="360." z="-80."/>
            </instance>
        </population>
        <population id="MDL23" component="GenericMuscleCell" type="populationList">
            <instance id="0">
                <location x="80." y="390." z="-80."/>
            </instance>
        </population>
        <population id="MDL24" component="GenericMuscleCell" type="populationList">
            <instance id="0">
                <location x="80." y="420." z="-80."/>
            </instance>
        </population>
        <electricalProjection id="NC_AVAL_DA3_Generic_GJ" presynapticPopulation="AVAL" postsynapticPopulation="DA3">
            <electricalConnectionInstanceW id="0" preCell="../AVAL/0/GenericNeuronCell" preSegment="0" preFractionAlong="0.5" postCell="../DA3/0/GenericNeuronCell" postSegment="0" postFractionAlong="0.5" synapse="AVAL_to_DA3_elec_syn" weight="6."/>
        </electricalProjection>
        <electricalProjection id="NC_AVAR_AVBL_Generic_GJ" presynapticPopulation="AVAR" postsynapticPopulation="AVBL">
            <electricalConnectionInstanceW id="0" preCell="../AVAR/0/GenericNeuronCell" preSegment="0" preFractionAlong="0.5" postCell="../AVBL/0/GenericNeuronCell" postSegment="0" postFractionAlong="0.5" synapse="AVAR_to_AVBL_elec_syn" weight="3."/>
        </electricalProjection>
        <electricalProjection id="NC_AVAR_DA3_Generic_GJ" presynapticPopulation="AVAR" postsynapticPopulation="DA3">
            <electricalConnectionInstanceW id="0" preCell="../AVAR/0/GenericNeuronCell" preSegment="0" preFractionAlong="0.5" postCell="../DA3/0/GenericNeuronCell" postSegment="0" postFractionAlong="0.5" synapse="AVAR_to_DA3_elec_syn" weight="7."/>
        </electricalProjection>
        <electricalProjection id="NC_AVBL_AVAR_Generic_GJ" presynapticPopulation="AVBL" postsynapticPopulation="AVAR">
            <electricalConnectionInstanceW id="0" preCell="../AVBL/0/GenericNeuronCell" preSegment="0" preFractionAlong="0.5" postCell="../AVAR/0/GenericNeuronCell" postSegment="0" postFractionAlong="0.5" synapse="AVBL_to_AVAR_elec_syn" weight="3."/>
        </electricalProjection>
        <electricalProjection id="NC_AVBL_DB3_Generic_GJ" presynapticPopulation="AVBL" postsynapticPopulation="DB3">
            <electricalConnectionInstanceW id="0" preCell="../AVBL/0/GenericNeuronCell" preSegment="0" preFractionAlong="0.5" postCell="../DB3/0/GenericNeuronCell" postSegment="0" postFractionAlong="0.5" synapse="neuron_to_neuron_elec_syn" weight="9."/>
        </electricalProjection>
        <electricalProjection id="NC_AVBR_DB3_Generic_GJ" presynapticPopulation="AVBR" postsynapticPopulation="DB3">
            <electricalConnectionInstanceW id="0" preCell="../AVBR/0/GenericNeuronCell" preSegment="0" preFractionAlong="0.5" postCell="../DB3/0/GenericNeuronCell" postSegment="0" postFractionAlong="0.5" synapse="neuron_to_neuron_elec_syn" weight="2."/>
        </electricalProjection>
        <electricalProjection id="NC_DA3_AVAL_Generic_GJ" presynapticPopulation="DA3" postsynapticPopulation="AVAL">
            <electricalConnectionInstanceW id="0" preCell="../DA3/0/GenericNeuronCell" preSegment="0" preFractionAlong="0.5" postCell="../AVAL/0/GenericNeuronCell" postSegment="0" postFractionAlong="0.5" synapse="neuron_to_neuron_elec_syn" weight="6."/>
        </electricalProjection>
        <electricalProjection id="NC_DA3_AVAR_Generic_GJ" presynapticPopulation="DA3" postsynapticPopulation="AVAR">
            <electricalConnectionInstanceW id="0" preCell="../DA3/0/GenericNeuronCell" preSegment="0" preFractionAlong="0.5" postCell="../AVAR/0/GenericNeuronCell" postSegment="0" postFractionAlong="0.5" synapse="neuron_to_neuron_elec_syn" weight="7."/>
        </electricalProjection>
        <electricalProjection id="NC_DB3_AVBL_Generic_GJ" presynapticPopulation="DB3" postsynapticPopulation="AVBL">
            <electricalConnectionInstanceW id="0" preCell="../DB3/0/GenericNeuronCell" preSegment="0" preFractionAlong="0.5" postCell="../AVBL/0/GenericNeuronCell" postSegment="0" postFractionAlong="0.5" synapse="neuron_to_neuron_elec_syn" weight="9."/>
        </electricalProjection>
        <electricalProjection id="NC_DB3_AVBR_Generic_GJ" presynapticPopulation="DB3" postsynapticPopulation="AVBR">
            <electricalConnectionInstanceW id="0" preCell="../DB3/0/GenericNeuronCell" preSegment="0" preFractionAlong="0.5" postCell="../AVBR/0/GenericNeuronCell" postSegment="0" postFractionAlong="0.5" synapse="neuron_to_neuron_elec_syn" weight="2."/>
        </electricalProjection>
        <electricalProjection id="NC_AS4_DA3_Generic_GJ" presynapticPopulation="AS4" postsynapticPopulation="DA3">
            <electricalConnectionInstanceW id="0" preCell="../AS4/0/GenericNeuronCell" preSegment="0" preFractionAlong="0.5" postCell="../DA3/0/GenericNeuronCell" postSegment="0" postFractionAlong="0.5" synapse="AS4_to_DA3_elec_syn" weight="4."/>
        </electricalProjection>
        <electricalProjection id="NC_MDL01_MDL02_Generic_GJ" presynapticPopulation="MDL01" postsynapticPopulation="MDL02">
            <electricalConnectionInstanceW id="0" preCell="../MDL01/0/GenericMuscleCell" preSegment="0" preFractionAlong="0.5" postCell="../MDL02/0/GenericMuscleCell" postSegment="0" postFractionAlong="0.5" synapse="muscle_to_muscle_elec_syn" weight="15."/>
        </electricalProjection>
        <electricalProjection id="NC_MDL01_MDL03_Generic_GJ" presynapticPopulation="MDL01" postsynapticPopulation="MDL03">
            <electricalConnectionInstanceW id="0" preCell="../MDL01/0/GenericMuscleCell" preSegment="0" preFractionAlong="0.5" postCell="../MDL03/0/GenericMuscleCell" postSegment="0" postFractionAlong="0.5" synapse="muscle_to_muscle_elec_syn" weight="15."/>
        </electricalProjection>
        <electricalProjection id="NC_MDL02_MDL01_Generic_GJ" presynapticPopulation="MDL02" postsynapticPopulation="MDL01">
            <electricalConnectionInstanceW id="0" preCell="../MDL02/0/GenericMuscleCell" preSegment="0" preFractionAlong="0.5" postCell="../MDL01/0/GenericMuscleCell" postSegment="0" postFractionAlong="0.5" synapse="muscle_to_muscle_elec_syn" weight="15."/>
        </electricalProjection>
        <electricalProjection id="NC_MDL02_MDL03_Generic_GJ" presynapticPopulation="MDL02" postsynapticPopulation="MDL03">
            <electricalConnectionInstanceW id="0" preCell="../MDL02/0/GenericMuscleCell" preSegment="0" preFractionAlong="0.5" postCell="../MDL03/0/GenericMuscleCell" postSegment="0" postFractionAlong="0.5" synapse="muscle_to_muscle_elec_syn" weight="15."/>
        </electricalProjection>
        <electricalProjection id="NC_MDL03_MDL01_Generic_GJ" presynapticPopulation="MDL03" postsynapticPopulation="MDL01">
            <electricalConnectionInstanceW id="0" preCell="../MDL03/0/GenericMuscleCell" preSegment="0" preFractionAlong="0.5" postCell="../MDL01/0/GenericMuscleCell" postSegment="0" postFractionAlong="0.5" synapse="muscle_to_muscle_elec_syn" weight="15."/>
        </electricalProjection>
        <electricalProjection id="NC_MDL03_MDL02_Generic_GJ" presynapticPopulation="MDL03" postsynapticPopulation="MDL02">
            <electricalConnectionInstanceW id="0" preCell="../MDL03/0/GenericMuscleCell" preSegment="0" preFractionAlong="0.5" postCell="../MDL02/0/GenericMuscleCell" postSegment="0" postFractionAlong="0.5" synapse="muscle_to_muscle_elec_syn" weight="15."/>
        </electricalProjection>
        <electricalProjection id="NC_MDL03_MDL04_Generic_GJ" presynapticPopulation="MDL03" postsynapticPopulation="MDL04">
            <electricalConnectionInstanceW id="0" preCell="../MDL03/0/GenericMuscleCell" preSegment="0" preFractionAlong="0.5" postCell="../MDL04/0/GenericMuscleCell" postSegment="0" postFractionAlong="0.5" synapse="muscle_to_muscle_elec_syn" weight="15."/>
        </electricalProjection>
        <electricalProjection id="NC_MDL04_MDL03_Generic_GJ" presynapticPopulation="MDL04" postsynapticPopulation="MDL03">
            <electricalConnectionInstanceW id="0" preCell="../MDL04/0/GenericMuscleCell" preSegment="0" preFractionAlong="0.5" postCell="../MDL03/0/GenericMuscleCell" postSegment="0" postFractionAlong="0.5" synapse="muscle_to_muscle_elec_syn" weight="15."/>
        </electricalProjection>
        <electricalProjection id="NC_MDL04_MDL05_Generic_GJ" presynapticPopulation="MDL04" postsynapticPopulation="MDL05">
            <electricalConnectionInstanceW id="0" preCell="../MDL04/0/GenericMuscleCell" preSegment="0" preFractionAlong="0.5" postCell="../MDL05/0/GenericMuscleCell" postSegment="0" postFractionAlong="0.5" synapse="muscle_to_muscle_elec_syn" weight="15."/>
        </electricalProjection>
        <electricalProjection id="NC_MDL05_MDL04_Generic_GJ" presynapticPopulation="MDL05" postsynapticPopulation="MDL04">
            <electricalConnectionInstanceW id="0" preCell="../MDL05/0/GenericMuscleCell" preSegment="0" preFractionAlong="0.5" postCell="../MDL04/0/GenericMuscleCell" postSegment="0" postFractionAlong="0.5" synapse="muscle_to_muscle_elec_syn" weight="15."/>
        </electricalProjection>
        <electricalProjection id="NC_MDL05_MDL06_Generic_GJ" presynapticPopulation="MDL05" postsynapticPopulation="MDL06">
            <electricalConnectionInstanceW id="0" preCell="../MDL05/0/GenericMuscleCell" preSegment="0" preFractionAlong="0.5" postCell="../MDL06/0/GenericMuscleCell" postSegment="0" postFractionAlong="0.5" synapse="muscle_to_muscle_elec_syn" weight="15."/>
        </electricalProjection>
        <electricalProjection id="NC_MDL06_MDL05_Generic_GJ" presynapticPopulation="MDL06" postsynapticPopulation="MDL05">
            <electricalConnectionInstanceW id="0" preCell="../MDL06/0/GenericMuscleCell" preSegment="0" preFractionAlong="0.5" postCell="../MDL05/0/GenericMuscleCell" postSegment="0" postFractionAlong="0.5" synapse="muscle_to_muscle_elec_syn" weight="15."/>
        </electricalProjection>
        <electricalProjection id="NC_MDL06_MDL07_Generic_GJ" presynapticPopulation="MDL06" postsynapticPopulation="MDL07">
            <electricalConnectionInstanceW id="0" preCell="../MDL06/0/GenericMuscleCell" preSegment="0" preFractionAlong="0.5" postCell="../MDL07/0/GenericMuscleCell" postSegment="0" postFractionAlong="0.5" synapse="muscle_to_muscle_elec_syn" weight="15."/>
        </electricalProjection>
        <electricalProjection id="NC_MDL07_MDL06_Generic_GJ" presynapticPopulation="MDL07" postsynapticPopulation="MDL06">
            <electricalConnectionInstanceW id="0" preCell="../MDL07/0/GenericMuscleCell" preSegment="0" preFractionAlong="0.5" postCell="../MDL06/0/GenericMuscleCell" postSegment="0" postFractionAlong="0.5" synapse="muscle_to_muscle_elec_syn" weight="15."/>
        </electricalProjection>
        <electricalProjection id="NC_MDL07_MDL08_Generic_GJ" presynapticPopulation="MDL07" postsynapticPopulation="MDL08">
            <electricalConnectionInstanceW id="0" preCell="../MDL07/0/GenericMuscleCell" preSegment="0" preFractionAlong="0.5" postCell="../MDL08/0/GenericMuscleCell" postSegment="0" postFractionAlong="0.5" synapse="muscle_to_muscle_elec_syn" weight="15."/>
        </electricalProjection>
        <electricalProjection id="NC_MDL08_MDL07_Generic_GJ" presynapticPopulation="MDL08" postsynapticPopulation="MDL07">
            <electricalConnectionInstanceW id="0" preCell="../MDL08/0/GenericMuscleCell" preSegment="0" preFractionAlong="0.5" postCell="../MDL07/0/GenericMuscleCell" postSegment="0" postFractionAlong="0.5" synapse="muscle_to_muscle_elec_syn" weight="15."/>
        </electricalProjection>
        <electricalProjection id="NC_MDL08_MDL09_Generic_GJ" presynapticPopulation="MDL08" postsynapticPopulation="MDL09">
            <electricalConnectionInstanceW id="0" preCell="../MDL08/0/GenericMuscleCell" preSegment="0" preFractionAlong="0.5" postCell="../MDL09/0/GenericMuscleCell" postSegment="0" postFractionAlong="0.5" synapse="muscle_to_muscle_elec_syn" weight="15."/>
        </electricalProjection>
        <electricalProjection id="NC_MDL09_MDL08_Generic_GJ" presynapticPopulation="MDL09" postsynapticPopulation="MDL08">
            <electricalConnectionInstanceW id="0" preCell="../MDL09/0/GenericMuscleCell" preSegment="0" preFractionAlong="0.5" postCell="../MDL08/0/GenericMuscleCell" postSegment="0" postFractionAlong="0.5" synapse="muscle_to_muscle_elec_syn" weight="15."/>
        </electricalProjection>
        <electricalProjection id="NC_MDL09_MDL10_Generic_GJ" presynapticPopulation="MDL09" postsynapticPopulation="MDL10">
            <electricalConnectionInstanceW id="0" preCell="../MDL09/0/GenericMuscleCell" preSegment="0" preFractionAlong="0.5" postCell="../MDL10/0/GenericMuscleCell" postSegment="0" postFractionAlong="0.5" synapse="muscle_to_muscle_elec_syn" weight="15."/>
        </electricalProjection>
        <electricalProjection id="NC_MDL10_MDL09_Generic_GJ" presynapticPopulation="MDL10" postsynapticPopulation="MDL09">
            <electricalConnectionInstanceW id="0" preCell="../MDL10/0/GenericMuscleCell" preSegment="0" preFractionAlong="0.5" postCell="../MDL09/0/GenericMuscleCell" postSegment="0" postFractionAlong="0.5" synapse="muscle_to_muscle_elec_syn" weight="15."/>
        </electricalProjection>
        <electricalProjection id="NC_MDL10_MDL11_Generic_GJ" presynapticPopulation="MDL10" postsynapticPopulation="MDL11">
            <electricalConnectionInstanceW id="0" preCell="../MDL10/0/GenericMuscleCell" preSegment="0" preFractionAlong="0.5" postCell="../MDL11/0/GenericMuscleCell" postSegment="0" postFractionAlong="0.5" synapse="muscle_to_muscle_elec_syn" weight="15."/>
        </electricalProjection>
        <electricalProjection id="NC_MDL11_MDL10_Generic_GJ" presynapticPopulation="MDL11" postsynapticPopulation="MDL10">
            <electricalConnectionInstanceW id="0" preCell="../MDL11/0/GenericMuscleCell" preSegment="0" preFractionAlong="0.5" postCell="../MDL10/0/GenericMuscleCell" postSegment="0" postFractionAlong="0.5" synapse="muscle_to_muscle_elec_syn" weight="15."/>
        </electricalProjection>
        <electricalProjection id="NC_MDL11_MDL12_Generic_GJ" presynapticPopulation="MDL11" postsynapticPopulation="MDL12">
            <electricalConnectionInstanceW id="0" preCell="../MDL11/0/GenericMuscleCell" preSegment="0" preFractionAlong="0.5" postCell="../MDL12/0/GenericMuscleCell" postSegment="0" postFractionAlong="0.5" synapse="muscle_to_muscle_elec_syn" weight="15."/>
        </electricalProjection>
        <electricalProjection id="NC_MDL12_MDL11_Generic_GJ" presynapticPopulation="MDL12" postsynapticPopulation="MDL11">
            <electricalConnectionInstanceW id="0" preCell="../MDL12/0/GenericMuscleCell" preSegment="0" preFractionAlong="0.5" postCell="../MDL11/0/GenericMuscleCell" postSegment="0" postFractionAlong="0.5" synapse="muscle_to_muscle_elec_syn" weight="15."/>
        </electricalProjection>
        <electricalProjection id="NC_MDL12_MDL13_Generic_GJ" presynapticPopulation="MDL12" postsynapticPopulation="MDL13">
            <electricalConnectionInstanceW id="0" preCell="../MDL12/0/GenericMuscleCell" preSegment="0" preFractionAlong="0.5" postCell="../MDL13/0/GenericMuscleCell" postSegment="0" postFractionAlong="0.5" synapse="muscle_to_muscle_elec_syn" weight="15."/>
        </electricalProjection>
        <electricalProjection id="NC_MDL13_MDL12_Generic_GJ" presynapticPopulation="MDL13" postsynapticPopulation="MDL12">
            <electricalConnectionInstanceW id="0" preCell="../MDL13/0/GenericMuscleCell" preSegment="0" preFractionAlong="0.5" postCell="../MDL12/0/GenericMuscleCell" postSegment="0" postFractionAlong="0.5" synapse="muscle_to_muscle_elec_syn" weight="15."/>
        </electricalProjection>
        <electricalProjection id="NC_MDL13_MDL14_Generic_GJ" presynapticPopulation="MDL13" postsynapticPopulation="MDL14">
            <electricalConnectionInstanceW id="0" preCell="../MDL13/0/GenericMuscleCell" preSegment="0" preFractionAlong="0.5" postCell="../MDL14/0/GenericMuscleCell" postSegment="0" postFractionAlong="0.5" synapse="muscle_to_muscle_elec_syn" weight="15."/>
        </electricalProjection>
        <electricalProjection id="NC_MDL14_MDL13_Generic_GJ" presynapticPopulation="MDL14" postsynapticPopulation="MDL13">
            <electricalConnectionInstanceW id="0" preCell="../MDL14/0/GenericMuscleCell" preSegment="0" preFractionAlong="0.5" postCell="../MDL13/0/GenericMuscleCell" postSegment="0" postFractionAlong="0.5" synapse="muscle_to_muscle_elec_syn" weight="15."/>
        </electricalProjection>
        <electricalProjection id="NC_MDL14_MDL15_Generic_GJ" presynapticPopulation="MDL14" postsynapticPopulation="MDL15">
            <electricalConnectionInstanceW id="0" preCell="../MDL14/0/GenericMuscleCell" preSegment="0" preFractionAlong="0.5" postCell="../MDL15/0/GenericMuscleCell" postSegment="0" postFractionAlong="0.5" synapse="muscle_to_muscle_elec_syn" weight="15."/>
        </electricalProjection>
        <electricalProjection id="NC_MDL15_MDL14_Generic_GJ" presynapticPopulation="MDL15" postsynapticPopulation="MDL14">
            <electricalConnectionInstanceW id="0" preCell="../MDL15/0/GenericMuscleCell" preSegment="0" preFractionAlong="0.5" postCell="../MDL14/0/GenericMuscleCell" postSegment="0" postFractionAlong="0.5" synapse="muscle_to_muscle_elec_syn" weight="15."/>
        </electricalProjection>
        <electricalProjection id="NC_MDL15_MDL16_Generic_GJ" presynapticPopulation="MDL15" postsynapticPopulation="MDL16">
            <electricalConnectionInstanceW id="0" preCell="../MDL15/0/GenericMuscleCell" preSegment="0" preFractionAlong="0.5" postCell="../MDL16/0/GenericMuscleCell" postSegment="0" postFractionAlong="0.5" synapse="muscle_to_muscle_elec_syn" weight="15."/>
        </electricalProjection>
        <electricalProjection id="NC_MDL16_MDL15_Generic_GJ" presynapticPopulation="MDL16" postsynapticPopulation="MDL15">
            <electricalConnectionInstanceW id="0" preCell="../MDL16/0/GenericMuscleCell" preSegment="0" preFractionAlong="0.5" postCell="../MDL15/0/GenericMuscleCell" postSegment="0" postFractionAlong="0.5" synapse="muscle_to_muscle_elec_syn" weight="15."/>
        </electricalProjection>
        <electricalProjection id="NC_MDL16_MDL17_Generic_GJ" presynapticPopulation="MDL16" postsynapticPopulation="MDL17">
            <electricalConnectionInstanceW id="0" preCell="../MDL16/0/GenericMuscleCell" preSegment="0" preFractionAlong="0.5" postCell="../MDL17/0/GenericMuscleCell" postSegment="0" postFractionAlong="0.5" synapse="muscle_to_muscle_elec_syn" weight="15."/>
        </electricalProjection>
        <electricalProjection id="NC_MDL17_MDL16_Generic_GJ" presynapticPopulation="MDL17" postsynapticPopulation="MDL16">
            <electricalConnectionInstanceW id="0" preCell="../MDL17/0/GenericMuscleCell" preSegment="0" preFractionAlong="0.5" postCell="../MDL16/0/GenericMuscleCell" postSegment="0" postFractionAlong="0.5" synapse="muscle_to_muscle_elec_syn" weight="15."/>
        </electricalProjection>
        <electricalProjection id="NC_MDL17_MDL18_Generic_GJ" presynapticPopulation="MDL17" postsynapticPopulation="MDL18">
            <electricalConnectionInstanceW id="0" preCell="../MDL17/0/GenericMuscleCell" preSegment="0" preFractionAlong="0.5" postCell="../MDL18/0/GenericMuscleCell" postSegment="0" postFractionAlong="0.5" synapse="muscle_to_muscle_elec_syn" weight="15."/>
        </electricalProjection>
        <electricalProjection id="NC_MDL18_MDL17_Generic_GJ" presynapticPopulation="MDL18" postsynapticPopulation="MDL17">
            <electricalConnectionInstanceW id="0" preCell="../MDL18/0/GenericMuscleCell" preSegment="0" preFractionAlong="0.5" postCell="../MDL17/0/GenericMuscleCell" postSegment="0" postFractionAlong="0.5" synapse="muscle_to_muscle_elec_syn" weight="15."/>
        </electricalProjection>
        <electricalProjection id="NC_MDL18_MDL19_Generic_GJ" presynapticPopulation="MDL18" postsynapticPopulation="MDL19">
            <electricalConnectionInstanceW id="0" preCell="../MDL18/0/GenericMuscleCell" preSegment="0" preFractionAlong="0.5" postCell="../MDL19/0/GenericMuscleCell" postSegment="0" postFractionAlong="0.5" synapse="muscle_to_muscle_elec_syn" weight="15."/>
        </electricalProjection>
        <electricalProjection id="NC_MDL19_MDL18_Generic_GJ" presynapticPopulation="MDL19" postsynapticPopulation="MDL18">
            <electricalConnectionInstanceW id="0" preCell="../MDL19/0/GenericMuscleCell" preSegment="0" preFractionAlong="0.5" postCell="../MDL18/0/GenericMuscleCell" postSegment="0" postFractionAlong="0.5" synapse="muscle_to_muscle_elec_syn" weight="15."/>
        </electricalProjection>
        <electricalProjection id="NC_MDL19_MDL20_Generic_GJ" presynapticPopulation="MDL19" postsynapticPopulation="MDL20">
            <electricalConnectionInstanceW id="0" preCell="../MDL19/0/GenericMuscleCell" preSegment="0" preFractionAlong="0.5" postCell="../MDL20/0/GenericMuscleCell" postSegment="0" postFractionAlong="0.5" synapse="muscle_to_muscle_elec_syn" weight="15."/>
        </electricalProjection>
        <electricalProjection id="NC_MDL20_MDL19_Generic_GJ" presynapticPopulation="MDL20" postsynapticPopulation="MDL19">
            <electricalConnectionInstanceW id="0" preCell="../MDL20/0/GenericMuscleCell" preSegment="0" preFractionAlong="0.5" postCell="../MDL19/0/GenericMuscleCell" postSegment="0" postFractionAlong="0.5" synapse="muscle_to_muscle_elec_syn" weight="15."/>
        </electricalProjection>
        <electricalProjection id="NC_MDL20_MDL21_Generic_GJ" presynapticPopulation="MDL20" postsynapticPopulation="MDL21">
            <electricalConnectionInstanceW id="0" preCell="../MDL20/0/GenericMuscleCell" preSegment="0" preFractionAlong="0.5" postCell="../MDL21/0/GenericMuscleCell" postSegment="0" postFractionAlong="0.5" synapse="muscle_to_muscle_elec_syn" weight="15."/>
        </electricalProjection>
        <electricalProjection id="NC_MDL21_MDL20_Generic_GJ" presynapticPopulation="MDL21" postsynapticPopulation="MDL20">
            <electricalConnectionInstanceW id="0" preCell="../MDL21/0/GenericMuscleCell" preSegment="0" preFractionAlong="0.5" postCell="../MDL20/0/GenericMuscleCell" postSegment="0" postFractionAlong="0.5" synapse="muscle_to_muscle_elec_syn" weight="15."/>
        </electricalProjection>
        <electricalProjection id="NC_MDL21_MDL22_Generic_GJ" presynapticPopulation="MDL21" postsynapticPopulation="MDL22">
            <electricalConnectionInstanceW id="0" preCell="../MDL21/0/GenericMuscleCell" preSegment="0" preFractionAlong="0.5" postCell="../MDL22/0/GenericMuscleCell" postSegment="0" postFractionAlong="0.5" synapse="muscle_to_muscle_elec_syn" weight="15."/>
        </electricalProjection>
        <electricalProjection id="NC_MDL22_MDL21_Generic_GJ" presynapticPopulation="MDL22" postsynapticPopulation="MDL21">
            <electricalConnectionInstanceW id="0" preCell="../MDL22/0/GenericMuscleCell" preSegment="0" preFractionAlong="0.5" postCell="../MDL21/0/GenericMuscleCell" postSegment="0" postFractionAlong="0.5" synapse="muscle_to_muscle_elec_syn" weight="15."/>
        </electricalProjection>
        <electricalProjection id="NC_MDL22_MDL23_Generic_GJ" presynapticPopulation="MDL22" postsynapticPopulation="MDL23">
            <electricalConnectionInstanceW id="0" preCell="../MDL22/0/GenericMuscleCell" preSegment="0" preFractionAlong="0.5" postCell="../MDL23/0/GenericMuscleCell" postSegment="0" postFractionAlong="0.5" synapse="muscle_to_muscle_elec_syn" weight="15."/>
        </electricalProjection>
        <electricalProjection id="NC_MDL23_MDL22_Generic_GJ" presynapticPopulation="MDL23" postsynapticPopulation="MDL22">
            <electricalConnectionInstanceW id="0" preCell="../MDL23/0/GenericMuscleCell" preSegment="0" preFractionAlong="0.5" postCell="../MDL22/0/GenericMuscleCell" postSegment="0" postFractionAlong="0.5" synapse="muscle_to_muscle_elec_syn" weight="15."/>
        </electricalProjection>
        <electricalProjection id="NC_MDL23_MDL24_Generic_GJ" presynapticPopulation="MDL23" postsynapticPopulation="MDL24">
            <electricalConnectionInstanceW id="0" preCell="../MDL23/0/GenericMuscleCell" preSegment="0" preFractionAlong="0.5" postCell="../MDL24/0/GenericMuscleCell" postSegment="0" postFractionAlong="0.5" synapse="muscle_to_muscle_elec_syn" weight="15."/>
        </electricalProjection>
        <electricalProjection id="NC_MDL24_MDL23_Generic_GJ" presynapticPopulation="MDL24" postsynapticPopulation="MDL23">
            <electricalConnectionInstanceW id="0" preCell="../MDL24/0/GenericMuscleCell" preSegment="0" preFractionAlong="0.5" postCell="../MDL23/0/GenericMuscleCell" postSegment="0" postFractionAlong="0.5" synapse="muscle_to_muscle_elec_syn" weight="15."/>
        </electricalProjection>
        <electricalProjection id="NC_MDR01_MDR02_Generic_GJ" presynapticPopulation="MDR01" postsynapticPopulation="MDR02">
            <electricalConnectionInstanceW id="0" preCell="../MDR01/0/GenericMuscleCell" preSegment="0" preFractionAlong="0.5" postCell="../MDR02/0/GenericMuscleCell" postSegment="0" postFractionAlong="0.5" synapse="muscle_to_muscle_elec_syn" weight="15."/>
        </electricalProjection>
        <electricalProjection id="NC_MDR01_MDR03_Generic_GJ" presynapticPopulation="MDR01" postsynapticPopulation="MDR03">
            <electricalConnectionInstanceW id="0" preCell="../MDR01/0/GenericMuscleCell" preSegment="0" preFractionAlong="0.5" postCell="../MDR03/0/GenericMuscleCell" postSegment="0" postFractionAlong="0.5" synapse="muscle_to_muscle_elec_syn" weight="15."/>
        </electricalProjection>
        <electricalProjection id="NC_MDR02_MDR01_Generic_GJ" presynapticPopulation="MDR02" postsynapticPopulation="MDR01">
            <electricalConnectionInstanceW id="0" preCell="../MDR02/0/GenericMuscleCell" preSegment="0" preFractionAlong="0.5" postCell="../MDR01/0/GenericMuscleCell" postSegment="0" postFractionAlong="0.5" synapse="muscle_to_muscle_elec_syn" weight="15."/>
        </electricalProjection>
        <electricalProjection id="NC_MDR02_MDR03_Generic_GJ" presynapticPopulation="MDR02" postsynapticPopulation="MDR03">
            <electricalConnectionInstanceW id="0" preCell="../MDR02/0/GenericMuscleCell" preSegment="0" preFractionAlong="0.5" postCell="../MDR03/0/GenericMuscleCell" postSegment="0" postFractionAlong="0.5" synapse="muscle_to_muscle_elec_syn" weight="15."/>
        </electricalProjection>
        <electricalProjection id="NC_MDR03_MDR01_Generic_GJ" presynapticPopulation="MDR03" postsynapticPopulation="MDR01">
            <electricalConnectionInstanceW id="0" preCell="../MDR03/0/GenericMuscleCell" preSegment="0" preFractionAlong="0.5" postCell="../MDR01/0/GenericMuscleCell" postSegment="0" postFractionAlong="0.5" synapse="muscle_to_muscle_elec_syn" weight="15."/>
        </electricalProjection>
        <electricalProjection id="NC_MDR03_MDR02_Generic_GJ" presynapticPopulation="MDR03" postsynapticPopulation="MDR02">
            <electricalConnectionInstanceW id="0" preCell="../MDR03/0/GenericMuscleCell" preSegment="0" preFractionAlong="0.5" postCell="../MDR02/0/GenericMuscleCell" postSegment="0" postFractionAlong="0.5" synapse="muscle_to_muscle_elec_syn" weight="15."/>
        </electricalProjection>
        <electricalProjection id="NC_MDR03_MDR04_Generic_GJ" presynapticPopulation="MDR03" postsynapticPopulation="MDR04">
            <electricalConnectionInstanceW id="0" preCell="../MDR03/0/GenericMuscleCell" preSegment="0" preFractionAlong="0.5" postCell="../MDR04/0/GenericMuscleCell" postSegment="0" postFractionAlong="0.5" synapse="muscle_to_muscle_elec_syn" weight="15."/>
        </electricalProjection>
        <electricalProjection id="NC_MDR04_MDR03_Generic_GJ" presynapticPopulation="MDR04" postsynapticPopulation="MDR03">
            <electricalConnectionInstanceW id="0" preCell="../MDR04/0/GenericMuscleCell" preSegment="0" preFractionAlong="0.5" postCell="../MDR03/0/GenericMuscleCell" postSegment="0" postFractionAlong="0.5" synapse="muscle_to_muscle_elec_syn" weight="15."/>
        </electricalProjection>
        <electricalProjection id="NC_MDR04_MDR05_Generic_GJ" presynapticPopulation="MDR04" postsynapticPopulation="MDR05">
            <electricalConnectionInstanceW id="0" preCell="../MDR04/0/GenericMuscleCell" preSegment="0" preFractionAlong="0.5" postCell="../MDR05/0/GenericMuscleCell" postSegment="0" postFractionAlong="0.5" synapse="muscle_to_muscle_elec_syn" weight="15."/>
        </electricalProjection>
        <electricalProjection id="NC_MDR05_MDR04_Generic_GJ" presynapticPopulation="MDR05" postsynapticPopulation="MDR04">
            <electricalConnectionInstanceW id="0" preCell="../MDR05/0/GenericMuscleCell" preSegment="0" preFractionAlong="0.5" postCell="../MDR04/0/GenericMuscleCell" postSegment="0" postFractionAlong="0.5" synapse="muscle_to_muscle_elec_syn" weight="15."/>
        </electricalProjection>
        <electricalProjection id="NC_MDR05_MDR06_Generic_GJ" presynapticPopulation="MDR05" postsynapticPopulation="MDR06">
            <electricalConnectionInstanceW id="0" preCell="../MDR05/0/GenericMuscleCell" preSegment="0" preFractionAlong="0.5" postCell="../MDR06/0/GenericMuscleCell" postSegment="0" postFractionAlong="0.5" synapse="muscle_to_muscle_elec_syn" weight="15."/>
        </electricalProjection>
        <electricalProjection id="NC_MDR06_MDR05_Generic_GJ" presynapticPopulation="MDR06" postsynapticPopulation="MDR05">
            <electricalConnectionInstanceW id="0" preCell="../MDR06/0/GenericMuscleCell" preSegment="0" preFractionAlong="0.5" postCell="../MDR05/0/GenericMuscleCell" postSegment="0" postFractionAlong="0.5" synapse="muscle_to_muscle_elec_syn" weight="15."/>
        </electricalProjection>
        <electricalProjection id="NC_MDR06_MDR07_Generic_GJ" presynapticPopulation="MDR06" postsynapticPopulation="MDR07">
            <electricalConnectionInstanceW id="0" preCell="../MDR06/0/GenericMuscleCell" preSegment="0" preFractionAlong="0.5" postCell="../MDR07/0/GenericMuscleCell" postSegment="0" postFractionAlong="0.5" synapse="muscle_to_muscle_elec_syn" weight="15."/>
        </electricalProjection>
        <electricalProjection id="NC_MDR07_MDR06_Generic_GJ" presynapticPopulation="MDR07" postsynapticPopulation="MDR06">
            <electricalConnectionInstanceW id="0" preCell="../MDR07/0/GenericMuscleCell" preSegment="0" preFractionAlong="0.5" postCell="../MDR06/0/GenericMuscleCell" postSegment="0" postFractionAlong="0.5" synapse="muscle_to_muscle_elec_syn" weight="15."/>
        </electricalProjection>
        <electricalProjection id="NC_MDR07_MDR08_Generic_GJ" presynapticPopulation="MDR07" postsynapticPopulation="MDR08">
            <electricalConnectionInstanceW id="0" preCell="../MDR07/0/GenericMuscleCell" preSegment="0" preFractionAlong="0.5" postCell="../MDR08/0/GenericMuscleCell" postSegment="0" postFractionAlong="0.5" synapse="muscle_to_muscle_elec_syn" weight="15."/>
        </electricalProjection>
        <electricalProjection id="NC_MDR08_MDR07_Generic_GJ" presynapticPopulation="MDR08" postsynapticPopulation="MDR07">
            <electricalConnectionInstanceW id="0" preCell="../MDR08/0/GenericMuscleCell" preSegment="0" preFractionAlong="0.5" postCell="../MDR07/0/GenericMuscleCell" postSegment="0" postFractionAlong="0.5" synapse="muscle_to_muscle_elec_syn" weight="15."/>
        </electricalProjection>
        <electricalProjection id="NC_MDR08_MDR09_Generic_GJ" presynapticPopulation="MDR08" postsynapticPopulation="MDR09">
            <electricalConnectionInstanceW id="0" preCell="../MDR08/0/GenericMuscleCell" preSegment="0" preFractionAlong="0.5" postCell="../MDR09/0/GenericMuscleCell" postSegment="0" postFractionAlong="0.5" synapse="muscle_to_muscle_elec_syn" weight="15."/>
        </electricalProjection>
        <electricalProjection id="NC_MDR09_MDR08_Generic_GJ" presynapticPopulation="MDR09" postsynapticPopulation="MDR08">
            <electricalConnectionInstanceW id="0" preCell="../MDR09/0/GenericMuscleCell" preSegment="0" preFractionAlong="0.5" postCell="../MDR08/0/GenericMuscleCell" postSegment="0" postFractionAlong="0.5" synapse="muscle_to_muscle_elec_syn" weight="15."/>
        </electricalProjection>
        <electricalProjection id="NC_MDR09_MDR10_Generic_GJ" presynapticPopulation="MDR09" postsynapticPopulation="MDR10">
            <electricalConnectionInstanceW id="0" preCell="../MDR09/0/GenericMuscleCell" preSegment="0" preFractionAlong="0.5" postCell="../MDR10/0/GenericMuscleCell" postSegment="0" postFractionAlong="0.5" synapse="muscle_to_muscle_elec_syn" weight="15."/>
        </electricalProjection>
        <electricalProjection id="NC_MDR10_MDR09_Generic_GJ" presynapticPopulation="MDR10" postsynapticPopulation="MDR09">
            <electricalConnectionInstanceW id="0" preCell="../MDR10/0/GenericMuscleCell" preSegment="0" preFractionAlong="0.5" postCell="../MDR09/0/GenericMuscleCell" postSegment="0" postFractionAlong="0.5" synapse="muscle_to_muscle_elec_syn" weight="15."/>
        </electricalProjection>
        <electricalProjection id="NC_MDR10_MDR11_Generic_GJ" presynapticPopulation="MDR10" postsynapticPopulation="MDR11">
            <electricalConnectionInstanceW id="0" preCell="../MDR10/0/GenericMuscleCell" preSegment="0" preFractionAlong="0.5" postCell="../MDR11/0/GenericMuscleCell" postSegment="0" postFractionAlong="0.5" synapse="muscle_to_muscle_elec_syn" weight="15."/>
        </electricalProjection>
        <electricalProjection id="NC_MDR11_MDR10_Generic_GJ" presynapticPopulation="MDR11" postsynapticPopulation="MDR10">
            <electricalConnectionInstanceW id="0" preCell="../MDR11/0/GenericMuscleCell" preSegment="0" preFractionAlong="0.5" postCell="../MDR10/0/GenericMuscleCell" postSegment="0" postFractionAlong="0.5" synapse="muscle_to_muscle_elec_syn" weight="15."/>
        </electricalProjection>
        <electricalProjection id="NC_MDR11_MDR12_Generic_GJ" presynapticPopulation="MDR11" postsynapticPopulation="MDR12">
            <electricalConnectionInstanceW id="0" preCell="../MDR11/0/GenericMuscleCell" preSegment="0" preFractionAlong="0.5" postCell="../MDR12/0/GenericMuscleCell" postSegment="0" postFractionAlong="0.5" synapse="muscle_to_muscle_elec_syn" weight="15."/>
        </electricalProjection>
        <electricalProjection id="NC_MDR12_MDR11_Generic_GJ" presynapticPopulation="MDR12" postsynapticPopulation="MDR11">
            <electricalConnectionInstanceW id="0" preCell="../MDR12/0/GenericMuscleCell" preSegment="0" preFractionAlong="0.5" postCell="../MDR11/0/GenericMuscleCell" postSegment="0" postFractionAlong="0.5" synapse="muscle_to_muscle_elec_syn" weight="15."/>
        </electricalProjection>
        <electricalProjection id="NC_MDR12_MDR13_Generic_GJ" presynapticPopulation="MDR12" postsynapticPopulation="MDR13">
            <electricalConnectionInstanceW id="0" preCell="../MDR12/0/GenericMuscleCell" preSegment="0" preFractionAlong="0.5" postCell="../MDR13/0/GenericMuscleCell" postSegment="0" postFractionAlong="0.5" synapse="muscle_to_muscle_elec_syn" weight="15."/>
        </electricalProjection>
        <electricalProjection id="NC_MDR13_MDR12_Generic_GJ" presynapticPopulation="MDR13" postsynapticPopulation="MDR12">
            <electricalConnectionInstanceW id="0" preCell="../MDR13/0/GenericMuscleCell" preSegment="0" preFractionAlong="0.5" postCell="../MDR12/0/GenericMuscleCell" postSegment="0" postFractionAlong="0.5" synapse="muscle_to_muscle_elec_syn" weight="15."/>
        </electricalProjection>
        <electricalProjection id="NC_MDR13_MDR14_Generic_GJ" presynapticPopulation="MDR13" postsynapticPopulation="MDR14">
            <electricalConnectionInstanceW id="0" preCell="../MDR13/0/GenericMuscleCell" preSegment="0" preFractionAlong="0.5" postCell="../MDR14/0/GenericMuscleCell" postSegment="0" postFractionAlong="0.5" synapse="muscle_to_muscle_elec_syn" weight="15."/>
        </electricalProjection>
        <electricalProjection id="NC_MDR14_MDR13_Generic_GJ" presynapticPopulation="MDR14" postsynapticPopulation="MDR13">
            <electricalConnectionInstanceW id="0" preCell="../MDR14/0/GenericMuscleCell" preSegment="0" preFractionAlong="0.5" postCell="../MDR13/0/GenericMuscleCell" postSegment="0" postFractionAlong="0.5" synapse="muscle_to_muscle_elec_syn" weight="15."/>
        </electricalProjection>
        <electricalProjection id="NC_MDR14_MDR15_Generic_GJ" presynapticPopulation="MDR14" postsynapticPopulation="MDR15">
            <electricalConnectionInstanceW id="0" preCell="../MDR14/0/GenericMuscleCell" preSegment="0" preFractionAlong="0.5" postCell="../MDR15/0/GenericMuscleCell" postSegment="0" postFractionAlong="0.5" synapse="muscle_to_muscle_elec_syn" weight="15."/>
        </electricalProjection>
        <electricalProjection id="NC_MDR15_MDR14_Generic_GJ" presynapticPopulation="MDR15" postsynapticPopulation="MDR14">
            <electricalConnectionInstanceW id="0" preCell="../MDR15/0/GenericMuscleCell" preSegment="0" preFractionAlong="0.5" postCell="../MDR14/0/GenericMuscleCell" postSegment="0" postFractionAlong="0.5" synapse="muscle_to_muscle_elec_syn" weight="15."/>
        </electricalProjection>
        <electricalProjection id="NC_MDR15_MDR16_Generic_GJ" presynapticPopulation="MDR15" postsynapticPopulation="MDR16">
            <electricalConnectionInstanceW id="0" preCell="../MDR15/0/GenericMuscleCell" preSegment="0" preFractionAlong="0.5" postCell="../MDR16/0/GenericMuscleCell" postSegment="0" postFractionAlong="0.5" synapse="muscle_to_muscle_elec_syn" weight="15."/>
        </electricalProjection>
        <electricalProjection id="NC_MDR16_MDR15_Generic_GJ" presynapticPopulation="MDR16" postsynapticPopulation="MDR15">
            <electricalConnectionInstanceW id="0" preCell="../MDR16/0/GenericMuscleCell" preSegment="0" preFractionAlong="0.5" postCell="../MDR15/0/GenericMuscleCell" postSegment="0" postFractionAlong="0.5" synapse="muscle_to_muscle_elec_syn" weight="15."/>
        </electricalProjection>
        <electricalProjection id="NC_MDR16_MDR17_Generic_GJ" presynapticPopulation="MDR16" postsynapticPopulation="MDR17">
            <electricalConnectionInstanceW id="0" preCell="../MDR16/0/GenericMuscleCell" preSegment="0" preFractionAlong="0.5" postCell="../MDR17/0/GenericMuscleCell" postSegment="0" postFractionAlong="0.5" synapse="muscle_to_muscle_elec_syn" weight="15."/>
        </electricalProjection>
        <electricalProjection id="NC_MDR17_MDR16_Generic_GJ" presynapticPopulation="MDR17" postsynapticPopulation="MDR16">
            <electricalConnectionInstanceW id="0" preCell="../MDR17/0/GenericMuscleCell" preSegment="0" preFractionAlong="0.5" postCell="../MDR16/0/GenericMuscleCell" postSegment="0" postFractionAlong="0.5" synapse="muscle_to_muscle_elec_syn" weight="15."/>
        </electricalProjection>
        <electricalProjection id="NC_MDR17_MDR18_Generic_GJ" presynapticPopulation="MDR17" postsynapticPopulation="MDR18">
            <electricalConnectionInstanceW id="0" preCell="../MDR17/0/GenericMuscleCell" preSegment="0" preFractionAlong="0.5" postCell="../MDR18/0/GenericMuscleCell" postSegment="0" postFractionAlong="0.5" synapse="muscle_to_muscle_elec_syn" weight="15."/>
        </electricalProjection>
        <electricalProjection id="NC_MDR18_MDR17_Generic_GJ" presynapticPopulation="MDR18" postsynapticPopulation="MDR17">
            <electricalConnectionInstanceW id="0" preCell="../MDR18/0/GenericMuscleCell" preSegment="0" preFractionAlong="0.5" postCell="../MDR17/0/GenericMuscleCell" postSegment="0" postFractionAlong="0.5" synapse="muscle_to_muscle_elec_syn" weight="15."/>
        </electricalProjection>
        <electricalProjection id="NC_MDR18_MDR19_Generic_GJ" presynapticPopulation="MDR18" postsynapticPopulation="MDR19">
            <electricalConnectionInstanceW id="0" preCell="../MDR18/0/GenericMuscleCell" preSegment="0" preFractionAlong="0.5" postCell="../MDR19/0/GenericMuscleCell" postSegment="0" postFractionAlong="0.5" synapse="muscle_to_muscle_elec_syn" weight="15."/>
        </electricalProjection>
        <electricalProjection id="NC_MDR19_MDR18_Generic_GJ" presynapticPopulation="MDR19" postsynapticPopulation="MDR18">
            <electricalConnectionInstanceW id="0" preCell="../MDR19/0/GenericMuscleCell" preSegment="0" preFractionAlong="0.5" postCell="../MDR18/0/GenericMuscleCell" postSegment="0" postFractionAlong="0.5" synapse="muscle_to_muscle_elec_syn" weight="15."/>
        </electricalProjection>
        <electricalProjection id="NC_MDR19_MDR20_Generic_GJ" presynapticPopulation="MDR19" postsynapticPopulation="MDR20">
            <electricalConnectionInstanceW id="0" preCell="../MDR19/0/GenericMuscleCell" preSegment="0" preFractionAlong="0.5" postCell="../MDR20/0/GenericMuscleCell" postSegment="0" postFractionAlong="0.5" synapse="muscle_to_muscle_elec_syn" weight="15."/>
        </electricalProjection>
        <electricalProjection id="NC_MDR20_MDR19_Generic_GJ" presynapticPopulation="MDR20" postsynapticPopulation="MDR19">
            <electricalConnectionInstanceW id="0" preCell="../MDR20/0/GenericMuscleCell" preSegment="0" preFractionAlong="0.5" postCell="../MDR19/0/GenericMuscleCell" postSegment="0" postFractionAlong="0.5" synapse="muscle_to_muscle_elec_syn" weight="15."/>
        </electricalProjection>
        <electricalProjection id="NC_MDR20_MDR21_Generic_GJ" presynapticPopulation="MDR20" postsynapticPopulation="MDR21">
            <electricalConnectionInstanceW id="0" preCell="../MDR20/0/GenericMuscleCell" preSegment="0" preFractionAlong="0.5" postCell="../MDR21/0/GenericMuscleCell" postSegment="0" postFractionAlong="0.5" synapse="muscle_to_muscle_elec_syn" weight="15."/>
        </electricalProjection>
        <electricalProjection id="NC_MDR21_MDR20_Generic_GJ" presynapticPopulation="MDR21" postsynapticPopulation="MDR20">
            <electricalConnectionInstanceW id="0" preCell="../MDR21/0/GenericMuscleCell" preSegment="0" preFractionAlong="0.5" postCell="../MDR20/0/GenericMuscleCell" postSegment="0" postFractionAlong="0.5" synapse="muscle_to_muscle_elec_syn" weight="15."/>
        </electricalProjection>
        <electricalProjection id="NC_MDR21_MDR22_Generic_GJ" presynapticPopulation="MDR21" postsynapticPopulation="MDR22">
            <electricalConnectionInstanceW id="0" preCell="../MDR21/0/GenericMuscleCell" preSegment="0" preFractionAlong="0.5" postCell="../MDR22/0/GenericMuscleCell" postSegment="0" postFractionAlong="0.5" synapse="muscle_to_muscle_elec_syn" weight="15."/>
        </electricalProjection>
        <electricalProjection id="NC_MDR22_MDR21_Generic_GJ" presynapticPopulation="MDR22" postsynapticPopulation="MDR21">
            <electricalConnectionInstanceW id="0" preCell="../MDR22/0/GenericMuscleCell" preSegment="0" preFractionAlong="0.5" postCell="../MDR21/0/GenericMuscleCell" postSegment="0" postFractionAlong="0.5" synapse="muscle_to_muscle_elec_syn" weight="15."/>
        </electricalProjection>
        <electricalProjection id="NC_MDR22_MDR23_Generic_GJ" presynapticPopulation="MDR22" postsynapticPopulation="MDR23">
            <electricalConnectionInstanceW id="0" preCell="../MDR22/0/GenericMuscleCell" preSegment="0" preFractionAlong="0.5" postCell="../MDR23/0/GenericMuscleCell" postSegment="0" postFractionAlong="0.5" synapse="muscle_to_muscle_elec_syn" weight="15."/>
        </electricalProjection>
        <electricalProjection id="NC_MDR23_MDR22_Generic_GJ" presynapticPopulation="MDR23" postsynapticPopulation="MDR22">
            <electricalConnectionInstanceW id="0" preCell="../MDR23/0/GenericMuscleCell" preSegment="0" preFractionAlong="0.5" postCell="../MDR22/0/GenericMuscleCell" postSegment="0" postFractionAlong="0.5" synapse="muscle_to_muscle_elec_syn" weight="15."/>
        </electricalProjection>
        <electricalProjection id="NC_MDR23_MDR24_Generic_GJ" presynapticPopulation="MDR23" postsynapticPopulation="MDR24">
            <electricalConnectionInstanceW id="0" preCell="../MDR23/0/GenericMuscleCell" preSegment="0" preFractionAlong="0.5" postCell="../MDR24/0/GenericMuscleCell" postSegment="0" postFractionAlong="0.5" synapse="muscle_to_muscle_elec_syn" weight="15."/>
        </electricalProjection>
        <electricalProjection id="NC_MDR24_MDR23_Generic_GJ" presynapticPopulation="MDR24" postsynapticPopulation="MDR23">
            <electricalConnectionInstanceW id="0" preCell="../MDR24/0/GenericMuscleCell" preSegment="0" preFractionAlong="0.5" postCell="../MDR23/0/GenericMuscleCell" postSegment="0" postFractionAlong="0.5" synapse="muscle_to_muscle_elec_syn" weight="15."/>
        </electricalProjection>
        <electricalProjection id="NC_MVL01_MVL02_Generic_GJ" presynapticPopulation="MVL01" postsynapticPopulation="MVL02">
            <electricalConnectionInstanceW id="0" preCell="../MVL01/0/GenericMuscleCell" preSegment="0" preFractionAlong="0.5" postCell="../MVL02/0/GenericMuscleCell" postSegment="0" postFractionAlong="0.5" synapse="muscle_to_muscle_elec_syn" weight="15."/>
        </electricalProjection>
        <electricalProjection id="NC_MVL01_MVL03_Generic_GJ" presynapticPopulation="MVL01" postsynapticPopulation="MVL03">
            <electricalConnectionInstanceW id="0" preCell="../MVL01/0/GenericMuscleCell" preSegment="0" preFractionAlong="0.5" postCell="../MVL03/0/GenericMuscleCell" postSegment="0" postFractionAlong="0.5" synapse="muscle_to_muscle_elec_syn" weight="15."/>
        </electricalProjection>
        <electricalProjection id="NC_MVL02_MVL01_Generic_GJ" presynapticPopulation="MVL02" postsynapticPopulation="MVL01">
            <electricalConnectionInstanceW id="0" preCell="../MVL02/0/GenericMuscleCell" preSegment="0" preFractionAlong="0.5" postCell="../MVL01/0/GenericMuscleCell" postSegment="0" postFractionAlong="0.5" synapse="muscle_to_muscle_elec_syn" weight="15."/>
        </electricalProjection>
        <electricalProjection id="NC_MVL02_MVL03_Generic_GJ" presynapticPopulation="MVL02" postsynapticPopulation="MVL03">
            <electricalConnectionInstanceW id="0" preCell="../MVL02/0/GenericMuscleCell" preSegment="0" preFractionAlong="0.5" postCell="../MVL03/0/GenericMuscleCell" postSegment="0" postFractionAlong="0.5" synapse="muscle_to_muscle_elec_syn" weight="15."/>
        </electricalProjection>
        <electricalProjection id="NC_MVL03_MVL01_Generic_GJ" presynapticPopulation="MVL03" postsynapticPopulation="MVL01">
            <electricalConnectionInstanceW id="0" preCell="../MVL03/0/GenericMuscleCell" preSegment="0" preFractionAlong="0.5" postCell="../MVL01/0/GenericMuscleCell" postSegment="0" postFractionAlong="0.5" synapse="muscle_to_muscle_elec_syn" weight="15."/>
        </electricalProjection>
        <electricalProjection id="NC_MVL03_MVL02_Generic_GJ" presynapticPopulation="MVL03" postsynapticPopulation="MVL02">
            <electricalConnectionInstanceW id="0" preCell="../MVL03/0/GenericMuscleCell" preSegment="0" preFractionAlong="0.5" postCell="../MVL02/0/GenericMuscleCell" postSegment="0" postFractionAlong="0.5" synapse="muscle_to_muscle_elec_syn" weight="15."/>
        </electricalProjection>
        <electricalProjection id="NC_MVL03_MVL04_Generic_GJ" presynapticPopulation="MVL03" postsynapticPopulation="MVL04">
            <electricalConnectionInstanceW id="0" preCell="../MVL03/0/GenericMuscleCell" preSegment="0" preFractionAlong="0.5" postCell="../MVL04/0/GenericMuscleCell" postSegment="0" postFractionAlong="0.5" synapse="muscle_to_muscle_elec_syn" weight="15."/>
        </electricalProjection>
        <electricalProjection id="NC_MVL04_MVL03_Generic_GJ" presynapticPopulation="MVL04" postsynapticPopulation="MVL03">
            <electricalConnectionInstanceW id="0" preCell="../MVL04/0/GenericMuscleCell" preSegment="0" preFractionAlong="0.5" postCell="../MVL03/0/GenericMuscleCell" postSegment="0" postFractionAlong="0.5" synapse="muscle_to_muscle_elec_syn" weight="15."/>
        </electricalProjection>
        <electricalProjection id="NC_MVL04_MVL05_Generic_GJ" presynapticPopulation="MVL04" postsynapticPopulation="MVL05">
            <electricalConnectionInstanceW id="0" preCell="../MVL04/0/GenericMuscleCell" preSegment="0" preFractionAlong="0.5" postCell="../MVL05/0/GenericMuscleCell" postSegment="0" postFractionAlong="0.5" synapse="muscle_to_muscle_elec_syn" weight="15."/>
        </electricalProjection>
        <electricalProjection id="NC_MVL05_MVL04_Generic_GJ" presynapticPopulation="MVL05" postsynapticPopulation="MVL04">
            <electricalConnectionInstanceW id="0" preCell="../MVL05/0/GenericMuscleCell" preSegment="0" preFractionAlong="0.5" postCell="../MVL04/0/GenericMuscleCell" postSegment="0" postFractionAlong="0.5" synapse="muscle_to_muscle_elec_syn" weight="15."/>
        </electricalProjection>
        <electricalProjection id="NC_MVL05_MVL06_Generic_GJ" presynapticPopulation="MVL05" postsynapticPopulation="MVL06">
            <electricalConnectionInstanceW id="0" preCell="../MVL05/0/GenericMuscleCell" preSegment="0" preFractionAlong="0.5" postCell="../MVL06/0/GenericMuscleCell" postSegment="0" postFractionAlong="0.5" synapse="muscle_to_muscle_elec_syn" weight="15."/>
        </electricalProjection>
        <electricalProjection id="NC_MVL06_MVL05_Generic_GJ" presynapticPopulation="MVL06" postsynapticPopulation="MVL05">
            <electricalConnectionInstanceW id="0" preCell="../MVL06/0/GenericMuscleCell" preSegment="0" preFractionAlong="0.5" postCell="../MVL05/0/GenericMuscleCell" postSegment="0" postFractionAlong="0.5" synapse="muscle_to_muscle_elec_syn" weight="15."/>
        </electricalProjection>
        <electricalProjection id="NC_MVL06_MVL07_Generic_GJ" presynapticPopulation="MVL06" postsynapticPopulation="MVL07">
            <electricalConnectionInstanceW id="0" preCell="../MVL06/0/GenericMuscleCell" preSegment="0" preFractionAlong="0.5" postCell="../MVL07/0/GenericMuscleCell" postSegment="0" postFractionAlong="0.5" synapse="muscle_to_muscle_elec_syn" weight="15."/>
        </electricalProjection>
        <electricalProjection id="NC_MVL07_MVL06_Generic_GJ" presynapticPopulation="MVL07" postsynapticPopulation="MVL06">
            <electricalConnectionInstanceW id="0" preCell="../MVL07/0/GenericMuscleCell" preSegment="0" preFractionAlong="0.5" postCell="../MVL06/0/GenericMuscleCell" postSegment="0" postFractionAlong="0.5" synapse="muscle_to_muscle_elec_syn" weight="15."/>
        </electricalProjection>
        <electricalProjection id="NC_MVL07_MVL08_Generic_GJ" presynapticPopulation="MVL07" postsynapticPopulation="MVL08">
            <electricalConnectionInstanceW id="0" preCell="../MVL07/0/GenericMuscleCell" preSegment="0" preFractionAlong="0.5" postCell="../MVL08/0/GenericMuscleCell" postSegment="0" postFractionAlong="0.5" synapse="muscle_to_muscle_elec_syn" weight="15."/>
        </electricalProjection>
        <electricalProjection id="NC_MVL08_MVL07_Generic_GJ" presynapticPopulation="MVL08" postsynapticPopulation="MVL07">
            <electricalConnectionInstanceW id="0" preCell="../MVL08/0/GenericMuscleCell" preSegment="0" preFractionAlong="0.5" postCell="../MVL07/0/GenericMuscleCell" postSegment="0" postFractionAlong="0.5" synapse="muscle_to_muscle_elec_syn" weight="15."/>
        </electricalProjection>
        <electricalProjection id="NC_MVL08_MVL09_Generic_GJ" presynapticPopulation="MVL08" postsynapticPopulation="MVL09">
            <electricalConnectionInstanceW id="0" preCell="../MVL08/0/GenericMuscleCell" preSegment="0" preFractionAlong="0.5" postCell="../MVL09/0/GenericMuscleCell" postSegment="0" postFractionAlong="0.5" synapse="muscle_to_muscle_elec_syn" weight="15."/>
        </electricalProjection>
        <electricalProjection id="NC_MVL09_MVL08_Generic_GJ" presynapticPopulation="MVL09" postsynapticPopulation="MVL08">
            <electricalConnectionInstanceW id="0" preCell="../MVL09/0/GenericMuscleCell" preSegment="0" preFractionAlong="0.5" postCell="../MVL08/0/GenericMuscleCell" postSegment="0" postFractionAlong="0.5" synapse="muscle_to_muscle_elec_syn" weight="15."/>
        </electricalProjection>
        <electricalProjection id="NC_MVL09_MVL10_Generic_GJ" presynapticPopulation="MVL09" postsynapticPopulation="MVL10">
            <electricalConnectionInstanceW id="0" preCell="../MVL09/0/GenericMuscleCell" preSegment="0" preFractionAlong="0.5" postCell="../MVL10/0/GenericMuscleCell" postSegment="0" postFractionAlong="0.5" synapse="muscle_to_muscle_elec_syn" weight="15."/>
        </electricalProjection>
        <electricalProjection id="NC_MVL09_MVR08_Generic_GJ" presynapticPopulation="MVL09" postsynapticPopulation="MVR08">
            <electricalConnectionInstanceW id="0" preCell="../MVL09/0/GenericMuscleCell" preSegment="0" preFractionAlong="0.5" postCell="../MVR08/0/GenericMuscleCell" postSegment="0" postFractionAlong="0.5" synapse="muscle_to_muscle_elec_syn" weight="2."/>
        </electricalProjection>
        <electricalProjection id="NC_MVL10_MVL09_Generic_GJ" presynapticPopulation="MVL10" postsynapticPopulation="MVL09">
            <electricalConnectionInstanceW id="0" preCell="../MVL10/0/GenericMuscleCell" preSegment="0" preFractionAlong="0.5" postCell="../MVL09/0/GenericMuscleCell" postSegment="0" postFractionAlong="0.5" synapse="muscle_to_muscle_elec_syn" weight="15."/>
        </electricalProjection>
        <electricalProjection id="NC_MVL10_MVL11_Generic_GJ" presynapticPopulation="MVL10" postsynapticPopulation="MVL11">
            <electricalConnectionInstanceW id="0" preCell="../MVL10/0/GenericMuscleCell" preSegment="0" preFractionAlong="0.5" postCell="../MVL11/0/GenericMuscleCell" postSegment="0" postFractionAlong="0.5" synapse="muscle_to_muscle_elec_syn" weight="15."/>
        </electricalProjection>
        <electricalProjection id="NC_MVL11_MVL10_Generic_GJ" presynapticPopulation="MVL11" postsynapticPopulation="MVL10">
            <electricalConnectionInstanceW id="0" preCell="../MVL11/0/GenericMuscleCell" preSegment="0" preFractionAlong="0.5" postCell="../MVL10/0/GenericMuscleCell" postSegment="0" postFractionAlong="0.5" synapse="muscle_to_muscle_elec_syn" weight="15."/>
        </electricalProjection>
        <electricalProjection id="NC_MVL11_MVL12_Generic_GJ" presynapticPopulation="MVL11" postsynapticPopulation="MVL12">
            <electricalConnectionInstanceW id="0" preCell="../MVL11/0/GenericMuscleCell" preSegment="0" preFractionAlong="0.5" postCell="../MVL12/0/GenericMuscleCell" postSegment="0" postFractionAlong="0.5" synapse="muscle_to_muscle_elec_syn" weight="15."/>
        </electricalProjection>
        <electricalProjection id="NC_MVL12_MVL11_Generic_GJ" presynapticPopulation="MVL12" postsynapticPopulation="MVL11">
            <electricalConnectionInstanceW id="0" preCell="../MVL12/0/GenericMuscleCell" preSegment="0" preFractionAlong="0.5" postCell="../MVL11/0/GenericMuscleCell" postSegment="0" postFractionAlong="0.5" synapse="muscle_to_muscle_elec_syn" weight="15."/>
        </electricalProjection>
        <electricalProjection id="NC_MVL12_MVL13_Generic_GJ" presynapticPopulation="MVL12" postsynapticPopulation="MVL13">
            <electricalConnectionInstanceW id="0" preCell="../MVL12/0/GenericMuscleCell" preSegment="0" preFractionAlong="0.5" postCell="../MVL13/0/GenericMuscleCell" postSegment="0" postFractionAlong="0.5" synapse="muscle_to_muscle_elec_syn" weight="15."/>
        </electricalProjection>
        <electricalProjection id="NC_MVL13_MVL12_Generic_GJ" presynapticPopulation="MVL13" postsynapticPopulation="MVL12">
            <electricalConnectionInstanceW id="0" preCell="../MVL13/0/GenericMuscleCell" preSegment="0" preFractionAlong="0.5" postCell="../MVL12/0/GenericMuscleCell" postSegment="0" postFractionAlong="0.5" synapse="muscle_to_muscle_elec_syn" weight="15."/>
        </electricalProjection>
        <electricalProjection id="NC_MVL13_MVL14_Generic_GJ" presynapticPopulation="MVL13" postsynapticPopulation="MVL14">
            <electricalConnectionInstanceW id="0" preCell="../MVL13/0/GenericMuscleCell" preSegment="0" preFractionAlong="0.5" postCell="../MVL14/0/GenericMuscleCell" postSegment="0" postFractionAlong="0.5" synapse="muscle_to_muscle_elec_syn" weight="15."/>
        </electricalProjection>
        <electricalProjection id="NC_MVL14_MVL13_Generic_GJ" presynapticPopulation="MVL14" postsynapticPopulation="MVL13">
            <electricalConnectionInstanceW id="0" preCell="../MVL14/0/GenericMuscleCell" preSegment="0" preFractionAlong="0.5" postCell="../MVL13/0/GenericMuscleCell" postSegment="0" postFractionAlong="0.5" synapse="muscle_to_muscle_elec_syn" weight="15."/>
        </electricalProjection>
        <electricalProjection id="NC_MVL14_MVL15_Generic_GJ" presynapticPopulation="MVL14" postsynapticPopulation="MVL15">
            <electricalConnectionInstanceW id="0" preCell="../MVL14/0/GenericMuscleCell" preSegment="0" preFractionAlong="0.5" postCell="../MVL15/0/GenericMuscleCell" postSegment="0" postFractionAlong="0.5" synapse="muscle_to_muscle_elec_syn" weight="15."/>
        </electricalProjection>
        <electricalProjection id="NC_MVL15_MVL14_Generic_GJ" presynapticPopulation="MVL15" postsynapticPopulation="MVL14">
            <electricalConnectionInstanceW id="0" preCell="../MVL15/0/GenericMuscleCell" preSegment="0" preFractionAlong="0.5" postCell="../MVL14/0/GenericMuscleCell" postSegment="0" postFractionAlong="0.5" synapse="muscle_to_muscle_elec_syn" weight="15."/>
        </electricalProjection>
        <electricalProjection id="NC_MVL15_MVL16_Generic_GJ" presynapticPopulation="MVL15" postsynapticPopulation="MVL16">
            <electricalConnectionInstanceW id="0" preCell="../MVL15/0/GenericMuscleCell" preSegment="0" preFractionAlong="0.5" postCell="../MVL16/0/GenericMuscleCell" postSegment="0" postFractionAlong="0.5" synapse="muscle_to_muscle_elec_syn" weight="15."/>
        </electricalProjection>
        <electricalProjection id="NC_MVL16_MVL15_Generic_GJ" presynapticPopulation="MVL16" postsynapticPopulation="MVL15">
            <electricalConnectionInstanceW id="0" preCell="../MVL16/0/GenericMuscleCell" preSegment="0" preFractionAlong="0.5" postCell="../MVL15/0/GenericMuscleCell" postSegment="0" postFractionAlong="0.5" synapse="muscle_to_muscle_elec_syn" weight="15."/>
        </electricalProjection>
        <electricalProjection id="NC_MVL16_MVL17_Generic_GJ" presynapticPopulation="MVL16" postsynapticPopulation="MVL17">
            <electricalConnectionInstanceW id="0" preCell="../MVL16/0/GenericMuscleCell" preSegment="0" preFractionAlong="0.5" postCell="../MVL17/0/GenericMuscleCell" postSegment="0" postFractionAlong="0.5" synapse="muscle_to_muscle_elec_syn" weight="15."/>
        </electricalProjection>
        <electricalProjection id="NC_MVL17_MVL16_Generic_GJ" presynapticPopulation="MVL17" postsynapticPopulation="MVL16">
            <electricalConnectionInstanceW id="0" preCell="../MVL17/0/GenericMuscleCell" preSegment="0" preFractionAlong="0.5" postCell="../MVL16/0/GenericMuscleCell" postSegment="0" postFractionAlong="0.5" synapse="muscle_to_muscle_elec_syn" weight="15."/>
        </electricalProjection>
        <electricalProjection id="NC_MVL17_MVL18_Generic_GJ" presynapticPopulation="MVL17" postsynapticPopulation="MVL18">
            <electricalConnectionInstanceW id="0" preCell="../MVL17/0/GenericMuscleCell" preSegment="0" preFractionAlong="0.5" postCell="../MVL18/0/GenericMuscleCell" postSegment="0" postFractionAlong="0.5" synapse="muscle_to_muscle_elec_syn" weight="15."/>
        </electricalProjection>
        <electricalProjection id="NC_MVL18_MVL17_Generic_GJ" presynapticPopulation="MVL18" postsynapticPopulation="MVL17">
            <electricalConnectionInstanceW id="0" preCell="../MVL18/0/GenericMuscleCell" preSegment="0" preFractionAlong="0.5" postCell="../MVL17/0/GenericMuscleCell" postSegment="0" postFractionAlong="0.5" synapse="muscle_to_muscle_elec_syn" weight="15."/>
        </electricalProjection>
        <electricalProjection id="NC_MVL18_MVL19_Generic_GJ" presynapticPopulation="MVL18" postsynapticPopulation="MVL19">
            <electricalConnectionInstanceW id="0" preCell="../MVL18/0/GenericMuscleCell" preSegment="0" preFractionAlong="0.5" postCell="../MVL19/0/GenericMuscleCell" postSegment="0" postFractionAlong="0.5" synapse="muscle_to_muscle_elec_syn" weight="15."/>
        </electricalProjection>
        <electricalProjection id="NC_MVL19_MVL18_Generic_GJ" presynapticPopulation="MVL19" postsynapticPopulation="MVL18">
            <electricalConnectionInstanceW id="0" preCell="../MVL19/0/GenericMuscleCell" preSegment="0" preFractionAlong="0.5" postCell="../MVL18/0/GenericMuscleCell" postSegment="0" postFractionAlong="0.5" synapse="muscle_to_muscle_elec_syn" weight="15."/>
        </electricalProjection>
        <electricalProjection id="NC_MVL19_MVL20_Generic_GJ" presynapticPopulation="MVL19" postsynapticPopulation="MVL20">
            <electricalConnectionInstanceW id="0" preCell="../MVL19/0/GenericMuscleCell" preSegment="0" preFractionAlong="0.5" postCell="../MVL20/0/GenericMuscleCell" postSegment="0" postFractionAlong="0.5" synapse="muscle_to_muscle_elec_syn" weight="15."/>
        </electricalProjection>
        <electricalProjection id="NC_MVL20_MVL19_Generic_GJ" presynapticPopulation="MVL20" postsynapticPopulation="MVL19">
            <electricalConnectionInstanceW id="0" preCell="../MVL20/0/GenericMuscleCell" preSegment="0" preFractionAlong="0.5" postCell="../MVL19/0/GenericMuscleCell" postSegment="0" postFractionAlong="0.5" synapse="muscle_to_muscle_elec_syn" weight="15."/>
        </electricalProjection>
        <electricalProjection id="NC_MVL20_MVL21_Generic_GJ" presynapticPopulation="MVL20" postsynapticPopulation="MVL21">
            <electricalConnectionInstanceW id="0" preCell="../MVL20/0/GenericMuscleCell" preSegment="0" preFractionAlong="0.5" postCell="../MVL21/0/GenericMuscleCell" postSegment="0" postFractionAlong="0.5" synapse="muscle_to_muscle_elec_syn" weight="15."/>
        </electricalProjection>
        <electricalProjection id="NC_MVL21_MVL20_Generic_GJ" presynapticPopulation="MVL21" postsynapticPopulation="MVL20">
            <electricalConnectionInstanceW id="0" preCell="../MVL21/0/GenericMuscleCell" preSegment="0" preFractionAlong="0.5" postCell="../MVL20/0/GenericMuscleCell" postSegment="0" postFractionAlong="0.5" synapse="muscle_to_muscle_elec_syn" weight="15."/>
        </electricalProjection>
        <electricalProjection id="NC_MVL21_MVL22_Generic_GJ" presynapticPopulation="MVL21" postsynapticPopulation="MVL22">
            <electricalConnectionInstanceW id="0" preCell="../MVL21/0/GenericMuscleCell" preSegment="0" preFractionAlong="0.5" postCell="../MVL22/0/GenericMuscleCell" postSegment="0" postFractionAlong="0.5" synapse="muscle_to_muscle_elec_syn" weight="15."/>
        </electricalProjection>
        <electricalProjection id="NC_MVL22_MVL21_Generic_GJ" presynapticPopulation="MVL22" postsynapticPopulation="MVL21">
            <electricalConnectionInstanceW id="0" preCell="../MVL22/0/GenericMuscleCell" preSegment="0" preFractionAlong="0.5" postCell="../MVL21/0/GenericMuscleCell" postSegment="0" postFractionAlong="0.5" synapse="muscle_to_muscle_elec_syn" weight="15."/>
        </electricalProjection>
        <electricalProjection id="NC_MVL22_MVL23_Generic_GJ" presynapticPopulation="MVL22" postsynapticPopulation="MVL23">
            <electricalConnectionInstanceW id="0" preCell="../MVL22/0/GenericMuscleCell" preSegment="0" preFractionAlong="0.5" postCell="../MVL23/0/GenericMuscleCell" postSegment="0" postFractionAlong="0.5" synapse="muscle_to_muscle_elec_syn" weight="15."/>
        </electricalProjection>
        <electricalProjection id="NC_MVL23_MVL22_Generic_GJ" presynapticPopulation="MVL23" postsynapticPopulation="MVL22">
            <electricalConnectionInstanceW id="0" preCell="../MVL23/0/GenericMuscleCell" preSegment="0" preFractionAlong="0.5" postCell="../MVL22/0/GenericMuscleCell" postSegment="0" postFractionAlong="0.5" synapse="muscle_to_muscle_elec_syn" weight="15."/>
        </electricalProjection>
        <electricalProjection id="NC_MVR01_MVR02_Generic_GJ" presynapticPopulation="MVR01" postsynapticPopulation="MVR02">
            <electricalConnectionInstanceW id="0" preCell="../MVR01/0/GenericMuscleCell" preSegment="0" preFractionAlong="0.5" postCell="../MVR02/0/GenericMuscleCell" postSegment="0" postFractionAlong="0.5" synapse="muscle_to_muscle_elec_syn" weight="15."/>
        </electricalProjection>
        <electricalProjection id="NC_MVR01_MVR03_Generic_GJ" presynapticPopulation="MVR01" postsynapticPopulation="MVR03">
            <electricalConnectionInstanceW id="0" preCell="../MVR01/0/GenericMuscleCell" preSegment="0" preFractionAlong="0.5" postCell="../MVR03/0/GenericMuscleCell" postSegment="0" postFractionAlong="0.5" synapse="muscle_to_muscle_elec_syn" weight="15."/>
        </electricalProjection>
        <electricalProjection id="NC_MVR02_MVR01_Generic_GJ" presynapticPopulation="MVR02" postsynapticPopulation="MVR01">
            <electricalConnectionInstanceW id="0" preCell="../MVR02/0/GenericMuscleCell" preSegment="0" preFractionAlong="0.5" postCell="../MVR01/0/GenericMuscleCell" postSegment="0" postFractionAlong="0.5" synapse="muscle_to_muscle_elec_syn" weight="15."/>
        </electricalProjection>
        <electricalProjection id="NC_MVR02_MVR03_Generic_GJ" presynapticPopulation="MVR02" postsynapticPopulation="MVR03">
            <electricalConnectionInstanceW id="0" preCell="../MVR02/0/GenericMuscleCell" preSegment="0" preFractionAlong="0.5" postCell="../MVR03/0/GenericMuscleCell" postSegment="0" postFractionAlong="0.5" synapse="muscle_to_muscle_elec_syn" weight="15."/>
        </electricalProjection>
        <electricalProjection id="NC_MVR03_MVR01_Generic_GJ" presynapticPopulation="MVR03" postsynapticPopulation="MVR01">
            <electricalConnectionInstanceW id="0" preCell="../MVR03/0/GenericMuscleCell" preSegment="0" preFractionAlong="0.5" postCell="../MVR01/0/GenericMuscleCell" postSegment="0" postFractionAlong="0.5" synapse="muscle_to_muscle_elec_syn" weight="15."/>
        </electricalProjection>
        <electricalProjection id="NC_MVR03_MVR02_Generic_GJ" presynapticPopulation="MVR03" postsynapticPopulation="MVR02">
            <electricalConnectionInstanceW id="0" preCell="../MVR03/0/GenericMuscleCell" preSegment="0" preFractionAlong="0.5" postCell="../MVR02/0/GenericMuscleCell" postSegment="0" postFractionAlong="0.5" synapse="muscle_to_muscle_elec_syn" weight="15."/>
        </electricalProjection>
        <electricalProjection id="NC_MVR03_MVR04_Generic_GJ" presynapticPopulation="MVR03" postsynapticPopulation="MVR04">
            <electricalConnectionInstanceW id="0" preCell="../MVR03/0/GenericMuscleCell" preSegment="0" preFractionAlong="0.5" postCell="../MVR04/0/GenericMuscleCell" postSegment="0" postFractionAlong="0.5" synapse="muscle_to_muscle_elec_syn" weight="15."/>
        </electricalProjection>
        <electricalProjection id="NC_MVR04_MVR03_Generic_GJ" presynapticPopulation="MVR04" postsynapticPopulation="MVR03">
            <electricalConnectionInstanceW id="0" preCell="../MVR04/0/GenericMuscleCell" preSegment="0" preFractionAlong="0.5" postCell="../MVR03/0/GenericMuscleCell" postSegment="0" postFractionAlong="0.5" synapse="muscle_to_muscle_elec_syn" weight="15."/>
        </electricalProjection>
        <electricalProjection id="NC_MVR04_MVR05_Generic_GJ" presynapticPopulation="MVR04" postsynapticPopulation="MVR05">
            <electricalConnectionInstanceW id="0" preCell="../MVR04/0/GenericMuscleCell" preSegment="0" preFractionAlong="0.5" postCell="../MVR05/0/GenericMuscleCell" postSegment="0" postFractionAlong="0.5" synapse="muscle_to_muscle_elec_syn" weight="15."/>
        </electricalProjection>
        <electricalProjection id="NC_MVR05_MVR04_Generic_GJ" presynapticPopulation="MVR05" postsynapticPopulation="MVR04">
            <electricalConnectionInstanceW id="0" preCell="../MVR05/0/GenericMuscleCell" preSegment="0" preFractionAlong="0.5" postCell="../MVR04/0/GenericMuscleCell" postSegment="0" postFractionAlong="0.5" synapse="muscle_to_muscle_elec_syn" weight="15."/>
        </electricalProjection>
        <electricalProjection id="NC_MVR05_MVR06_Generic_GJ" presynapticPopulation="MVR05" postsynapticPopulation="MVR06">
            <electricalConnectionInstanceW id="0" preCell="../MVR05/0/GenericMuscleCell" preSegment="0" preFractionAlong="0.5" postCell="../MVR06/0/GenericMuscleCell" postSegment="0" postFractionAlong="0.5" synapse="muscle_to_muscle_elec_syn" weight="15."/>
        </electricalProjection>
        <electricalProjection id="NC_MVR06_MVR05_Generic_GJ" presynapticPopulation="MVR06" postsynapticPopulation="MVR05">
            <electricalConnectionInstanceW id="0" preCell="../MVR06/0/GenericMuscleCell" preSegment="0" preFractionAlong="0.5" postCell="../MVR05/0/GenericMuscleCell" postSegment="0" postFractionAlong="0.5" synapse="muscle_to_muscle_elec_syn" weight="15."/>
        </electricalProjection>
        <electricalProjection id="NC_MVR06_MVR07_Generic_GJ" presynapticPopulation="MVR06" postsynapticPopulation="MVR07">
            <electricalConnectionInstanceW id="0" preCell="../MVR06/0/GenericMuscleCell" preSegment="0" preFractionAlong="0.5" postCell="../MVR07/0/GenericMuscleCell" postSegment="0" postFractionAlong="0.5" synapse="muscle_to_muscle_elec_syn" weight="15."/>
        </electricalProjection>
        <electricalProjection id="NC_MVR07_MVR06_Generic_GJ" presynapticPopulation="MVR07" postsynapticPopulation="MVR06">
            <electricalConnectionInstanceW id="0" preCell="../MVR07/0/GenericMuscleCell" preSegment="0" preFractionAlong="0.5" postCell="../MVR06/0/GenericMuscleCell" postSegment="0" postFractionAlong="0.5" synapse="muscle_to_muscle_elec_syn" weight="15."/>
        </electricalProjection>
        <electricalProjection id="NC_MVR07_MVR08_Generic_GJ" presynapticPopulation="MVR07" postsynapticPopulation="MVR08">
            <electricalConnectionInstanceW id="0" preCell="../MVR07/0/GenericMuscleCell" preSegment="0" preFractionAlong="0.5" postCell="../MVR08/0/GenericMuscleCell" postSegment="0" postFractionAlong="0.5" synapse="muscle_to_muscle_elec_syn" weight="15."/>
        </electricalProjection>
        <electricalProjection id="NC_MVR08_MVL09_Generic_GJ" presynapticPopulation="MVR08" postsynapticPopulation="MVL09">
            <electricalConnectionInstanceW id="0" preCell="../MVR08/0/GenericMuscleCell" preSegment="0" preFractionAlong="0.5" postCell="../MVL09/0/GenericMuscleCell" postSegment="0" postFractionAlong="0.5" synapse="muscle_to_muscle_elec_syn" weight="2."/>
        </electricalProjection>
        <electricalProjection id="NC_MVR08_MVR07_Generic_GJ" presynapticPopulation="MVR08" postsynapticPopulation="MVR07">
            <electricalConnectionInstanceW id="0" preCell="../MVR08/0/GenericMuscleCell" preSegment="0" preFractionAlong="0.5" postCell="../MVR07/0/GenericMuscleCell" postSegment="0" postFractionAlong="0.5" synapse="muscle_to_muscle_elec_syn" weight="15."/>
        </electricalProjection>
        <electricalProjection id="NC_MVR08_MVR09_Generic_GJ" presynapticPopulation="MVR08" postsynapticPopulation="MVR09">
            <electricalConnectionInstanceW id="0" preCell="../MVR08/0/GenericMuscleCell" preSegment="0" preFractionAlong="0.5" postCell="../MVR09/0/GenericMuscleCell" postSegment="0" postFractionAlong="0.5" synapse="muscle_to_muscle_elec_syn" weight="15."/>
        </electricalProjection>
        <electricalProjection id="NC_MVR09_MVR08_Generic_GJ" presynapticPopulation="MVR09" postsynapticPopulation="MVR08">
            <electricalConnectionInstanceW id="0" preCell="../MVR09/0/GenericMuscleCell" preSegment="0" preFractionAlong="0.5" postCell="../MVR08/0/GenericMuscleCell" postSegment="0" postFractionAlong="0.5" synapse="muscle_to_muscle_elec_syn" weight="15."/>
        </electricalProjection>
        <electricalProjection id="NC_MVR09_MVR10_Generic_GJ" presynapticPopulation="MVR09" postsynapticPopulation="MVR10">
            <electricalConnectionInstanceW id="0" preCell="../MVR09/0/GenericMuscleCell" preSegment="0" preFractionAlong="0.5" postCell="../MVR10/0/GenericMuscleCell" postSegment="0" postFractionAlong="0.5" synapse="muscle_to_muscle_elec_syn" weight="15."/>
        </electricalProjection>
        <electricalProjection id="NC_MVR10_MVR09_Generic_GJ" presynapticPopulation="MVR10" postsynapticPopulation="MVR09">
            <electricalConnectionInstanceW id="0" preCell="../MVR10/0/GenericMuscleCell" preSegment="0" preFractionAlong="0.5" postCell="../MVR09/0/GenericMuscleCell" postSegment="0" postFractionAlong="0.5" synapse="muscle_to_muscle_elec_syn" weight="15."/>
        </electricalProjection>
        <electricalProjection id="NC_MVR10_MVR11_Generic_GJ" presynapticPopulation="MVR10" postsynapticPopulation="MVR11">
            <electricalConnectionInstanceW id="0" preCell="../MVR10/0/GenericMuscleCell" preSegment="0" preFractionAlong="0.5" postCell="../MVR11/0/GenericMuscleCell" postSegment="0" postFractionAlong="0.5" synapse="muscle_to_muscle_elec_syn" weight="15."/>
        </electricalProjection>
        <electricalProjection id="NC_MVR11_MVR10_Generic_GJ" presynapticPopulation="MVR11" postsynapticPopulation="MVR10">
            <electricalConnectionInstanceW id="0" preCell="../MVR11/0/GenericMuscleCell" preSegment="0" preFractionAlong="0.5" postCell="../MVR10/0/GenericMuscleCell" postSegment="0" postFractionAlong="0.5" synapse="muscle_to_muscle_elec_syn" weight="15."/>
        </electricalProjection>
        <electricalProjection id="NC_MVR11_MVR12_Generic_GJ" presynapticPopulation="MVR11" postsynapticPopulation="MVR12">
            <electricalConnectionInstanceW id="0" preCell="../MVR11/0/GenericMuscleCell" preSegment="0" preFractionAlong="0.5" postCell="../MVR12/0/GenericMuscleCell" postSegment="0" postFractionAlong="0.5" synapse="muscle_to_muscle_elec_syn" weight="15."/>
        </electricalProjection>
        <electricalProjection id="NC_MVR12_MVR11_Generic_GJ" presynapticPopulation="MVR12" postsynapticPopulation="MVR11">
            <electricalConnectionInstanceW id="0" preCell="../MVR12/0/GenericMuscleCell" preSegment="0" preFractionAlong="0.5" postCell="../MVR11/0/GenericMuscleCell" postSegment="0" postFractionAlong="0.5" synapse="muscle_to_muscle_elec_syn" weight="15."/>
        </electricalProjection>
        <electricalProjection id="NC_MVR12_MVR13_Generic_GJ" presynapticPopulation="MVR12" postsynapticPopulation="MVR13">
            <electricalConnectionInstanceW id="0" preCell="../MVR12/0/GenericMuscleCell" preSegment="0" preFractionAlong="0.5" postCell="../MVR13/0/GenericMuscleCell" postSegment="0" postFractionAlong="0.5" synapse="muscle_to_muscle_elec_syn" weight="15."/>
        </electricalProjection>
        <electricalProjection id="NC_MVR13_MVR12_Generic_GJ" presynapticPopulation="MVR13" postsynapticPopulation="MVR12">
            <electricalConnectionInstanceW id="0" preCell="../MVR13/0/GenericMuscleCell" preSegment="0" preFractionAlong="0.5" postCell="../MVR12/0/GenericMuscleCell" postSegment="0" postFractionAlong="0.5" synapse="muscle_to_muscle_elec_syn" weight="15."/>
        </electricalProjection>
        <electricalProjection id="NC_MVR13_MVR14_Generic_GJ" presynapticPopulation="MVR13" postsynapticPopulation="MVR14">
            <electricalConnectionInstanceW id="0" preCell="../MVR13/0/GenericMuscleCell" preSegment="0" preFractionAlong="0.5" postCell="../MVR14/0/GenericMuscleCell" postSegment="0" postFractionAlong="0.5" synapse="muscle_to_muscle_elec_syn" weight="15."/>
        </electricalProjection>
        <electricalProjection id="NC_MVR14_MVR13_Generic_GJ" presynapticPopulation="MVR14" postsynapticPopulation="MVR13">
            <electricalConnectionInstanceW id="0" preCell="../MVR14/0/GenericMuscleCell" preSegment="0" preFractionAlong="0.5" postCell="../MVR13/0/GenericMuscleCell" postSegment="0" postFractionAlong="0.5" synapse="muscle_to_muscle_elec_syn" weight="15."/>
        </electricalProjection>
        <electricalProjection id="NC_MVR14_MVR15_Generic_GJ" presynapticPopulation="MVR14" postsynapticPopulation="MVR15">
            <electricalConnectionInstanceW id="0" preCell="../MVR14/0/GenericMuscleCell" preSegment="0" preFractionAlong="0.5" postCell="../MVR15/0/GenericMuscleCell" postSegment="0" postFractionAlong="0.5" synapse="muscle_to_muscle_elec_syn" weight="15."/>
        </electricalProjection>
        <electricalProjection id="NC_MVR15_MVR14_Generic_GJ" presynapticPopulation="MVR15" postsynapticPopulation="MVR14">
            <electricalConnectionInstanceW id="0" preCell="../MVR15/0/GenericMuscleCell" preSegment="0" preFractionAlong="0.5" postCell="../MVR14/0/GenericMuscleCell" postSegment="0" postFractionAlong="0.5" synapse="muscle_to_muscle_elec_syn" weight="15."/>
        </electricalProjection>
        <electricalProjection id="NC_MVR15_MVR16_Generic_GJ" presynapticPopulation="MVR15" postsynapticPopulation="MVR16">
            <electricalConnectionInstanceW id="0" preCell="../MVR15/0/GenericMuscleCell" preSegment="0" preFractionAlong="0.5" postCell="../MVR16/0/GenericMuscleCell" postSegment="0" postFractionAlong="0.5" synapse="muscle_to_muscle_elec_syn" weight="15."/>
        </electricalProjection>
        <electricalProjection id="NC_MVR16_MVR15_Generic_GJ" presynapticPopulation="MVR16" postsynapticPopulation="MVR15">
            <electricalConnectionInstanceW id="0" preCell="../MVR16/0/GenericMuscleCell" preSegment="0" preFractionAlong="0.5" postCell="../MVR15/0/GenericMuscleCell" postSegment="0" postFractionAlong="0.5" synapse="muscle_to_muscle_elec_syn" weight="15."/>
        </electricalProjection>
        <electricalProjection id="NC_MVR16_MVR17_Generic_GJ" presynapticPopulation="MVR16" postsynapticPopulation="MVR17">
            <electricalConnectionInstanceW id="0" preCell="../MVR16/0/GenericMuscleCell" preSegment="0" preFractionAlong="0.5" postCell="../MVR17/0/GenericMuscleCell" postSegment="0" postFractionAlong="0.5" synapse="muscle_to_muscle_elec_syn" weight="15."/>
        </electricalProjection>
        <electricalProjection id="NC_MVR17_MVR16_Generic_GJ" presynapticPopulation="MVR17" postsynapticPopulation="MVR16">
            <electricalConnectionInstanceW id="0" preCell="../MVR17/0/GenericMuscleCell" preSegment="0" preFractionAlong="0.5" postCell="../MVR16/0/GenericMuscleCell" postSegment="0" postFractionAlong="0.5" synapse="muscle_to_muscle_elec_syn" weight="15."/>
        </electricalProjection>
        <electricalProjection id="NC_MVR17_MVR18_Generic_GJ" presynapticPopulation="MVR17" postsynapticPopulation="MVR18">
            <electricalConnectionInstanceW id="0" preCell="../MVR17/0/GenericMuscleCell" preSegment="0" preFractionAlong="0.5" postCell="../MVR18/0/GenericMuscleCell" postSegment="0" postFractionAlong="0.5" synapse="muscle_to_muscle_elec_syn" weight="15."/>
        </electricalProjection>
        <electricalProjection id="NC_MVR18_MVR17_Generic_GJ" presynapticPopulation="MVR18" postsynapticPopulation="MVR17">
            <electricalConnectionInstanceW id="0" preCell="../MVR18/0/GenericMuscleCell" preSegment="0" preFractionAlong="0.5" postCell="../MVR17/0/GenericMuscleCell" postSegment="0" postFractionAlong="0.5" synapse="muscle_to_muscle_elec_syn" weight="15."/>
        </electricalProjection>
        <electricalProjection id="NC_MVR18_MVR19_Generic_GJ" presynapticPopulation="MVR18" postsynapticPopulation="MVR19">
            <electricalConnectionInstanceW id="0" preCell="../MVR18/0/GenericMuscleCell" preSegment="0" preFractionAlong="0.5" postCell="../MVR19/0/GenericMuscleCell" postSegment="0" postFractionAlong="0.5" synapse="muscle_to_muscle_elec_syn" weight="15."/>
        </electricalProjection>
        <electricalProjection id="NC_MVR19_MVR18_Generic_GJ" presynapticPopulation="MVR19" postsynapticPopulation="MVR18">
            <electricalConnectionInstanceW id="0" preCell="../MVR19/0/GenericMuscleCell" preSegment="0" preFractionAlong="0.5" postCell="../MVR18/0/GenericMuscleCell" postSegment="0" postFractionAlong="0.5" synapse="muscle_to_muscle_elec_syn" weight="15."/>
        </electricalProjection>
        <electricalProjection id="NC_MVR19_MVR20_Generic_GJ" presynapticPopulation="MVR19" postsynapticPopulation="MVR20">
            <electricalConnectionInstanceW id="0" preCell="../MVR19/0/GenericMuscleCell" preSegment="0" preFractionAlong="0.5" postCell="../MVR20/0/GenericMuscleCell" postSegment="0" postFractionAlong="0.5" synapse="muscle_to_muscle_elec_syn" weight="15."/>
        </electricalProjection>
        <electricalProjection id="NC_MVR20_MVR19_Generic_GJ" presynapticPopulation="MVR20" postsynapticPopulation="MVR19">
            <electricalConnectionInstanceW id="0" preCell="../MVR20/0/GenericMuscleCell" preSegment="0" preFractionAlong="0.5" postCell="../MVR19/0/GenericMuscleCell" postSegment="0" postFractionAlong="0.5" synapse="muscle_to_muscle_elec_syn" weight="15."/>
        </electricalProjection>
        <electricalProjection id="NC_MVR20_MVR21_Generic_GJ" presynapticPopulation="MVR20" postsynapticPopulation="MVR21">
            <electricalConnectionInstanceW id="0" preCell="../MVR20/0/GenericMuscleCell" preSegment="0" preFractionAlong="0.5" postCell="../MVR21/0/GenericMuscleCell" postSegment="0" postFractionAlong="0.5" synapse="muscle_to_muscle_elec_syn" weight="15."/>
        </electricalProjection>
        <electricalProjection id="NC_MVR21_MVR20_Generic_GJ" presynapticPopulation="MVR21" postsynapticPopulation="MVR20">
            <electricalConnectionInstanceW id="0" preCell="../MVR21/0/GenericMuscleCell" preSegment="0" preFractionAlong="0.5" postCell="../MVR20/0/GenericMuscleCell" postSegment="0" postFractionAlong="0.5" synapse="muscle_to_muscle_elec_syn" weight="15."/>
        </electricalProjection>
        <electricalProjection id="NC_MVR21_MVR22_Generic_GJ" presynapticPopulation="MVR21" postsynapticPopulation="MVR22">
            <electricalConnectionInstanceW id="0" preCell="../MVR21/0/GenericMuscleCell" preSegment="0" preFractionAlong="0.5" postCell="../MVR22/0/GenericMuscleCell" postSegment="0" postFractionAlong="0.5" synapse="muscle_to_muscle_elec_syn" weight="15."/>
        </electricalProjection>
        <electricalProjection id="NC_MVR22_MVR21_Generic_GJ" presynapticPopulation="MVR22" postsynapticPopulation="MVR21">
            <electricalConnectionInstanceW id="0" preCell="../MVR22/0/GenericMuscleCell" preSegment="0" preFractionAlong="0.5" postCell="../MVR21/0/GenericMuscleCell" postSegment="0" postFractionAlong="0.5" synapse="muscle_to_muscle_elec_syn" weight="15."/>
        </electricalProjection>
        <electricalProjection id="NC_MVR22_MVR23_Generic_GJ" presynapticPopulation="MVR22" postsynapticPopulation="MVR23">
            <electricalConnectionInstanceW id="0" preCell="../MVR22/0/GenericMuscleCell" preSegment="0" preFractionAlong="0.5" postCell="../MVR23/0/GenericMuscleCell" postSegment="0" postFractionAlong="0.5" synapse="muscle_to_muscle_elec_syn" weight="15."/>
        </electricalProjection>
        <electricalProjection id="NC_MVR23_MVR22_Generic_GJ" presynapticPopulation="MVR23" postsynapticPopulation="MVR22">
            <electricalConnectionInstanceW id="0" preCell="../MVR23/0/GenericMuscleCell" preSegment="0" preFractionAlong="0.5" postCell="../MVR22/0/GenericMuscleCell" postSegment="0" postFractionAlong="0.5" synapse="muscle_to_muscle_elec_syn" weight="15."/>
        </electricalProjection>
        <continuousProjection id="NC_AVAL_AVBL_Acetylcholine" presynapticPopulation="AVAL" postsynapticPopulation="AVBL">
            <continuousConnectionInstanceW id="0" preCell="../AVAL/0/GenericNeuronCell" preSegment="0" preFractionAlong="0.5" postCell="../AVBL/0/GenericNeuronCell" postSegment="0" postFractionAlong="0.5" preComponent="silent" postComponent="AVAL_to_AVBL_inh_syn" weight="2."/>
        </continuousProjection>
        <continuousProjection id="NC_AVAL_DA3_Acetylcholine" presynapticPopulation="AVAL" postsynapticPopulation="DA3">
            <continuousConnectionInstanceW id="0" preCell="../AVAL/0/GenericNeuronCell" preSegment="0" preFractionAlong="0.5" postCell="../DA3/0/GenericNeuronCell" postSegment="0" postFractionAlong="0.5" preComponent="silent" postComponent="neuron_to_neuron_exc_syn" weight="12."/>
        </continuousProjection>
        <continuousProjection id="NC_AVAL_AS4_Acetylcholine" presynapticPopulation="AVAL" postsynapticPopulation="AS4">
            <continuousConnectionInstanceW id="0" preCell="../AVAL/0/GenericNeuronCell" preSegment="0" preFractionAlong="0.5" postCell="../AS4/0/GenericNeuronCell" postSegment="0" postFractionAlong="0.5" preComponent="silent" postComponent="neuron_to_neuron_exc_syn" weight="2."/>
        </continuousProjection>
        <continuousProjection id="NC_AVAR_AVBL_Acetylcholine" presynapticPopulation="AVAR" postsynapticPopulation="AVBL">
            <continuousConnectionInstanceW id="0" preCell="../AVAR/0/GenericNeuronCell" preSegment="0" preFractionAlong="0.5" postCell="../AVBL/0/GenericNeuronCell" postSegment="0" postFractionAlong="0.5" preComponent="silent" postComponent="AVAR_to_AVBL_inh_syn" weight="3."/>
        </continuousProjection>
        <continuousProjection id="NC_AVAR_AVBR_Acetylcholine" presynapticPopulation="AVAR" postsynapticPopulation="AVBR">
            <continuousConnectionInstanceW id="0" preCell="../AVAR/0/GenericNeuronCell" preSegment="0" preFractionAlong="0.5" postCell="../AVBR/0/GenericNeuronCell" postSegment="0" postFractionAlong="0.5" preComponent="silent" postComponent="AVAR_to_AVBR_inh_syn" weight="4."/>
        </continuousProjection>
        <continuousProjection id="NC_AVAR_DA3_Acetylcholine" presynapticPopulation="AVAR" postsynapticPopulation="DA3">
            <continuousConnectionInstanceW id="0" preCell="../AVAR/0/GenericNeuronCell" preSegment="0" preFractionAlong="0.5" postCell="../DA3/0/GenericNeuronCell" postSegment="0" postFractionAlong="0.5" preComponent="silent" postComponent="neuron_to_neuron_exc_syn" weight="8."/>
        </continuousProjection>
        <continuousProjection id="NC_AVAR_AS4_Acetylcholine" presynapticPopulation="AVAR" postsynapticPopulation="AS4">
            <continuousConnectionInstanceW id="0" preCell="../AVAR/0/GenericNeuronCell" preSegment="0" preFractionAlong="0.5" postCell="../AS4/0/GenericNeuronCell" postSegment="0" postFractionAlong="0.5" preComponent="silent" postComponent="neuron_to_neuron_exc_syn" weight="2."/>
        </continuousProjection>
        <continuousProjection id="NC_AVBL_AVAL_Acetylcholine" presynapticPopulation="AVBL" postsynapticPopulation="AVAL">
            <continuousConnectionInstanceW id="0" preCell="../AVBL/0/GenericNeuronCell" preSegment="0" preFractionAlong="0.5" postCell="../AVAL/0/GenericNeuronCell" postSegment="0" postFractionAlong="0.5" preComponent="silent" postComponent="AVBL_to_AVAL_inh_syn" weight="9."/>
        </continuousProjection>
        <continuousProjection id="NC_AVBL_AVAR_Acetylcholine" presynapticPopulation="AVBL" postsynapticPopulation="AVAR">
            <continuousConnectionInstanceW id="0" preCell="../AVBL/0/GenericNeuronCell" preSegment="0" preFractionAlong="0.5" postCell="../AVAR/0/GenericNeuronCell" postSegment="0" postFractionAlong="0.5" preComponent="silent" postComponent="AVBL_to_AVAR_inh_syn" weight="14."/>
        </continuousProjection>
        <continuousProjection id="NC_AVBL_AS4_Acetylcholine" presynapticPopulation="AVBL" postsynapticPopulation="AS4">
            <continuousConnectionInstanceW id="0" preCell="../AVBL/0/GenericNeuronCell" preSegment="0" preFractionAlong="0.5" postCell="../AS4/0/GenericNeuronCell" postSegment="0" postFractionAlong="0.5" preComponent="silent" postComponent="neuron_to_neuron_inh_syn" weight="1."/>
        </continuousProjection>
        <continuousProjection id="NC_AVBR_AVAL_Acetylcholine" presynapticPopulation="AVBR" postsynapticPopulation="AVAL">
            <continuousConnectionInstanceW id="0" preCell="../AVBR/0/GenericNeuronCell" preSegment="0" preFractionAlong="0.5" postCell="../AVAL/0/GenericNeuronCell" postSegment="0" postFractionAlong="0.5" preComponent="silent" postComponent="AVBR_to_AVAL_inh_syn" weight="10."/>
        </continuousProjection>
        <continuousProjection id="NC_AVBR_AVAR_Acetylcholine" presynapticPopulation="AVBR" postsynapticPopulation="AVAR">
            <continuousConnectionInstanceW id="0" preCell="../AVBR/0/GenericNeuronCell" preSegment="0" preFractionAlong="0.5" postCell="../AVAR/0/GenericNeuronCell" postSegment="0" postFractionAlong="0.5" preComponent="silent" postComponent="AVBR_to_AVAR_inh_syn" weight="14."/>
        </continuousProjection>
        <continuousProjection id="NC_AVBR_AS4_Acetylcholine" presynapticPopulation="AVBR" postsynapticPopulation="AS4">
            <continuousConnectionInstanceW id="0" preCell="../AVBR/0/GenericNeuronCell" preSegment="0" preFractionAlong="0.5" postCell="../AS4/0/GenericNeuronCell" postSegment="0" postFractionAlong="0.5" preComponent="silent" postComponent="neuron_to_neuron_inh_syn" weight="1."/>
        </continuousProjection>
        <continuousProjection id="NC_DA3_DB3_Acetylcholine" presynapticPopulation="DA3" postsynapticPopulation="DB3">
            <continuousConnectionInstanceW id="0" preCell="../DA3/0/GenericNeuronCell" preSegment="0" preFractionAlong="0.5" postCell="../DB3/0/GenericNeuronCell" postSegment="0" postFractionAlong="0.5" preComponent="silent" postComponent="DA3_to_DB3_exc_syn" weight="2."/>
        </continuousProjection>
        <continuousProjection id="NC_DB3_AS4_Acetylcholine" presynapticPopulation="DB3" postsynapticPopulation="AS4">
            <continuousConnectionInstanceW id="0" preCell="../DB3/0/GenericNeuronCell" preSegment="0" preFractionAlong="0.5" postCell="../AS4/0/GenericNeuronCell" postSegment="0" postFractionAlong="0.5" preComponent="silent" postComponent="neuron_to_neuron_inh_syn" weight="2."/>
        </continuousProjection>
        <continuousProjection id="NC_AS4_DA3_Acetylcholine" presynapticPopulation="AS4" postsynapticPopulation="DA3">
            <continuousConnectionInstanceW id="0" preCell="../AS4/0/GenericNeuronCell" preSegment="0" preFractionAlong="0.5" postCell="../DA3/0/GenericNeuronCell" postSegment="0" postFractionAlong="0.5" preComponent="silent" postComponent="AS4_to_DA3_exc_syn" weight="2."/>
        </continuousProjection>
        <continuousProjection id="NC_DA3_MDL09_Acetylcholine" presynapticPopulation="DA3" postsynapticPopulation="MDL09">
            <continuousConnectionInstanceW id="0" preCell="../DA3/0/GenericNeuronCell" preSegment="0" preFractionAlong="0.5" postCell="../MDL09/0/GenericMuscleCell" postSegment="0" postFractionAlong="0.5" preComponent="silent" postComponent="neuron_to_muscle_exc_syn" weight="3."/>
        </continuousProjection>
        <continuousProjection id="NC_DA3_MDL10_Acetylcholine" presynapticPopulation="DA3" postsynapticPopulation="MDL10">
            <continuousConnectionInstanceW id="0" preCell="../DA3/0/GenericNeuronCell" preSegment="0" preFractionAlong="0.5" postCell="../MDL10/0/GenericMuscleCell" postSegment="0" postFractionAlong="0.5" preComponent="silent" postComponent="neuron_to_muscle_exc_syn" weight="17."/>
        </continuousProjection>
        <continuousProjection id="NC_DA3_MDL11_Acetylcholine" presynapticPopulation="DA3" postsynapticPopulation="MDL11">
            <continuousConnectionInstanceW id="0" preCell="../DA3/0/GenericNeuronCell" preSegment="0" preFractionAlong="0.5" postCell="../MDL11/0/GenericMuscleCell" postSegment="0" postFractionAlong="0.5" preComponent="silent" postComponent="neuron_to_muscle_exc_syn" weight="12."/>
        </continuousProjection>
        <continuousProjection id="NC_DA3_MDR09_Acetylcholine" presynapticPopulation="DA3" postsynapticPopulation="MDR09">
            <continuousConnectionInstanceW id="0" preCell="../DA3/0/GenericNeuronCell" preSegment="0" preFractionAlong="0.5" postCell="../MDR09/0/GenericMuscleCell" postSegment="0" postFractionAlong="0.5" preComponent="silent" postComponent="neuron_to_muscle_exc_syn" weight="3."/>
        </continuousProjection>
        <continuousProjection id="NC_DA3_MDR10_Acetylcholine" presynapticPopulation="DA3" postsynapticPopulation="MDR10">
            <continuousConnectionInstanceW id="0" preCell="../DA3/0/GenericNeuronCell" preSegment="0" preFractionAlong="0.5" postCell="../MDR10/0/GenericMuscleCell" postSegment="0" postFractionAlong="0.5" preComponent="silent" postComponent="neuron_to_muscle_exc_syn" weight="14."/>
        </continuousProjection>
        <continuousProjection id="NC_DA3_MDR11_Acetylcholine" presynapticPopulation="DA3" postsynapticPopulation="MDR11">
            <continuousConnectionInstanceW id="0" preCell="../DA3/0/GenericNeuronCell" preSegment="0" preFractionAlong="0.5" postCell="../MDR11/0/GenericMuscleCell" postSegment="0" postFractionAlong="0.5" preComponent="silent" postComponent="neuron_to_muscle_exc_syn" weight="4."/>
        </continuousProjection>
        <continuousProjection id="NC_DA3_MDR12_Acetylcholine" presynapticPopulation="DA3" postsynapticPopulation="MDR12">
            <continuousConnectionInstanceW id="0" preCell="../DA3/0/GenericNeuronCell" preSegment="0" preFractionAlong="0.5" postCell="../MDR12/0/GenericMuscleCell" postSegment="0" postFractionAlong="0.5" preComponent="silent" postComponent="neuron_to_muscle_exc_syn" weight="2."/>
        </continuousProjection>
        <continuousProjection id="NC_DB3_MDL11_Acetylcholine" presynapticPopulation="DB3" postsynapticPopulation="MDL11">
            <continuousConnectionInstanceW id="0" preCell="../DB3/0/GenericNeuronCell" preSegment="0" preFractionAlong="0.5" postCell="../MDL11/0/GenericMuscleCell" postSegment="0" postFractionAlong="0.5" preComponent="silent" postComponent="neuron_to_muscle_exc_syn" weight="6."/>
        </continuousProjection>
        <continuousProjection id="NC_DB3_MDL12_Acetylcholine" presynapticPopulation="DB3" postsynapticPopulation="MDL12">
            <continuousConnectionInstanceW id="0" preCell="../DB3/0/GenericNeuronCell" preSegment="0" preFractionAlong="0.5" postCell="../MDL12/0/GenericMuscleCell" postSegment="0" postFractionAlong="0.5" preComponent="silent" postComponent="neuron_to_muscle_exc_syn" weight="1."/>
        </continuousProjection>
        <continuousProjection id="NC_DB3_MDL13_Acetylcholine" presynapticPopulation="DB3" postsynapticPopulation="MDL13">
            <continuousConnectionInstanceW id="0" preCell="../DB3/0/GenericNeuronCell" preSegment="0" preFractionAlong="0.5" postCell="../MDL13/0/GenericMuscleCell" postSegment="0" postFractionAlong="0.5" preComponent="silent" postComponent="neuron_to_muscle_exc_syn" weight="3."/>
        </continuousProjection>
        <continuousProjection id="NC_DB3_MDL14_Acetylcholine" presynapticPopulation="DB3" postsynapticPopulation="MDL14">
            <continuousConnectionInstanceW id="0" preCell="../DB3/0/GenericNeuronCell" preSegment="0" preFractionAlong="0.5" postCell="../MDL14/0/GenericMuscleCell" postSegment="0" postFractionAlong="0.5" preComponent="silent" postComponent="neuron_to_muscle_exc_syn" weight="1."/>
        </continuousProjection>
        <continuousProjection id="NC_DB3_MDR11_Acetylcholine" presynapticPopulation="DB3" postsynapticPopulation="MDR11">
            <continuousConnectionInstanceW id="0" preCell="../DB3/0/GenericNeuronCell" preSegment="0" preFractionAlong="0.5" postCell="../MDR11/0/GenericMuscleCell" postSegment="0" postFractionAlong="0.5" preComponent="silent" postComponent="neuron_to_muscle_exc_syn" weight="2."/>
        </continuousProjection>
        <continuousProjection id="NC_DB3_MDR12_Acetylcholine" presynapticPopulation="DB3" postsynapticPopulation="MDR12">
            <continuousConnectionInstanceW id="0" preCell="../DB3/0/GenericNeuronCell" preSegment="0" preFractionAlong="0.5" postCell="../MDR12/0/GenericMuscleCell" postSegment="0" postFractionAlong="0.5" preComponent="silent" postComponent="neuron_to_muscle_exc_syn" weight="13."/>
        </continuousProjection>
        <continuousProjection id="NC_DB3_MDR13_Acetylcholine" presynapticPopulation="DB3" postsynapticPopulation="MDR13">
            <continuousConnectionInstanceW id="0" preCell="../DB3/0/GenericNeuronCell" preSegment="0" preFractionAlong="0.5" postCell="../MDR13/0/GenericMuscleCell" postSegment="0" postFractionAlong="0.5" preComponent="silent" postComponent="neuron_to_muscle_exc_syn" weight="1."/>
        </continuousProjection>
        <inputList id="Input_AVBL_stim_AVBL_1" population="AVBL" component="stim_AVBL_1">
            <input id="0" target="../AVBL/0/GenericNeuronCell" destination="synapses"/>
        </inputList>
        <inputList id="Input_AVBR_stim_AVBR_1" population="AVBR" component="stim_AVBR_1">
            <input id="0" target="../AVBR/0/GenericNeuronCell" destination="synapses"/>
        </inputList>
        <inputList id="Input_AVAL_stim_AVAL_1" population="AVAL" component="stim_AVAL_1">
            <input id="0" target="../AVAL/0/GenericNeuronCell" destination="synapses"/>
        </inputList>
        <inputList id="Input_AVAR_stim_AVAR_1" population="AVAR" component="stim_AVAR_1">
            <input id="0" target="../AVAR/0/GenericNeuronCell" destination="synapses"/>
        </inputList>
        <inputList id="Input_AVBL_stim_AVBL_2" population="AVBL" component="stim_AVBL_2">
            <input id="0" target="../AVBL/0/GenericNeuronCell" destination="synapses"/>
        </inputList>
        <inputList id="Input_AVBR_stim_AVBR_2" population="AVBR" component="stim_AVBR_2">
            <input id="0" target="../AVBR/0/GenericNeuronCell" destination="synapses"/>
        </inputList>
        <inputList id="Input_AS4_stim_AS4_1" population="AS4" component="stim_AS4_1">
            <input id="0" target="../AS4/0/GenericNeuronCell" destination="synapses"/>
        </inputList>
    </network>
</neuroml>
